// SBML level 3 version 1

function fd(x)
  x^3;
end

model main()

  // Compartments:
  compartment a = 1;

  // Species:
  species s in a = 0;

  // Parameters:
  p has dimensionless;
  p1 = arccosh(x); p1 has dimensionless;
  p2 has dimensionless;
  p3 = 2 dimensionless;
  x = 2 dimensionless;

  // Assignment rules:
  p2 := x*exponentiale;
  p := root(3, x);

  // Rate rules:
  p3' = log(2, p1);
  x' = ln(p1);

  // Algebraic rules:
  0 = x^3;

  // Reactions:
  r: s -> ; log10(s);

  // Events:
  at (x*3) after (x <= 3), fromTrigger=false: a = log(3, x);

  // Constraints:
  constraint (false && true) && false;
end
