// SBML level 3 version 1

model main()
  // model units - substance: mole, time: second, volume: litre, area: metre, length: metre, extent: mole
  // conversionFactor p

  // Compartments:
  compartment comp = 1e-14 litre;
  compartment comp1;
  compartment comp2;  // 4.6-D

  // Species:
  species ES in comp = 0;  // conversionFactor p
  species P in comp;

  // Parameters:
  Keq = 2.5 dimensionless;
  Keq1 = ;
  Keq2 = ;

  // Reactions:
  in: X0 => T; k1*X0*cell;
    k1 = 0.1 per_second;
  out1: T -> X1; out1_k2*S2*cell;  // modifiers: S2; fast
    out1_k2 = 0.15 per_second;
  out: T -> X1; out_k2*S2*cell;  // modifiers: S2
    out_k2 = 0.15 per_second;

  // Events:
  at (true), priority = 1, t0=false, persistent=false: ;
  at (true): ;

  // Unit definitions:
  unit per_second = second;
  unit nonsense = (5e9 litre)^1.5 * second / (130 mole);
end
