// SBML level 2 version 2

function f(xx, yy)
  xx + yy;
end

model algebraicRules_basic()

  // Compartments:
  compartment cell = 1 litre;
  compartment cell1 = 1 length;  // 1-D

  // Species:
  species x in cell;  // substance in mole
  substanceOnly species y in cell = 0.5*cell;
  species z2 in cell = y*2;
  substanceOnly species x1 in cell = 0.5*cell;  // substance in mole
  substanceOnly species y1 in cell = 0.5*cell;

  // Parameters:
  k1 has m_per_sec;
  k2 = ;

  // Assignment rules:
  x := f(3, 4);

  // Rate rules:
  cell1' = k1 + k2;

  // Algebraic rules:
  0 = k2*cell;

  // Reactions:
  R: (2/k2) x1 => y1; x1/k_1;
    k_1 = 1 second; R_k2 = 1 length; k3 = 1;

  // Events:
  e1: at (1 + 2) after (1 != 2): k2 = k1*2;

  // Unit definitions:
  unit m_per_sec = metre / second;
  unit length = 0.01 metre;
  unit substance = 0.01 mole;
end
