// SBML level 3 version 1

function func1(y)
  y + 2 volume;
end

model find_id()
  // model units - substance: item, time: second, volume: litre, area: candela, length: farad, extent: coulomb
  // conversionFactor conv

  // Compartments:
  compartment comp = 1 volume;

  // Species:
  species b in comp = 5 volume*x;  // conversionFactor conv
  species b2 in comp;

  // Parameters:
  x has volume;
  conv = ;

  // Assignment rules:
  C := 7 volume + b;

  // Rate rules:
  x' = 7 volume + b;

  // Reactions:
  J0: b -> ; 7 volume + J0_x + b + b2;  // modifiers: b2

  // Events:
  E0: at (7 volume + b) after (b > 3 volume), priority = 7 volume + b: b = 7 volume + b;

  // Unit definitions:
  unit volume = litre;
end
