// SBML level 1 version 2
// Created by MetaFluxNet on 2009-8-9 22:8

model Acinetobacter_baumannii_AYE()

  // Compartments:
  compartment cell = 1;

  // Species:
  species C180ACP in cell = 1/cell;
  species a_5H24DP in cell = 1/cell;
  species DMB in cell = 1/cell;
  species MPYR in cell = 1/cell;
  species HPPP in cell = 1/cell;
  species CIIA in cell = 1/cell;
  species DMK in cell = 1/cell;
  species CMP in cell = 1/cell;
  species TRNASER in cell = 1/cell;
  species RGT in cell = 1/cell;
  species $VALxt in cell = 1/cell;
  species a_5A4IC in cell = 1/cell;
  species GLUGSAL in cell = 1/cell;
  species NAGA6P in cell = 1/cell;
  species SUCC in cell = 1/cell;
  species a_5MTA in cell = 1/cell;
  species ORN in cell = 1/cell;
  species MTRM in cell = 1/cell;
  species C171ACP in cell = 1/cell;
  species LTG in cell = 1/cell;
  species FUM in cell = 1/cell;
  species $TRExt in cell = 1/cell;
  species PLA in cell = 1/cell;
  species HOMOGEN in cell = 1/cell;
  species C121COA in cell = 1/cell;
  species NAGA1P in cell = 1/cell;
  species GCYS in cell = 1/cell;
  species D8RL in cell = 1/cell;
  species PC2 in cell = 1/cell;
  species X5P in cell = 1/cell;
  species SAH in cell = 1/cell;
  species SHCL in cell = 1/cell;
  species DHPANT in cell = 1/cell;
  species AGDPCBA in cell = 1/cell;
  species C_I_A in cell = 1/cell;
  species a_5MC in cell = 1/cell;
  species a_3PASELNT in cell = 1/cell;
  species a_4PPNCYS in cell = 1/cell;
  species TRNALEU in cell = 1/cell;
  species HYXN in cell = 1/cell;
  species TYR__0_712_VAL in cell = 1/cell;
  species CNS in cell = 1/cell;
  species GLYCOGEN in cell = 1/cell;
  species G3P in cell = 1/cell;
  species UMP in cell = 1/cell;
  species ARIB in cell = 1/cell;
  species ASELNT in cell = 1/cell;
  species APS in cell = 1/cell;
  species IGLY in cell = 1/cell;
  species LK2LIPIV in cell = 1/cell;
  species PROPIONYLP in cell = 1/cell;
  species TRYTRNATYR in cell = 1/cell;
  species a_2OP6M14BQ in cell = 1/cell;
  species IPYR in cell = 1/cell;
  species SME3P in cell = 1/cell;
  species AICAR in cell = 1/cell;
  species $SUCCxt in cell = 1/cell;
  species DTDPRMNS in cell = 1/cell;
  species CAP in cell = 1/cell;
  species a_3SFPYR in cell = 1/cell;
  species C170ACP in cell = 1/cell;
  species DTAGA in cell = 1/cell;
  species DOROA in cell = 1/cell;
  species CAV in cell = 1/cell;
  species THMNP in cell = 1/cell;
  species $NO2xt in cell = 1/cell;
  species TYR in cell = 1/cell;
  species CMPKDO in cell = 1/cell;
  species PHPYR in cell = 1/cell;
  species a_4HPP in cell = 1/cell;
  species HPYR in cell = 1/cell;
  species TRNAMET in cell = 1/cell;
  species G1P in cell = 1/cell;
  species MMALCOA in cell = 1/cell;
  species PGP in cell = 1/cell;
  species $SLFxt in cell = 1/cell;
  species CDP in cell = 1/cell;
  species PTRC in cell = 1/cell;
  species a_4HPA in cell = 1/cell;
  species a_3OPP in cell = 1/cell;
  species ASNTRNAASN in cell = 1/cell;
  species GABA in cell = 1/cell;
  species DEXTRIN in cell = 1/cell;
  species a_4HPACAL in cell = 1/cell;
  species TRM in cell = 1/cell;
  species a_3KL in cell = 1/cell;
  species IDP in cell = 1/cell;
  species PI in cell = 1/cell;
  species PL in cell = 1/cell;
  species SAICAR in cell = 1/cell;
  species a_3PSME in cell = 1/cell;
  species PC in cell = 1/cell;
  species C140OH in cell = 1/cell;
  species PA in cell = 1/cell;
  species PG in cell = 1/cell;
  species PE in cell = 1/cell;
  species PAA in cell = 1/cell;
  species PDLA5P in cell = 1/cell;
  species HIBUT in cell = 1/cell;
  species a_3PSER in cell = 1/cell;
  species PS in cell = 1/cell;
  species PQ in cell = 1/cell;
  species PAP in cell = 1/cell;
  species a_2PPG in cell = 1/cell;
  species GLUP in cell = 1/cell;
  species UPPMN_GN_LADGMDDADA in cell = 1/cell;
  species LIPIV in cell = 1/cell;
  species OBUT in cell = 1/cell;
  species DUMP in cell = 1/cell;
  species CBA in cell = 1/cell;
  species ICIT in cell = 1/cell;
  species a_4HPACOA in cell = 1/cell;
  species OGT in cell = 1/cell;
  species RH in cell = 1/cell;
  species PPYR in cell = 1/cell;
  species $DUxt in cell = 1/cell;
  species DGALAC in cell = 1/cell;
  species TRP in cell = 1/cell;
  species C161ACP in cell = 1/cell;
  species $XANxt in cell = 1/cell;
  species UDP in cell = 1/cell;
  species $BETAINExt in cell = 1/cell;
  species MSCYS in cell = 1/cell;
  species ISUCC in cell = 1/cell;
  species DHSK in cell = 1/cell;
  species $DGxt in cell = 1/cell;
  species A6P in cell = 1/cell;
  species ACCOA in cell = 1/cell;
  species $GL3Pxt in cell = 1/cell;
  species AACTN in cell = 1/cell;
  species DTTP in cell = 1/cell;
  species UPRG in cell = 1/cell;
  species $GLNxt in cell = 1/cell;
  species DHPA in cell = 1/cell;
  species HCO3 in cell = 1/cell;
  species bALA in cell = 1/cell;
  species TRE6P in cell = 1/cell;
  species DHPT in cell = 1/cell;
  species TRNAILE in cell = 1/cell;
  species $BZxt in cell = 1/cell;
  species $SUCxt in cell = 1/cell;
  species TM in cell = 1/cell;
  species FMN in cell = 1/cell;
  species AACP in cell = 1/cell;
  species CPAD5P in cell = 1/cell;
  species INDOLE in cell = 1/cell;
  species SDAPIM in cell = 1/cell;
  species FUCP in cell = 1/cell;
  species SHEME in cell = 1/cell;
  species GLUBCALA in cell = 1/cell;
  species a_5CM2HM in cell = 1/cell;
  species THZP in cell = 1/cell;
  species PEA in cell = 1/cell;
  species H2O2 in cell = 1/cell;
  species CMPAEP in cell = 1/cell;
  species TR in cell = 1/cell;
  species DATP in cell = 1/cell;
  species K2LIPA in cell = 1/cell;
  species $ARGxt in cell = 1/cell;
  species PEP in cell = 1/cell;
  species QA in cell = 1/cell;
  species $HSERxt in cell = 1/cell;
  species DDOH in cell = 1/cell;
  species HCNS in cell = 1/cell;
  species DNA in cell = 1/cell;
  species CBHCAP in cell = 1/cell;
  species a_5MTGLU in cell = 1/cell;
  species CATECHOL in cell = 1/cell;
  species T3 in cell = 1/cell;
  species ALAALA in cell = 1/cell;
  species MALCOA in cell = 1/cell;
  species OIVAL in cell = 1/cell;
  species NAGA in cell = 1/cell;
  species MMSA in cell = 1/cell;
  species CMPNANEU in cell = 1/cell;
  species C_I_DA in cell = 1/cell;
  species a_4TMABTO in cell = 1/cell;
  species AHMP in cell = 1/cell;
  species ASPTRNAASN in cell = 1/cell;
  species a_2AEP in cell = 1/cell;
  species bDGLC in cell = 1/cell;
  species DPM in cell = 1/cell;
  species DGLUCA in cell = 1/cell;
  species MLTTTR in cell = 1/cell;
  species Hxt in cell = 1/cell;
  species H2SO3 in cell = 1/cell;
  species FORMATE in cell = 1/cell;
  species ACTN in cell = 1/cell;
  species METTRNA in cell = 1/cell;
  species ASUC in cell = 1/cell;
  species $THRxt in cell = 1/cell;
  species UREA in cell = 1/cell;
  species A5P in cell = 1/cell;
  species HQ in cell = 1/cell;
  species $IMALxt in cell = 1/cell;
  species DMKH2 in cell = 1/cell;
  species PYR in cell = 1/cell;
  species $HISxt in cell = 1/cell;
  species SASHCYS in cell = 1/cell;
  species ILE in cell = 1/cell;
  species NAGLU in cell = 1/cell;
  species ARBZ in cell = 1/cell;
  species a_2HBA in cell = 1/cell;
  species a_34DHB in cell = 1/cell;
  species S7P in cell = 1/cell;
  species a_5AI in cell = 1/cell;
  species NADP in cell = 1/cell;
  species DQT in cell = 1/cell;
  species S2MBDHL in cell = 1/cell;
  species GDPMAN in cell = 1/cell;
  species DIMGP in cell = 1/cell;
  species EPM in cell = 1/cell;
  species UC in cell = 1/cell;
  species HTR in cell = 1/cell;
  species DHBPT in cell = 1/cell;
  species NADH in cell = 1/cell;
  species NADPH in cell = 1/cell;
  species KYN in cell = 1/cell;
  species PPP in cell = 1/cell;
  species S6P in cell = 1/cell;
  species $FRUxt in cell = 1/cell;
  species UQ in cell = 1/cell;
  species PRO in cell = 1/cell;
  species PPN in cell = 1/cell;
  species INS in cell = 1/cell;
  species a_3AP in cell = 1/cell;
  species pppGpp in cell = 1/cell;
  species LRIBULOSE5P in cell = 1/cell;
  species NACD in cell = 1/cell;
  species TRNAASN in cell = 1/cell;
  species a_23cCMP in cell = 1/cell;
  species ASPSA in cell = 1/cell;
  species DSER in cell = 1/cell;
  species NACN in cell = 1/cell;
  species SERTRNASER in cell = 1/cell;
  species C120ACP in cell = 1/cell;
  species DUDP in cell = 1/cell;
  species S_2MP_DHL in cell = 1/cell;
  species a_34DHPA in cell = 1/cell;
  species ORBRDX in cell = 1/cell;
  species EXOPOLYS in cell = 1/cell;
  species GLCA in cell = 1/cell;
  species TRNALYS in cell = 1/cell;
  species IMP in cell = 1/cell;
  species ETHAP in cell = 1/cell;
  species OA in cell = 1/cell;
  species LEUTRNA in cell = 1/cell;
  species DFRUC in cell = 1/cell;
  species VB12 in cell = 1/cell;
  species SMET in cell = 1/cell;
  species G6GG in cell = 1/cell;
  species bGLAC in cell = 1/cell;
  species TRNAVAL in cell = 1/cell;
  species S2MPDHL in cell = 1/cell;
  species OMP in cell = 1/cell;
  species GLUTRNAGLN in cell = 1/cell;
  species a_3MCCOA in cell = 1/cell;
  species ACHA in cell = 1/cell;
  species UDPG23A in cell = 1/cell;
  species TRNAGLY in cell = 1/cell;
  species NAAD in cell = 1/cell;
  species GLUTRNAGLU in cell = 1/cell;
  species ADPG in cell = 1/cell;
  species H_C_ in cell = 1/cell;
  species PPPI in cell = 1/cell;
  species N15PADRDMB in cell = 1/cell;
  species PPEPTIDO in cell = 1/cell;
  species TRNAGLU in cell = 1/cell;
  species GGPP in cell = 1/cell;
  species HO3S2 in cell = 1/cell;
  species TRNAGLN in cell = 1/cell;
  species $CYSxt in cell = 1/cell;
  species AEIOH in cell = 1/cell;
  species GLAC in cell = 1/cell;
  species TRNAARG in cell = 1/cell;
  species PPPP in cell = 1/cell;
  species H2CO3 in cell = 1/cell;
  species GLAL in cell = 1/cell;
  species HISOL in cell = 1/cell;
  species A_C_ in cell = 1/cell;
  species $DCxt in cell = 1/cell;
  species Na in cell = 1/cell;
  species ALATRNA in cell = 1/cell;
  species OHB in cell = 1/cell;
  species UPPMNGNLADGNMDG5DADA in cell = 1/cell;
  species DGLYCERATE in cell = 1/cell;
  species ASPTRNAASP in cell = 1/cell;
  species QNT in cell = 1/cell;
  species a_3H2MBCOA in cell = 1/cell;
  species $DTxt in cell = 1/cell;
  species CDPMDE in cell = 1/cell;
  species O2 in cell = 1/cell;
  species MDE4P in cell = 1/cell;
  species NMHIS in cell = 1/cell;
  species DGR in cell = 1/cell;
  species ACALA in cell = 1/cell;
  species PURI5P in cell = 1/cell;
  species $SPRMDxt in cell = 1/cell;
  species UDPNADMAU in cell = 1/cell;
  species UDPNAMAG in cell = 1/cell;
  species $FUMxt in cell = 1/cell;
  species AHSER in cell = 1/cell;
  species $TRPxt in cell = 1/cell;
  species DHP in cell = 1/cell;
  species $ICITxt in cell = 1/cell;
  species CT in cell = 1/cell;
  species NPCYS in cell = 1/cell;
  species HOPP in cell = 1/cell;
  species DASP in cell = 1/cell;
  species DHF in cell = 1/cell;
  species CL in cell = 1/cell;
  species $ACxt in cell = 1/cell;
  species SB1P in cell = 1/cell;
  species FAN in cell = 1/cell;
  species AHMPP in cell = 1/cell;
  species DHN in cell = 1/cell;
  species HKYN in cell = 1/cell;
  species TRNACYS in cell = 1/cell;
  species FAD in cell = 1/cell;
  species $PHExt in cell = 1/cell;
  species DHI in cell = 1/cell;
  species PPA in cell = 1/cell;
  species MLTPT in cell = 1/cell;
  species UDGLYCOLATE in cell = 1/cell;
  species OSBCOA in cell = 1/cell;
  species $a_2PGxt in cell = 1/cell;
  species PQQ in cell = 1/cell;
  species AppppA in cell = 1/cell;
  species $ETHAxt in cell = 1/cell;
  species SLLCT in cell = 1/cell;
  species NAMD in cell = 1/cell;
  species DIN in cell = 1/cell;
  species PYTHP in cell = 1/cell;
  species a_5C2O3E in cell = 1/cell;
  species H5P3O10 in cell = 1/cell;
  species CDPDG in cell = 1/cell;
  species a_3AMP in cell = 1/cell;
  species a_2MPPACOA in cell = 1/cell;
  species MM in cell = 1/cell;
  species PPIX in cell = 1/cell;
  species MK in cell = 1/cell;
  species MI in cell = 1/cell;
  species DGLUCL in cell = 1/cell;
  species UTP in cell = 1/cell;
  species BZ in cell = 1/cell;
  species UDPG in cell = 1/cell;
  species DALA in cell = 1/cell;
  species LACTOSE in cell = 1/cell;
  species BT in cell = 1/cell;
  species DTDP4ORMNS in cell = 1/cell;
  species a_4MOP in cell = 1/cell;
  species a_2HPP in cell = 1/cell;
  species UPPMNGNLADGNMDDADA in cell = 1/cell;
  species a_2A3PP in cell = 1/cell;
  species a_2H3OSUCC in cell = 1/cell;
  species KDG in cell = 1/cell;
  species a_2HPA in cell = 1/cell;
  species $URIxt in cell = 1/cell;
  species KDO in cell = 1/cell;
  species ETH in cell = 1/cell;
  species GL in cell = 1/cell;
  species PTT in cell = 1/cell;
  species GLCAMN in cell = 1/cell;
  species ATP in cell = 1/cell;
  species PTH in cell = 1/cell;
  species a_4HPAGLY in cell = 1/cell;
  species C110ACP in cell = 1/cell;
  species a_2HP3M5H6M14B in cell = 1/cell;
  species PROTRNAPRO in cell = 1/cell;
  species DT in cell = 1/cell;
  species CYSTEATE in cell = 1/cell;
  species $SLACxt in cell = 1/cell;
  species PROTEIN in cell = 1/cell;
  species ADCBAP in cell = 1/cell;
  species DHMP in cell = 1/cell;
  species DG in cell = 1/cell;
  species DC in cell = 1/cell;
  species $GLUCxt in cell = 1/cell;
  species DA in cell = 1/cell;
  species a_2OAD in cell = 1/cell;
  species $ORNxt in cell = 1/cell;
  species UPRGI in cell = 1/cell;
  species PPHG in cell = 1/cell;
  species GL3P in cell = 1/cell;
  species ACAL in cell = 1/cell;
  species $CITxt in cell = 1/cell;
  species AN in cell = 1/cell;
  species a_3HAN in cell = 1/cell;
  species a_34DHPEG in cell = 1/cell;
  species AC in cell = 1/cell;
  species DPCOA in cell = 1/cell;
  species AG in cell = 1/cell;
  species CHOLINEP in cell = 1/cell;
  species AD in cell = 1/cell;
  species a_3HPCOA in cell = 1/cell;
  species SPRMD in cell = 1/cell;
  species PEPTIDE in cell = 1/cell;
  species SCYS in cell = 1/cell;
  species PEPTIDO in cell = 1/cell;
  species C120OH in cell = 1/cell;
  species FL in cell = 1/cell;
  species UDPNADMA in cell = 1/cell;
  species TCYS in cell = 1/cell;
  species GPP in cell = 1/cell;
  species RRBRDX in cell = 1/cell;
  species PROPANOATE in cell = 1/cell;
  species FA in cell = 1/cell;
  species a_5GLUPEPT in cell = 1/cell;
  species CYSGLY in cell = 1/cell;
  species a_2PCDPMDE in cell = 1/cell;
  species a_1BOH in cell = 1/cell;
  species ASP__0_108_CYS in cell = 1/cell;
  species FMETTRNA in cell = 1/cell;
  species ACOA in cell = 1/cell;
  species PANT in cell = 1/cell;
  species MKH2 in cell = 1/cell;
  species ACACP in cell = 1/cell;
  species $NO3xt in cell = 1/cell;
  species C151ACP in cell = 1/cell;
  species a_2MP2ECOA in cell = 1/cell;
  species URT in cell = 1/cell;
  species a_3SPYR in cell = 1/cell;
  species DR5P in cell = 1/cell;
  species URI in cell = 1/cell;
  species GLUC in cell = 1/cell;
  species URA in cell = 1/cell;
  species ACDA in cell = 1/cell;
  species PHP in cell = 1/cell;
  species GAL1P in cell = 1/cell;
  species PHT in cell = 1/cell;
  species B5AMP in cell = 1/cell;
  species PYRDX in cell = 1/cell;
  species $SERxt in cell = 1/cell;
  species SCSN in cell = 1/cell;
  species DAC in cell = 1/cell;
  species ppGpp in cell = 1/cell;
  species UDPGAL in cell = 1/cell;
  species DB4P in cell = 1/cell;
  species DPCHR in cell = 1/cell;
  species CGS in cell = 1/cell;
  species $TRxt in cell = 1/cell;
  species BAL in cell = 1/cell;
  species HIEA in cell = 1/cell;
  species PRBATP in cell = 1/cell;
  species RCHO in cell = 1/cell;
  species S_3MB_DHL in cell = 1/cell;
  species GL3P__0_052_C120ACP in cell = 1/cell;
  species $BIOMASS in cell = 1/cell;
  species GLU in cell = 1/cell;
  species DADP in cell = 1/cell;
  species SHCHC in cell = 1/cell;
  species GALACTINOL in cell = 1/cell;
  species PPAC in cell = 1/cell;
  species MLTHPT in cell = 1/cell;
  species C122COA in cell = 1/cell;
  species a_3HIVCOA in cell = 1/cell;
  species PBG in cell = 1/cell;
  species MLTTR in cell = 1/cell;
  species CHOR in cell = 1/cell;
  species a_4FAAC in cell = 1/cell;
  species PABA in cell = 1/cell;
  species UDPNAGEP in cell = 1/cell;
  species AIBUT in cell = 1/cell;
  species a_4TMABT in cell = 1/cell;
  species DHPACAL in cell = 1/cell;
  species UDPG2AA in cell = 1/cell;
  species LPS in cell = 1/cell;
  species a_3PG in cell = 1/cell;
  species ABUT in cell = 1/cell;
  species L1P3H5C in cell = 1/cell;
  species HEMEO in cell = 1/cell;
  species SELNT in cell = 1/cell;
  species DAPIM in cell = 1/cell;
  species a_3A2OP in cell = 1/cell;
  species HEDC in cell = 1/cell;
  species NADMA6P in cell = 1/cell;
  species bDG6P in cell = 1/cell;
  species MDAPIM in cell = 1/cell;
  species DR1P in cell = 1/cell;
  species $CO2xt in cell = 1/cell;
  species a_4MAAC in cell = 1/cell;
  species a_3HBCOA in cell = 1/cell;
  species T16B in cell = 1/cell;
  species UDPGLUC in cell = 1/cell;
  species DANNA in cell = 1/cell;
  species T6P in cell = 1/cell;
  species NGNEU in cell = 1/cell;
  species AACCOA in cell = 1/cell;
  species a_3OP4HB in cell = 1/cell;
  species a_3HIBCOA in cell = 1/cell;
  species NANEU in cell = 1/cell;
  species a_23cAMP in cell = 1/cell;
  species N2SUCCARG in cell = 1/cell;
  species $MELIxt in cell = 1/cell;
  species IMAL in cell = 1/cell;
  species a_2A3OB in cell = 1/cell;
  species a_2MCIT in cell = 1/cell;
  species $ASPxt in cell = 1/cell;
  species PRFICA in cell = 1/cell;
  species DITP in cell = 1/cell;
  species DTDPGLU in cell = 1/cell;
  species HSER in cell = 1/cell;
  species ACLAC in cell = 1/cell;
  species UPPMN_GN_LADGNMD_G_5DADA in cell = 1/cell;
  species SMETTRNAMET in cell = 1/cell;
  species a_2AG3PE in cell = 1/cell;
  species SLF in cell = 1/cell;
  species ASN in cell = 1/cell;
  species a_3MBCOA in cell = 1/cell;
  species a_2AG3PC in cell = 1/cell;
  species TRNATHR in cell = 1/cell;
  species CAIR in cell = 1/cell;
  species GLUTCOA in cell = 1/cell;
  species MAN6P in cell = 1/cell;
  species DHMVA in cell = 1/cell;
  species PACAL in cell = 1/cell;
  species ASP in cell = 1/cell;
  species a_2AG3PS in cell = 1/cell;
  species SPRM in cell = 1/cell;
  species DPHE in cell = 1/cell;
  species ADCBA in cell = 1/cell;
  species D6PGC in cell = 1/cell;
  species GLUCOSE in cell = 1/cell;
  species C191ACP in cell = 1/cell;
  species N2SUCCGLU5SA in cell = 1/cell;
  species BETAINE in cell = 1/cell;
  species TRNATRP in cell = 1/cell;
  species N4AAB in cell = 1/cell;
  species FTHF in cell = 1/cell;
  species ICHOR in cell = 1/cell;
  species PRPP in cell = 1/cell;
  species PRBAMP in cell = 1/cell;
  species OTHIO in cell = 1/cell;
  species CTP in cell = 1/cell;
  species a_3MLAC in cell = 1/cell;
  species CCOA in cell = 1/cell;
  species HEPPP in cell = 1/cell;
  species DISAC1P in cell = 1/cell;
  species MAN1P in cell = 1/cell;
  species E4HGLU in cell = 1/cell;
  species XMP in cell = 1/cell;
  species $UREAxt in cell = 1/cell;
  species $TYRxt in cell = 1/cell;
  species ADCHOR in cell = 1/cell;
  species SME in cell = 1/cell;
  species APN in cell = 1/cell;
  species N1_5PADR_DMB in cell = 1/cell;
  species a_2AA in cell = 1/cell;
  species AGL3P in cell = 1/cell;
  species RMAL in cell = 1/cell;
  species HMB4PP in cell = 1/cell;
  species XTSINE in cell = 1/cell;
  species CALA in cell = 1/cell;
  species ARGSUCC in cell = 1/cell;
  species a_2AGL3P in cell = 1/cell;
  species DUTP in cell = 1/cell;
  species $GLxt in cell = 1/cell;
  species DHDP in cell = 1/cell;
  species DHLIPOYLPROTEIN in cell = 1/cell;
  species LIPOYLPROTEIN in cell = 1/cell;
  species a_2OP6HP in cell = 1/cell;
  species cGMP in cell = 1/cell;
  species MLTHX in cell = 1/cell;
  species GA6P in cell = 1/cell;
  species DGDMH17BP in cell = 1/cell;
  species $GLYCOLATExt in cell = 1/cell;
  species $ASNxt in cell = 1/cell;
  species NAS in cell = 1/cell;
  species TRNAASP in cell = 1/cell;
  species PHEN in cell = 1/cell;
  species DGDMH1P in cell = 1/cell;
  species a_2HETPP in cell = 1/cell;
  species AAA in cell = 1/cell;
  species NAD in cell = 1/cell;
  species DCMP in cell = 1/cell;
  species NAC in cell = 1/cell;
  species ARG in cell = 1/cell;
  species NAM in cell = 1/cell;
  species IMACP in cell = 1/cell;
  species DHAP in cell = 1/cell;
  species NHLYS in cell = 1/cell;
  species $LEUxt in cell = 1/cell;
  species $GLCxt in cell = 1/cell;
  species PNTO in cell = 1/cell;
  species TRNAHIS in cell = 1/cell;
  species ALLNT in cell = 1/cell;
  species LYS in cell = 1/cell;
  species a_4HB in cell = 1/cell;
  species C_II_A in cell = 1/cell;
  species C180 in cell = 1/cell;
  species C181 in cell = 1/cell;
  species $PIxt in cell = 1/cell;
  species C100ACP in cell = 1/cell;
  species a_4HGLUSA in cell = 1/cell;
  species SAOPIM in cell = 1/cell;
  species PRAM in cell = 1/cell;
  species C200ACP in cell = 1/cell;
  species A6RP in cell = 1/cell;
  species a_3KBDG in cell = 1/cell;
  species SAM in cell = 1/cell;
  species ILE__0_673_LEU in cell = 1/cell;
  species ADLIPO in cell = 1/cell;
  species $CYTDxt in cell = 1/cell;
  species $a_3PGxt in cell = 1/cell;
  species MELI in cell = 1/cell;
  species a_2OP6MP in cell = 1/cell;
  species TRE in cell = 1/cell;
  species GA1P in cell = 1/cell;
  species DTDPDGLUC in cell = 1/cell;
  species NO3 in cell = 1/cell;
  species NO2 in cell = 1/cell;
  species a_4HPRO in cell = 1/cell;
  species RTHIO in cell = 1/cell;
  species UDPAGLACA in cell = 1/cell;
  species CYST in cell = 1/cell;
  species SAMA in cell = 1/cell;
  species DX5P in cell = 1/cell;
  species a_3HPA in cell = 1/cell;
  species GTP in cell = 1/cell;
  species AKG in cell = 1/cell;
  species KDPG in cell = 1/cell;
  species MPET in cell = 1/cell;
  species MTG in cell = 1/cell;
  species XTP in cell = 1/cell;
  species CHCOA in cell = 1/cell;
  species BASP in cell = 1/cell;
  species $MNTxt in cell = 1/cell;
  species TRNAPHE in cell = 1/cell;
  species F6P in cell = 1/cell;
  species $MLTxt in cell = 1/cell;
  species LEU in cell = 1/cell;
  species TTA in cell = 1/cell;
  species $ETHxt in cell = 1/cell;
  species GTRNA in cell = 1/cell;
  species AONA in cell = 1/cell;
  species a_3HB123TC in cell = 1/cell;
  species D6PGL in cell = 1/cell;
  species $THIAMINxt in cell = 1/cell;
  species H5P in cell = 1/cell;
  species S_2MB_DHL in cell = 1/cell;
  species a_2D3DDX in cell = 1/cell;
  species GLUTR in cell = 1/cell;
  species CAASP in cell = 1/cell;
  species PPACOA in cell = 1/cell;
  species PAPS in cell = 1/cell;
  species a_13PDG in cell = 1/cell;
  species NH3 in cell = 1/cell;
  species $AKGxt in cell = 1/cell;
  species UQH2 in cell = 1/cell;
  species GLYTRNAGLY in cell = 1/cell;
  species $GLUxt in cell = 1/cell;
  species ILETRNAILE in cell = 1/cell;
  species C150ACP in cell = 1/cell;
  species CYSTRNACYS in cell = 1/cell;
  species ACMUR in cell = 1/cell;
  species AHM in cell = 1/cell;
  species SER in cell = 1/cell;
  species a_2OPP in cell = 1/cell;
  species $CTxt in cell = 1/cell;
  species $Naxt in cell = 1/cell;
  species TRNAPRO in cell = 1/cell;
  species $MALxt in cell = 1/cell;
  species DTMP in cell = 1/cell;
  species DGLUC in cell = 1/cell;
  species UPPMNLADGMDDADA in cell = 1/cell;
  species a_34DHMA in cell = 1/cell;
  species C160ACP in cell = 1/cell;
  species F1P in cell = 1/cell;
  species GSN in cell = 1/cell;
  species SHCYS in cell = 1/cell;
  species PRLP in cell = 1/cell;
  species ATHR in cell = 1/cell;
  species PACGLY in cell = 1/cell;
  species $ILExt in cell = 1/cell;
  species GSA in cell = 1/cell;
  species IGP in cell = 1/cell;
  species DMPP in cell = 1/cell;
  species CYTD in cell = 1/cell;
  species F2P in cell = 1/cell;
  species a_2P1A in cell = 1/cell;
  species MTTA in cell = 1/cell;
  species AIR in cell = 1/cell;
  species $PROxt in cell = 1/cell;
  species METTHF in cell = 1/cell;
  species LAC in cell = 1/cell;
  species $DSERxt in cell = 1/cell;
  species GLYCOLATE in cell = 1/cell;
  species DCDP in cell = 1/cell;
  species IASP in cell = 1/cell;
  species XAN in cell = 1/cell;
  species TRNATYR in cell = 1/cell;
  species a_23cGMP in cell = 1/cell;
  species DAMP in cell = 1/cell;
  species C100 in cell = 1/cell;
  species NAORN in cell = 1/cell;
  species a_3SLALA in cell = 1/cell;
  species a_4PPNTO in cell = 1/cell;
  species DIDP in cell = 1/cell;
  species S3MBDHL in cell = 1/cell;
  species DGDMH7P in cell = 1/cell;
  species LLCT in cell = 1/cell;
  species CITR in cell = 1/cell;
  species DCYS in cell = 1/cell;
  species ALA in cell = 1/cell;
  species C040COA in cell = 1/cell;
  species a_24DAB in cell = 1/cell;
  species SUC6P in cell = 1/cell;
  species PHOSPHOLIPID in cell = 1/cell;
  species PDLA in cell = 1/cell;
  species D6RP5P in cell = 1/cell;
  species C090ACP in cell = 1/cell;
  species GLY in cell = 1/cell;
  species GLX in cell = 1/cell;
  species ACP in cell = 1/cell;
  species ACT in cell = 1/cell;
  species GLC in cell = 1/cell;
  species LIPO in cell = 1/cell;
  species AGMATINE in cell = 1/cell;
  species NADMA in cell = 1/cell;
  species GLN in cell = 1/cell;
  species PHSER in cell = 1/cell;
  species DGTP in cell = 1/cell;
  species UDPG2A in cell = 1/cell;
  species $DAxt in cell = 1/cell;
  species UDPMNLADGMDDADA in cell = 1/cell;
  species BUTANAL in cell = 1/cell;
  species FGAR in cell = 1/cell;
  species CYS in cell = 1/cell;
  species R3HBCOA in cell = 1/cell;
  species OPHSER in cell = 1/cell;
  species $GSNxt in cell = 1/cell;
  species UDCPP in cell = 1/cell;
  species $NH3xt in cell = 1/cell;
  species RIBFLAV in cell = 1/cell;
  species FGAM in cell = 1/cell;
  species SDLIPO in cell = 1/cell;
  species I3AA in cell = 1/cell;
  species I3AC in cell = 1/cell;
  species CA in cell = 1/cell;
  species a_3CMP in cell = 1/cell;
  species LXYLULOSE5P in cell = 1/cell;
  species CB in cell = 1/cell;
  species C190ACP in cell = 1/cell;
  species C150 in cell = 1/cell;
  species AMP in cell = 1/cell;
  species MDECPP in cell = 1/cell;
  species a_3MGCOA in cell = 1/cell;
  species D1AP2OOP in cell = 1/cell;
  species NANEU9P in cell = 1/cell;
  species a_4PPNTE in cell = 1/cell;
  species $PTRCxt in cell = 1/cell;
  species FKYN in cell = 1/cell;
  species E4P in cell = 1/cell;
  species GMP in cell = 1/cell;
  species UDPNAMA in cell = 1/cell;
  species C140 in cell = 1/cell;
  species NAMN in cell = 1/cell;
  species RL5P in cell = 1/cell;
  species MTHMNP in cell = 1/cell;
  species CRTN in cell = 1/cell;
  species THFG in cell = 1/cell;
  species PPI in cell = 1/cell;
  species C130ACP in cell = 1/cell;
  species PPAACP in cell = 1/cell;
  species DPRO in cell = 1/cell;
  species PRFP in cell = 1/cell;
  species G6P in cell = 1/cell;
  species P5P in cell = 1/cell;
  species a_2HP3M6M14B in cell = 1/cell;
  species FDP in cell = 1/cell;
  species a_4AB in cell = 1/cell;
  species NAGLUS in cell = 1/cell;
  species P5C in cell = 1/cell;
  species ADPDGDMHEP in cell = 1/cell;
  species NAGLUP in cell = 1/cell;
  species L6P in cell = 1/cell;
  species C171 in cell = 1/cell;
  species C170 in cell = 1/cell;
  species R1P in cell = 1/cell;
  species AGL in cell = 1/cell;
  species a_3H3MGCOA in cell = 1/cell;
  species CHOLINE in cell = 1/cell;
  species a_23cUMP in cell = 1/cell;
  species DLIPO in cell = 1/cell;
  species DCTP in cell = 1/cell;
  species DRIB in cell = 1/cell;
  species LIPX in cell = 1/cell;
  species THMPP in cell = 1/cell;
  species MELT in cell = 1/cell;
  species C160 in cell = 1/cell;
  species a_2MBCOA in cell = 1/cell;
  species FEROC in cell = 1/cell;
  species I4AC in cell = 1/cell;
  species I4AA in cell = 1/cell;
  species a_5MDR in cell = 1/cell;
  species $FORMATExt in cell = 1/cell;
  species SUCCSA in cell = 1/cell;
  species HCYS in cell = 1/cell;
  species GN in cell = 1/cell;
  species a_3HBUT in cell = 1/cell;
  species NASAEP in cell = 1/cell;
  species UPPMN_GN_LADGNMDDADA in cell = 1/cell;
  species $VB12xt in cell = 1/cell;
  species PHETRNAPHE in cell = 1/cell;
  species NPRAN in cell = 1/cell;
  species CPP in cell = 1/cell;
  species DIMP in cell = 1/cell;
  species ALA__3OPP in cell = 1/cell;
  species FRU in cell = 1/cell;
  species DU in cell = 1/cell;
  species AAC in cell = 1/cell;
  species a_4GBTR in cell = 1/cell;
  species A6RP5P2 in cell = 1/cell;
  species AAD in cell = 1/cell;
  species A6RP5P in cell = 1/cell;
  species FERIC in cell = 1/cell;
  species IPP in cell = 1/cell;
  species DGMP in cell = 1/cell;
  species $O2xt in cell = 1/cell;
  species a_4GBTA in cell = 1/cell;
  species TGL in cell = 1/cell;
  species ADP in cell = 1/cell;
  species a_4HPACALO in cell = 1/cell;
  species ADN in cell = 1/cell;
  species DTDP in cell = 1/cell;
  species a_4I5P in cell = 1/cell;
  species a_3DG6P in cell = 1/cell;
  species HAC in cell = 1/cell;
  species DGLU in cell = 1/cell;
  species GDP in cell = 1/cell;
  species THF in cell = 1/cell;
  species a_3UMP in cell = 1/cell;
  species VAL in cell = 1/cell;
  species R5P in cell = 1/cell;
  species a_2MB2ECOA in cell = 1/cell;
  species FPP in cell = 1/cell;
  species THR in cell = 1/cell;
  species STA in cell = 1/cell;
  species DGLN in cell = 1/cell;
  species a_3MOP in cell = 1/cell;
  species THZ in cell = 1/cell;
  species a_5FTHF in cell = 1/cell;
  species OSLHSER in cell = 1/cell;
  species IPPMAL in cell = 1/cell;
  species SELD in cell = 1/cell;
  species $LYSxt in cell = 1/cell;
  species S in cell = 1/cell;
  species GGL in cell = 1/cell;
  species C120 in cell = 1/cell;
  species a_2_HE_TPP in cell = 1/cell;
  species N2SUCCGLU in cell = 1/cell;
  species SUCCOA in cell = 1/cell;
  species SELT in cell = 1/cell;
  species AHHMP in cell = 1/cell;
  species METHF in cell = 1/cell;
  species a_3BUT in cell = 1/cell;
  species DTDPGLAC in cell = 1/cell;
  species $URAxt in cell = 1/cell;
  species RIB in cell = 1/cell;
  species G3PE in cell = 1/cell;
  species AHHMD in cell = 1/cell;
  species G3PC in cell = 1/cell;
  species MCB in cell = 1/cell;
  species SHSER in cell = 1/cell;
  species ARGTRNAARG in cell = 1/cell;
  species SAMOB in cell = 1/cell;
  species DTDP4O6DG in cell = 1/cell;
  species PHE__0_392_PRO in cell = 1/cell;
  species HIPPRT in cell = 1/cell;
  species THRTRNATHR in cell = 1/cell;
  species DTB in cell = 1/cell;
  species HDN in cell = 1/cell;
  species a_2P14NQ in cell = 1/cell;
  species ITP in cell = 1/cell;
  species RNA in cell = 1/cell;
  species ALAV in cell = 1/cell;
  species PL5P in cell = 1/cell;
  species ACETYLP in cell = 1/cell;
  species FADH2 in cell = 1/cell;
  species a_3GMP in cell = 1/cell;
  species KDOLIPIV in cell = 1/cell;
  species a_13DAP in cell = 1/cell;
  species MET in cell = 1/cell;
  species SUC in cell = 1/cell;
  species a_23BOH in cell = 1/cell;
  species OROA in cell = 1/cell;
  species THBPT in cell = 1/cell;
  species a_2OP3M5H6M14BQ in cell = 1/cell;
  species I3AAM in cell = 1/cell;
  species $DGLUxt in cell = 1/cell;
  species C181ACP in cell = 1/cell;
  species GL3P__ACCOA in cell = 1/cell;
  species LACAL in cell = 1/cell;
  species C140ACP in cell = 1/cell;
  species K2LIPIV in cell = 1/cell;
  species SORN in cell = 1/cell;
  species DMAN in cell = 1/cell;
  species CDHDHI in cell = 1/cell;
  species a_1AP2O in cell = 1/cell;
  species TRPTRNATRP in cell = 1/cell;
  species DGLUCOSE in cell = 1/cell;
  species ACIIIA in cell = 1/cell;
  species $ALAxt in cell = 1/cell;
  species MALACP in cell = 1/cell;
  species THIAMIN in cell = 1/cell;
  species SRLH in cell = 1/cell;
  species CBCO in cell = 1/cell;
  species C161 in cell = 1/cell;
  species KDOP in cell = 1/cell;
  species PACOA in cell = 1/cell;
  species MVLN in cell = 1/cell;
  species MOT in cell = 1/cell;
  species N_P_CYS in cell = 1/cell;
  species a_3B1A in cell = 1/cell;
  species SeASMET in cell = 1/cell;
  species AHTD in cell = 1/cell;
  species CHD in cell = 1/cell;
  species a_4HLT in cell = 1/cell;
  species LIPID in cell = 1/cell;
  species a_4HMN in cell = 1/cell;
  species SAP in cell = 1/cell;
  species THMP in cell = 1/cell;
  species cAMP in cell = 1/cell;
  species SLAC in cell = 1/cell;
  species TGLU in cell = 1/cell;
  species GENAL in cell = 1/cell;
  species GAR in cell = 1/cell;
  species PPCOA in cell = 1/cell;
  species a_3DDAH7P in cell = 1/cell;
  species CIDA in cell = 1/cell;
  species HIS in cell = 1/cell;
  species CMPNGNEU in cell = 1/cell;
  species CVN in cell = 1/cell;
  species TDHDP in cell = 1/cell;
  species $GLYxt in cell = 1/cell;
  species NFGLU in cell = 1/cell;
  species HISTRNAHIS in cell = 1/cell;
  species RAF in cell = 1/cell;
  species a_4AABUT in cell = 1/cell;
  species OPP in cell = 1/cell;
  species OICAP in cell = 1/cell;
  species a_2PG in cell = 1/cell;
  species ADPHEP in cell = 1/cell;
  species $METxt in cell = 1/cell;
  species DGDP in cell = 1/cell;
  species MAN in cell = 1/cell;
  species LYSTRNA in cell = 1/cell;
  species MAL in cell = 1/cell;
  species OSB in cell = 1/cell;
  species PQQH2 in cell = 1/cell;
  species $CHOLINExt in cell = 1/cell;
  species SGDHL in cell = 1/cell;
  species CIT in cell = 1/cell;
  species a_2NPRPN in cell = 1/cell;
  species VALTRNAVAL in cell = 1/cell;
  species UDPNAG in cell = 1/cell;
  species UDPNAM in cell = 1/cell;
  species MLT in cell = 1/cell;
  species ER4P in cell = 1/cell;
  species UPPMNGNLADGMDDADA in cell = 1/cell;
  species SOT in cell = 1/cell;
  species UDPDGALAC in cell = 1/cell;
  species STACHYOSE in cell = 1/cell;
  species HYDROXYAKG in cell = 1/cell;
  species a_5A4ICA in cell = 1/cell;
  species OAHSER in cell = 1/cell;
  species H2O in cell = 1/cell;
  species CPPI in cell = 1/cell;
  species CHITB in cell = 1/cell;
  species H2S in cell = 1/cell;
  species HISOLP in cell = 1/cell;
  species bAPA in cell = 1/cell;
  species MNT1P in cell = 1/cell;
  species GGLUMSCYS in cell = 1/cell;
  species PHE in cell = 1/cell;
  species a_2OP3M6M14BQ in cell = 1/cell;
  species a_2MAACCOA in cell = 1/cell;
  species CH3OR in cell = 1/cell;
  species ASER in cell = 1/cell;
  species $ADNxt in cell = 1/cell;
  species UDCP in cell = 1/cell;
  species MNT in cell = 1/cell;
  species TRNAALA in cell = 1/cell;
  species U1C in cell = 1/cell;
  species MTHF in cell = 1/cell;
  species COA in cell = 1/cell;
  species AC_III_A in cell = 1/cell;
  species ETHA in cell = 1/cell;
  species UDPMNLADGMD in cell = 1/cell;
  species a_5HIAC in cell = 1/cell;
  species a_5HIAA in cell = 1/cell;
  species CO2 in cell = 1/cell;
  species SSLCYS in cell = 1/cell;
  species $NAGAxt in cell = 1/cell;
  species GAPN in cell = 1/cell;
  species $DALAxt in cell = 1/cell;
  species HMB in cell = 1/cell;

  // Reactions:
  R001: GLC -> bDGLC; v_1;
    v_1 = 1;
  R002: G6P -> bDG6P; v_2;
    v_2 = 1;
  R003: G6P -> F6P; v_3;
    v_3 = 1;
  R004: bDG6P -> F6P; v_4;
    v_4 = 1;
  R005: G6P -> G1P; v_5;
    v_5 = 1;
  R006: FDP => F6P + PI; v_6;
    v_6 = 1;
  R007: FDP -> G3P + DHAP; v_7;
    v_7 = 1;
  R008: DHAP -> G3P; v_8;
    v_8 = 1;
  R009: G3P + PI + NAD -> NADH + a_13PDG; v_9;
    v_9 = 1;
  R010: a_13PDG + ADP -> a_3PG + ATP; v_10;
    v_10 = 1;
  R011: a_3PG -> a_2PG; v_11;
    v_11 = 1;
  R012: a_2PG -> PEP; v_12;
    v_12 = 1;
  R013: COA + ADLIPO => DLIPO + ACCOA; v_13;
    v_13 = 1;
  R014: DLIPO + NAD => LIPO + NADH; v_14;
    v_14 = 1;
  R015: ATP + AC + COA -> AMP + PPI + ACCOA; v_15;
    v_15 = 1;
  R016: ACAL + NAD => NADH + AC; v_16;
    v_16 = 1;
  R017: ACAL + NADH -> ETH + NAD; v_17;
    v_17 = 1;
  R018: ACAL + THMPP -> a_2_HE_TPP; v_18;
    v_18 = 1;
  R019: ACCOA + OA => COA + CIT; v_19;
    v_19 = 1;
  R020: CIT -> ICIT; v_20;
    v_20 = 1;
  R021: ICIT + NADP => NADPH + AKG + CO2; v_21;
    v_21 = 1;
  R022: AKG + LIPO => SDLIPO + CO2; v_22;
    v_22 = 1;
  R023: SDLIPO + COA => DLIPO + SUCCOA; v_23;
    v_23 = 1;
  R024: ADP + PI + SUCCOA -> ATP + SUCC + COA; v_24;
    v_24 = 1;
  R025: SUCC + FAD => FUM + FADH2; v_25;
    v_25 = 1;
  R026: FUM + MKH2 => SUCC + MK; v_26;
    v_26 = 1;
  R027: FUM + DMKH2 => SUCC + DMK; v_27;
    v_27 = 1;
  R028: FUM -> MAL; v_28;
    v_28 = 1;
  R029: MAL + NAD -> NADH + OA; v_29;
    v_29 = 1;
  R030: RL5P -> X5P; v_30;
    v_30 = 1;
  R031: RL5P -> R5P; v_31;
    v_31 = 1;
  R032: R5P + X5P -> G3P + S7P; v_32;
    v_32 = 1;
  R033: X5P + E4P -> F6P + G3P; v_33;
    v_33 = 1;
  R034: G3P + S7P -> E4P + F6P; v_34;
    v_34 = 1;
  R035: DR5P => G3P + ACAL; v_35;
    v_35 = 1;
  R036: DR1P -> DR5P; v_36;
    v_36 = 1;
  R037: KDPG => PYR + G3P; v_37;
    v_37 = 1;
  R038: GLUC + ATP => D6PGC + ADP; v_38;
    v_38 = 1;
  R039: D6PGC => KDPG; v_39;
    v_39 = 1;
  R040: R1P -> R5P; v_40;
    v_40 = 1;
  R041: UDPG + 2 NAD -> UDPGLUC + 2 NADH; v_41;
    v_41 = 1;
  R042: F1P + ATP => FDP + ADP; v_42;
    v_42 = 1;
  R043: F1P => DHAP + T3; v_43;
    v_43 = 1;
  R044: MAN6P -> F6P; v_44;
    v_44 = 1;
  R045: MAN6P -> MAN1P; v_45;
    v_45 = 1;
  R046: GTP + MAN1P -> PPI + GDPMAN; v_46;
    v_46 = 1;
  R047: S6P + NADP -> SB1P + NADPH; v_47;
    v_47 = 1;
  R048: FUCP -> DHAP + LACAL; v_48;
    v_48 = 1;
  R049: UDPG -> UDPGAL; v_49;
    v_49 = 1;
  R050: G1P + UTP -> UDPG + PPI; v_50;
    v_50 = 1;
  R051: DGLUCL + NAD -> DGLUCA + NADH; v_51;
    v_51 = 1;
  R052: TRE6P => GLC + G6P; v_52;
    v_52 = 1;
  R053: UDPG + G6P -> UDP + TRE6P; v_53;
    v_53 = 1;
  R054: TRE6P => TRE + PI; v_54;
    v_54 = 1;
  R055: F6P + GLN => GLU + GA6P; v_55;
    v_55 = 1;
  R056: GA6P -> GA1P; v_56;
    v_56 = 1;
  R057: ACCOA + GA1P => NAGA1P + COA; v_57;
    v_57 = 1;
  R058: UTP + NAGA1P -> UDPNAG + PPI; v_58;
    v_58 = 1;
  R059: UDPNAG -> NADMA + UDP; v_59;
    v_59 = 1;
  R060: UDPNAG -> UDPNADMA; v_60;
    v_60 = 1;
  R061: UDPNADMA + 2 NAD => UDPNADMAU + 2 NADH; v_61;
    v_61 = 1;
  R062: UDPNAG + PEP => UDPNAGEP + PI; v_62;
    v_62 = 1;
  R063: UDPNAGEP + NADPH => UDPNAM + NADP; v_63;
    v_63 = 1;
  R064: GLCAMN -> GLCA + GLCAMN; v_64;
    v_64 = 1;
  R065: CHITB => 2 NAGA; v_65;
    v_65 = 1;
  R066: UDPNAG -> UDPAGLACA; v_66;
    v_66 = 1;
  R067: DTDPGLU -> DTDPGLAC; v_67;
    v_67 = 1;
  R068: G1P + DTTP => DTDPGLU + PPI; v_68;
    v_68 = 1;
  R069: DTDPGLU => DTDP4O6DG; v_69;
    v_69 = 1;
  R070: DTDP4O6DG => DTDP4ORMNS; v_70;
    v_70 = 1;
  R071: DTDP4ORMNS + NADPH => DTDPRMNS + NADP; v_71;
    v_71 = 1;
  R072: ATP + PYR => AMP + PEP + PI; v_72;
    v_72 = 1;
  R073: PYR + NADH -> LAC + NAD; v_73;
    v_73 = 1;
  R074: ACCOA + PI -> ACETYLP + COA; v_74;
    v_74 = 1;
  R075: AAD + COA -> AMP + ACCOA; v_75;
    v_75 = 1;
  R076: ATP + AC -> PPI + AAD; v_76;
    v_76 = 1;
  R077: ACETYLP + ADP -> AC + ATP; v_77;
    v_77 = 1;
  R078: PEP + CO2 => OA + PI; v_78;
    v_78 = 1;
  R079: MAL + NAD -> PYR + CO2 + NADH; v_79;
    v_79 = 1;
  R080: MAL + NADP -> PYR + CO2 + NADPH; v_80;
    v_80 = 1;
  R081: ACCOA + GLX => MAL + COA; v_81;
    v_81 = 1;
  R082: 2 ACCOA => COA + AACCOA; v_82;
    v_82 = 1;
  R083: RGT + MTG -> LTG; v_83;
    v_83 = 1;
  R084: LTG => RGT + LAC; v_84;
    v_84 = 1;
  R085: SLAC + 2 FERIC -> PYR + 2 FEROC; v_85;
    v_85 = 1;
  R086: MAL + FAD => FADH2 + OA; v_86;
    v_86 = 1;
  R087: ACAL + NADP -> AC + NADPH; v_87;
    v_87 = 1;
  R088: a_2_HE_TPP + LIPO -> ADLIPO + THMPP; v_88;
    v_88 = 1;
  R089: IPPMAL + COA -> ACCOA + OIVAL; v_89;
    v_89 = 1;
  R090: PYR + CO2 -> HEDC; v_90;
    v_90 = 1;
  R091: GTP + OA -> GDP + PEP + CO2; v_91;
    v_91 = 1;
  R092: ITP + OA -> IDP + PEP + CO2; v_92;
    v_92 = 1;
  R093: ICIT => SUCC + GLX; v_93;
    v_93 = 1;
  R094: FORMATE + NAD => CO2 + NADH; v_94;
    v_94 = 1;
  R095: GLAL + NAD => NADH + GLYCOLATE; v_95;
    v_95 = 1;
  R096: a_2PPG => GLYCOLATE + PI; v_96;
    v_96 = 1;
  R097: DGLYCERATE + NAD -> HOPP + NADH; v_97;
    v_97 = 1;
  R098: DGLYCERATE + NADP -> HOPP + NADPH; v_98;
    v_98 = 1;
  R099: MTTA + NAD -> a_2H3OSUCC + NADH; v_99;
    v_99 = 1;
  R100: TTA + NAD -> a_2H3OSUCC + NADH; v_100;
    v_100 = 1;
  R101: MAL + COA -> ACCOA + GLX; v_101;
    v_101 = 1;
  R102: HPYR -> HOPP; v_102;
    v_102 = 1;
  R103: a_3HPCOA -> PPCOA; v_103;
    v_103 = 1;
  R104: ATP + PROPANOATE -> PPI + PPA; v_104;
    v_104 = 1;
  R105: PPA + COA -> AMP + PPACOA; v_105;
    v_105 = 1;
  R106: PROPANOATE + ATP -> PROPIONYLP + ADP; v_106;
    v_106 = 1;
  R107: PPACOA + PI -> PROPIONYLP + COA; v_107;
    v_107 = 1;
  R108: OBUT + COA -> PPACOA + FORMATE; v_108;
    v_108 = 1;
  R109: a_2P1A + NAD => PPN + NADH; v_109;
    v_109 = 1;
  R110: a_2MCIT + COA -> PPACOA + OA; v_110;
    v_110 = 1;
  R111: a_3HB123TC -> PYR + SUCC; v_111;
    v_111 = 1;
  R112: MMSA + COA + NAD => PPACOA + CO2 + NADH; v_112;
    v_112 = 1;
  R113: PPACOA + FAD -> FADH2 + PPCOA; v_113;
    v_113 = 1;
  R114: AAC => ACTN + CO2; v_114;
    v_114 = 1;
  R115: ATP + PPACOA + HCO3 -> ADP + PI + MMALCOA; v_115;
    v_115 = 1;
  R116: THMPP + PYR => a_2_HE_TPP + CO2; v_116;
    v_116 = 1;
  R117: a_2_HE_TPP + PYR => ACLAC + THMPP; v_117;
    v_117 = 1;
  R118: a_3HBCOA + NAD -> AACCOA + NADH; v_118;
    v_118 = 1;
  R119: a_3HBCOA -> R3HBCOA; v_119;
    v_119 = 1;
  R120: a_3HBCOA -> CCOA; v_120;
    v_120 = 1;
  R121: a_1BOH + NAD -> BUTANAL + NADH; v_121;
    v_121 = 1;
  R122: SUCCSA + NAD => SUCC + NADH; v_122;
    v_122 = 1;
  R123: SUCCSA + NADP => SUCC + NADPH; v_123;
    v_123 = 1;
  R124: GABA + AKG -> SUCCSA + GLU; v_124;
    v_124 = 1;
  R125: a_3H3MGCOA => ACCOA + AAC; v_125;
    v_125 = 1;
  R126: a_3B1A + NAD => a_3BUT + NADH; v_126;
    v_126 = 1;
  R127: a_3HBCOA + NADP -> AACCOA + NADPH; v_127;
    v_127 = 1;
  R128: a_3HBUT + NAD -> AAC + NADH; v_128;
    v_128 = 1;
  R129: a_23BOH + NAD -> ACT + NADH; v_129;
    v_129 = 1;
  R130: DAC + NADH => ACT + NAD; v_130;
    v_130 = 1;
  R131: DAC + NADPH => ACT + NADP; v_131;
    v_131 = 1;
  R132: RMAL + NAD => PYR + CO2 + NADH; v_132;
    v_132 = 1;
  R133: SUCCOA + AAC -> SUCC + AACCOA; v_133;
    v_133 = 1;
  R134: a_3OPP + COA + NAD => ACCOA + CO2 + NADH; v_134;
    v_134 = 1;
  R135: NADH + UQ => NAD + UQH2; v_135;
    v_135 = 1;
  R136: NADH + MK => NAD + MKH2; v_136;
    v_136 = 1;
  R137: NADH + DMK => NAD + DMKH2; v_137;
    v_137 = 1;
  R138: FADH2 + UQ => FAD + UQH2; v_138;
    v_138 = 1;
  R139: UQH2 + 0.5 O2 => UQ + 2 Hxt; v_139;
    v_139 = 1;
  R140: PPI => 2 PI; v_140;
    v_140 = 1;
  R141: ADP + PI + 4 Hxt -> ATP; v_141;
    v_141 = 1;
  R142: ATP + PPI -> ADP + PPPI; v_142;
    v_142 = 1;
  R143: CO2 => HCO3; v_143;
    v_143 = 1;
  R144: NO3 + FEROC => FERIC + NO2; v_144;
    v_144 = 1;
  R145: NO2 + 3 NADH => 3 NAD + NH3; v_145;
    v_145 = 1;
  R146: NO2 + 3 NADPH => 3 NADP + NH3; v_146;
    v_146 = 1;
  R147: ASP -> FUM + NH3; v_147;
    v_147 = 1;
  R148: O2 + 2 a_2NPRPN -> 2 ACTN + 2 NO2; v_148;
    v_148 = 1;
  R149: AN + O2 + NADH -> CATECHOL + NH3 + CO2 + NAD; v_149;
    v_149 = 1;
  R150: AN + O2 + NADPH -> CATECHOL + NH3 + CO2 + NADP; v_150;
    v_150 = 1;
  R151: 2 GLU + NADP -> GLN + AKG + NADPH; v_151;
    v_151 = 1;
  R152: 2 GLU + NAD -> GLN + AKG + NADH; v_152;
    v_152 = 1;
  R153: GLU + NAD -> AKG + NH3 + NADH; v_153;
    v_153 = 1;
  R154: GLU + NADP -> AKG + NH3 + NADPH; v_154;
    v_154 = 1;
  R155: DALA + FAD -> PYR + NH3 + FADH2; v_155;
    v_155 = 1;
  R156: SLF + ATP => PPI + APS; v_156;
    v_156 = 1;
  R157: APS + ATP => ADP + PAPS; v_157;
    v_157 = 1;
  R158: PAPS + RTHIO => OTHIO + H2SO3 + PAP; v_158;
    v_158 = 1;
  R159: H2SO3 + 3 NADPH => H2S + 3 NADP; v_159;
    v_159 = 1;
  R160: PAP => PI + AMP; v_160;
    v_160 = 1;
  R161: SELT + 3 NADP => SELD + 3 NADPH; v_161;
    v_161 = 1;
  R162: ACCOA + ATP + HCO3 => MALCOA + ADP + PI; v_162;
    v_162 = 1;
  R163: MALCOA + ACP => MALACP + COA; v_163;
    v_163 = 1;
  R164: ACCOA + ACP => ACACP + COA; v_164;
    v_164 = 1;
  R165: PPACOA + ACP => PPAACP + COA; v_165;
    v_165 = 1;
  R166: PPAACP + 3 MALACP + 6 NADPH => 6 NADP + C090ACP + 3 CO2 + 3 ACP; v_166;
    v_166 = 1;
  R167: ACACP + 4 MALACP + 8 NADPH => 8 NADP + C100ACP + 4 CO2 + 4 ACP; v_167;
    v_167 = 1;
  R168: PPAACP + 4 MALACP + 8 NADPH => 8 NADP + C110ACP + 4 CO2 + 4 ACP; v_168;
    v_168 = 1;
  R169: ACACP + 5 MALACP + 10 NADPH => 10 NADP + C120ACP + 5 CO2 + 5 ACP; v_169;
    v_169 = 1;
  R170: PPAACP + 5 MALACP + 10 NADPH => 10 NADP + C130ACP + 5 CO2 + 5 ACP; v_170;
    v_170 = 1;
  R171: ACACP + 6 MALACP + 12 NADPH => 12 NADP + C140ACP + 6 CO2 + 6 ACP; v_171;
    v_171 = 1;
  R172: PPAACP + 6 MALACP + 12 NADPH => 12 NADP + C150ACP + 6 CO2 + 6 ACP; v_172;
    v_172 = 1;
  R173: PPAACP + 6 MALACP + 11 NADPH => 11 NADP + C151ACP + 6 CO2 + 6 ACP; v_173;
    v_173 = 1;
  R174: ACACP + 7 MALACP + 14 NADPH => 14 NADP + C160ACP + 7 CO2 + 7 ACP; v_174;
    v_174 = 1;
  R175: ACACP + 7 MALACP + 13 NADPH => 13 NADP + C161ACP + 7 CO2 + 7 ACP; v_175;
    v_175 = 1;
  R176: PPAACP + 7 MALACP + 14 NADPH => 14 NADP + C170ACP + 7 CO2 + 7 ACP; v_176;
    v_176 = 1;
  R177: PPAACP + 7 MALACP + 13 NADPH => 13 NADP + C171ACP + 7 CO2 + 7 ACP; v_177;
    v_177 = 1;
  R178: ACACP + 8 MALACP + 16 NADPH => 16 NADP + C180ACP + 8 CO2 + 8 ACP; v_178;
    v_178 = 1;
  R179: ACACP + 8 MALACP + 15 NADPH => 15 NADP + C181ACP + 8 CO2 + 8 ACP; v_179;
    v_179 = 1;
  R180: PPAACP + 8 MALACP + 16 NADPH => 16 NADP + C190ACP + 8 CO2 + 8 ACP; v_180;
    v_180 = 1;
  R181: PPAACP + 8 MALACP + 15 NADPH => 15 NADP + C191ACP + 8 CO2 + 8 ACP; v_181;
    v_181 = 1;
  R182: ACACP + 9 MALACP + 18 NADPH => 18 NADP + C200ACP + 9 CO2 + 9 ACP; v_182;
    v_182 = 1;
  R183: C100 + 5 COA + 4 FAD + 4 NAD + ATP => 5 ACCOA + 4 FADH2 + 4 NADH + AMP + PPI; v_183;
    v_183 = 1;
  R184: C120 + 6 COA + 5 FAD + 5 NAD + ATP => 6 ACCOA + 5 FADH2 + 5 NADH + AMP + PPI; v_184;
    v_184 = 1;
  R185: C140 + 7 COA + 6 FAD + 6 NAD + ATP => 7 ACCOA + 6 FADH2 + 6 NADH + AMP + PPI; v_185;
    v_185 = 1;
  R186: C150 + 7 COA + 6 FAD + 6 NAD + ATP => 6 ACCOA + PPACOA + 6 FADH2 + 6 NADH + AMP + PPI; v_186;
    v_186 = 1;
  R187: C160 + 8 COA + 7 FAD + 7 NAD + ATP => 8 ACCOA + 7 FADH2 + 7 NADH + AMP + PPI; v_187;
    v_187 = 1;
  R188: C161 + 8 COA + 7 FAD + 7 NAD + ATP => 8 ACCOA + 7 FADH2 + 7 NADH + AMP + PPI; v_188;
    v_188 = 1;
  R189: C170 + 8 COA + 7 FAD + 7 NAD + ATP => 7 ACCOA + PPACOA + 7 FADH2 + 7 NADH + AMP + PPI; v_189;
    v_189 = 1;
  R190: C171 + 8 COA + 7 FAD + 7 NAD + ATP => 7 ACCOA + PPACOA + 7 FADH2 + 7 NADH + AMP + PPI; v_190;
    v_190 = 1;
  R191: C180 + 9 COA + 8 FAD + 8 NAD + ATP => 9 ACCOA + 8 FADH2 + 8 NADH + AMP + PPI; v_191;
    v_191 = 1;
  R192: C181 + 9 COA + 8 FAD + 8 NAD + ATP => 9 ACCOA + 8 FADH2 + 8 NADH + AMP + PPI; v_192;
    v_192 = 1;
  R193: C120ACP + O2 + RRBRDX -> C120OH + ORBRDX + ACP; v_193;
    v_193 = 1;
  R194: C120ACP + O2 + FADH2 -> C120OH + FAD + ACP; v_194;
    v_194 = 1;
  R195: C140ACP + O2 + RRBRDX -> C140OH + ORBRDX + ACP; v_195;
    v_195 = 1;
  R196: C140ACP + O2 + FADH2 -> C140OH + FAD + ACP; v_196;
    v_196 = 1;
  R197: CH3OR + NAD -> RCHO + NADH; v_197;
    v_197 = 1;
  R198: RH + RRBRDX + O2 -> ORBRDX + CH3OR; v_198;
    v_198 = 1;
  R199: RRBRDX + NAD -> ORBRDX + NADH; v_199;
    v_199 = 1;
  R200: RRBRDX + NADP -> ORBRDX + NADPH; v_200;
    v_200 = 1;
  R201: RCHO + NAD -> 0.015 C100 + 0.048 C120 + 0.003 C140 + 0.003 C150 + 0.281 C160 + 0.192 C161 + 0.017 C170 + 0.016 C171 + 0.008 C180 + 0.375 C181 + 0.041 C120OH + NADH; v_201;
    v_201 = 1;
  R202: C121COA -> C122COA; v_202;
    v_202 = 1;
  R203: PYR + G3P => DX5P + CO2; v_203;
    v_203 = 1;
  R204: DX5P + NADPH => MDE4P + NADP; v_204;
    v_204 = 1;
  R205: MDE4P + CTP => CDPMDE + PPI; v_205;
    v_205 = 1;
  R206: a_2PCDPMDE => MDECPP + CMP; v_206;
    v_206 = 1;
  R207: MDECPP + NADH => NAD + HMB4PP; v_207;
    v_207 = 1;
  R208: HMB4PP + NADH => NAD + IPP; v_208;
    v_208 = 1;
  R209: DMPP + IPP => GPP + PPI; v_209;
    v_209 = 1;
  R210: GPP + IPP => FPP + PPI; v_210;
    v_210 = 1;
  R211: GGPP + IPP => PPPP + PPI; v_211;
    v_211 = 1;
  R212: HEPPP + IPP => OPP + PPI; v_212;
    v_212 = 1;
  R213: a_3PG + ADP -> DGLYCERATE + ATP; v_213;
    v_213 = 1;
  R214: NADH + DGLYCERATE -> T3 + NAD; v_214;
    v_214 = 1;
  R215: GL + ATP => GL3P + ADP; v_215;
    v_215 = 1;
  R216: DGR => AGL + 0.015 C100 + 0.048 C120 + 0.003 C140 + 0.003 C150 + 0.281 C160 + 0.192 C161 + 0.017 C170 + 0.016 C171 + 0.008 C180 + 0.375 C181 + 0.041 C120OH; v_216;
    v_216 = 1;
  R217: TGL => DGR + 0.015 C100 + 0.048 C120 + 0.003 C140 + 0.003 C150 + 0.281 C160 + 0.192 C161 + 0.017 C170 + 0.016 C171 + 0.008 C180 + 0.375 C181 + 0.041 C120OH; v_217;
    v_217 = 1;
  R218: GL3P + ACCOA => AGL3P + COA; v_218;
    v_218 = 1;
  R219: TGL + COA => DGR + 0.015 C100 + 0.048 C120 + 0.003 C140 + 0.003 C150 + 0.281 C160 + 0.192 C161 + 0.017 C170 + 0.016 C171 + 0.008 C180 + 0.375 C181 + 0.041 C120OH; v_219;
    v_219 = 1;
  R220: DHAP + NADH => GL3P + NAD; v_220;
    v_220 = 1;
  R221: DHAP + NADPH => GL3P + NADP; v_221;
    v_221 = 1;
  R222: DHAP + UQH2 -> GL3P + UQ; v_222;
    v_222 = 1;
  R223: DHAP + MKH2 -> GL3P + MK; v_223;
    v_223 = 1;
  R224: DHAP + DMKH2 -> GL3P + DMK; v_224;
    v_224 = 1;
  R225: GL3P + ACOA => a_2AGL3P + COA; v_225;
    v_225 = 1;
  R226: GL3P + 0.015 C100ACP + 0.048 C120ACP + 0.003 C140ACP + 0.003 C150ACP + 0.281 C160ACP + 0.192 C161ACP + 0.017 C170ACP + 0.016 C171ACP + 0.008 C180ACP + 0.375 C181ACP + 0.041 C120OH => AGL3P + 0.958 ACP; v_226;
    v_226 = 1;
  R227: AGL3P + 0.015 C100ACP + 0.048 C120ACP + 0.003 C140ACP + 0.003 C150ACP + 0.281 C160ACP + 0.192 C161ACP + 0.017 C170ACP + 0.016 C171ACP + 0.008 C180ACP + 0.375 C181ACP + 0.041 C120OH => PA + 0.958 ACP; v_227;
    v_227 = 1;
  R228: DGR + ATP => ADP + PA; v_228;
    v_228 = 1;
  R229: PC => a_2AG3PC + 0.015 C100 + 0.048 C120 + 0.003 C140 + 0.003 C150 + 0.281 C160 + 0.192 C161 + 0.017 C170 + 0.016 C171 + 0.008 C180 + 0.375 C181 + 0.041 C120OH; v_229;
    v_229 = 1;
  R230: G3PC => CHOLINE + GL3P; v_230;
    v_230 = 1;
  R231: PA + CTP -> CDPDG + PPI; v_231;
    v_231 = 1;
  R232: CDPDG + SER -> CMP + PS; v_232;
    v_232 = 1;
  R233: PS => a_2AG3PS + 0.015 C100 + 0.048 C120 + 0.003 C140 + 0.003 C150 + 0.281 C160 + 0.192 C161 + 0.017 C170 + 0.016 C171 + 0.008 C180 + 0.375 C181 + 0.041 C120OH; v_233;
    v_233 = 1;
  R234: PS => PE + CO2; v_234;
    v_234 = 1;
  R235: PE => a_2AG3PE + 0.015 C100 + 0.048 C120 + 0.003 C140 + 0.003 C150 + 0.281 C160 + 0.192 C161 + 0.017 C170 + 0.016 C171 + 0.008 C180 + 0.375 C181 + 0.041 C120OH; v_235;
    v_235 = 1;
  R236: G3PE => ETHA + GL3P; v_236;
    v_236 = 1;
  R237: CDPDG + GL3P -> CMP + PGP; v_237;
    v_237 = 1;
  R238: PGP => PI + PG; v_238;
    v_238 = 1;
  R239: CDPDG + PG => CMP + CL; v_239;
    v_239 = 1;
  R240: PC -> DGR + CHOLINEP; v_240;
    v_240 = 1;
  R241: PE -> DGR + ETHAP; v_241;
    v_241 = 1;
  R242: PG -> DGR + GL3P; v_242;
    v_242 = 1;
  R243: ETHA -> ACAL + NH3; v_243;
    v_243 = 1;
  R244: R5P + ATP -> PRPP + AMP; v_244;
    v_244 = 1;
  R245: PRPP + GLN => PRAM + PPI + GLU; v_245;
    v_245 = 1;
  R246: PRAM + ATP + GLY -> GAR + ADP + PI; v_246;
    v_246 = 1;
  R247: GAR + FTHF => FGAR + THF; v_247;
    v_247 = 1;
  R248: FGAR + ATP + GLN => FGAM + GLU + ADP + PI; v_248;
    v_248 = 1;
  R249: FGAM + ATP => AIR + ADP + PI; v_249;
    v_249 = 1;
  R250: AIR + CO2 + ATP => CAIR + ADP + PI; v_250;
    v_250 = 1;
  R251: CAIR + ATP + ASP -> SAICAR + ADP + PI; v_251;
    v_251 = 1;
  R252: SAICAR -> AICAR + FUM; v_252;
    v_252 = 1;
  R253: AICAR + FTHF -> PRFICA + THF; v_253;
    v_253 = 1;
  R254: PRFICA -> IMP; v_254;
    v_254 = 1;
  R255: IMP + GTP + ASP => ASUC + GDP + PI; v_255;
    v_255 = 1;
  R256: ASUC -> FUM + AMP; v_256;
    v_256 = 1;
  R257: IMP + NAD => XMP + NADH; v_257;
    v_257 = 1;
  R258: XMP + ATP + GLN => GMP + GLU + AMP + PPI; v_258;
    v_258 = 1;
  R259: ADN => INS + NH3; v_259;
    v_259 = 1;
  R260: DA -> DIN + NH3; v_260;
    v_260 = 1;
  R261: IMP => INS + PI; v_261;
    v_261 = 1;
  R262: AMP => ADN + PI; v_262;
    v_262 = 1;
  R263: XMP => XTSINE + PI; v_263;
    v_263 = 1;
  R264: GMP => GSN + PI; v_264;
    v_264 = 1;
  R265: DAMP -> DA + PI; v_265;
    v_265 = 1;
  R266: DGMP -> DG + PI; v_266;
    v_266 = 1;
  R267: DGMP + ATP -> DGDP + ADP; v_267;
    v_267 = 1;
  R268: IDP + ATP -> ITP + ADP; v_268;
    v_268 = 1;
  R269: ATP + DIDP -> ADP + DITP; v_269;
    v_269 = 1;
  R270: HYXN + PRPP => PPI + IMP; v_270;
    v_270 = 1;
  R271: XAN + PRPP => PPI + XMP; v_271;
    v_271 = 1;
  R272: AMP + PPI -> AD + PRPP; v_272;
    v_272 = 1;
  R273: DGTP => DG + PPPI; v_273;
    v_273 = 1;
  R274: ATP + GTP => pppGpp + AMP; v_274;
    v_274 = 1;
  R275: ppGpp -> GDP + PPI; v_275;
    v_275 = 1;
  R276: ATP + AMP -> 2 ADP; v_276;
    v_276 = 1;
  R277: ADP + RTHIO => DADP + OTHIO; v_277;
    v_277 = 1;
  R278: DADP + ATP -> DATP + ADP; v_278;
    v_278 = 1;
  R279: GMP + ATP -> GDP + ADP; v_279;
    v_279 = 1;
  R280: GDP + ATP -> GTP + ADP; v_280;
    v_280 = 1;
  R281: GDP + RTHIO => DGDP + OTHIO; v_281;
    v_281 = 1;
  R282: DGDP + ATP -> DGTP + ADP; v_282;
    v_282 = 1;
  R283: ARIB => AMP + R5P; v_283;
    v_283 = 1;
  R284: ATP + DAMP -> ADP + DADP; v_284;
    v_284 = 1;
  R285: AppppA => 2 ADP; v_285;
    v_285 = 1;
  R286: HYXN + NAD -> XAN + NADH; v_286;
    v_286 = 1;
  R287: XAN + NAD -> URT + NADH; v_287;
    v_287 = 1;
  R288: UDGLYCOLATE -> GLX + 2 NH3 + CO2; v_288;
    v_288 = 1;
  R289: ALLNT -> UDGLYCOLATE + UREA; v_289;
    v_289 = 1;
  R290: GN -> XAN + NH3; v_290;
    v_290 = 1;
  R291: pppGpp => ppGpp + PI; v_291;
    v_291 = 1;
  R292: ATP -> ADP + PI; v_292;
    v_292 = 1;
  R293: DITP => DIMP + PPI; v_293;
    v_293 = 1;
  R294: GTP => GMP + PPI; v_294;
    v_294 = 1;
  R295: ITP => IMP + PPI; v_295;
    v_295 = 1;
  R296: XTP => XMP + PPI; v_296;
    v_296 = 1;
  R297: DGTP => DGMP + PPI; v_297;
    v_297 = 1;
  R298: a_5AI + CO2 -> a_5A4ICA; v_298;
    v_298 = 1;
  R299: CAP + ASP => CAASP + PI; v_299;
    v_299 = 1;
  R300: CAASP -> DOROA; v_300;
    v_300 = 1;
  R301: DOROA + UQ -> UQH2 + OROA; v_301;
    v_301 = 1;
  R302: DOROA + MK -> MKH2 + OROA; v_302;
    v_302 = 1;
  R303: OROA + PRPP -> PPI + OMP; v_303;
    v_303 = 1;
  R304: OMP => CO2 + UMP; v_304;
    v_304 = 1;
  R305: UDP + ATP -> UTP + ADP; v_305;
    v_305 = 1;
  R306: UTP + GLN + ATP => GLU + CTP + ADP + PI; v_306;
    v_306 = 1;
  R307: ATP + UTP + NH3 => ADP + PI + CTP; v_307;
    v_307 = 1;
  R308: CDP + ATP -> CTP + ADP; v_308;
    v_308 = 1;
  R309: CDP + RTHIO => DCDP + OTHIO; v_309;
    v_309 = 1;
  R310: DCDP + ATP -> DCTP + ADP; v_310;
    v_310 = 1;
  R311: DTMP + ATP -> DTDP + ADP; v_311;
    v_311 = 1;
  R312: DTDP + ATP -> DTTP + ADP; v_312;
    v_312 = 1;
  R313: CMP + ATP -> ADP + CDP; v_313;
    v_313 = 1;
  R314: OTHIO + NADPH => RTHIO + NADP; v_314;
    v_314 = 1;
  R315: DCMP + ATP -> ADP + DCDP; v_315;
    v_315 = 1;
  R316: URA + PRPP -> UMP + PPI; v_316;
    v_316 = 1;
  R317: URA + R5P -> PURI5P; v_317;
    v_317 = 1;
  R318: DUMP + METTHF => DHF + DTMP; v_318;
    v_318 = 1;
  R319: DU + PI => URA + DR1P; v_319;
    v_319 = 1;
  R320: DT + PI => TM + DR1P; v_320;
    v_320 = 1;
  R321: DUDP + ATP -> DUTP + ADP; v_321;
    v_321 = 1;
  R322: UDP + RTHIO => OTHIO + DUDP; v_322;
    v_322 = 1;
  R323: ATP + DUMP -> ADP + DUDP; v_323;
    v_323 = 1;
  R324: UMP => URI + PI; v_324;
    v_324 = 1;
  R325: CMP => CYTD + PI; v_325;
    v_325 = 1;
  R326: DCMP => DC + PI; v_326;
    v_326 = 1;
  R327: DTMP => DT + PI; v_327;
    v_327 = 1;
  R328: a_5MC -> TM + NH3; v_328;
    v_328 = 1;
  R329: CT => URA + NH3; v_329;
    v_329 = 1;
  R330: DC => DU + NH3; v_330;
    v_330 = 1;
  R331: ATP + UMP -> ADP + UDP; v_331;
    v_331 = 1;
  R332: CTP => UTP + NH3; v_332;
    v_332 = 1;
  R333: DCTP => DUTP + NH3; v_333;
    v_333 = 1;
  R334: UTP => UMP + PPI; v_334;
    v_334 = 1;
  R335: DUTP => DUMP + PPI; v_335;
    v_335 = 1;
  R336: GLU + NH3 + ATP => GLN + ADP + PI; v_336;
    v_336 = 1;
  R337: GLN + AKG + NADPH => 2 GLU + NADP; v_337;
    v_337 = 1;
  R338: GLN + 2 ATP + HCO3 => GLU + CAP + 2 ADP + PI; v_338;
    v_338 = 1;
  R339: TRNAGLU + GLU + ATP => GLUTRNAGLU + PPI + AMP; v_339;
    v_339 = 1;
  R340: ATP + GLN + TRNAGLN => AMP + PPI + GTRNA; v_340;
    v_340 = 1;
  R341: GLN => GLU + NH3; v_341;
    v_341 = 1;
  R342: GTRNA + GLU + PI + ADP -> GLUTRNAGLN + GLN + ATP; v_342;
    v_342 = 1;
  R343: OA + GLU -> ASP + AKG; v_343;
    v_343 = 1;
  R344: ATP + ASP + TRNAASP => AMP + PPI + ASPTRNAASP; v_344;
    v_344 = 1;
  R345: ATP + ALA + TRNAALA -> AMP + PPI + ALATRNA; v_345;
    v_345 = 1;
  R346: ASP + ATP + GLN => GLU + ASN + AMP + PPI; v_346;
    v_346 = 1;
  R347: ASN => ASP + NH3; v_347;
    v_347 = 1;
  R348: CNS => bALA + HIS; v_348;
    v_348 = 1;
  R349: ASP + O2 => OA + NH3 + H2O2; v_349;
    v_349 = 1;
  R350: ASP -> DASP; v_350;
    v_350 = 1;
  R351: ASNTRNAASN + GLU + PI + ADP -> ASPTRNAASN + GLN + ATP; v_351;
    v_351 = 1;
  R352: ASP + ATP => ADP + BASP; v_352;
    v_352 = 1;
  R353: BASP + NADPH => NADP + PI + ASPSA; v_353;
    v_353 = 1;
  R354: ASPSA + NADH -> NAD + HSER; v_354;
    v_354 = 1;
  R355: ASPSA + NADPH -> NADP + HSER; v_355;
    v_355 = 1;
  R356: HSER + ATP => ADP + PHSER; v_356;
    v_356 = 1;
  R357: PHSER => THR + PI; v_357;
    v_357 = 1;
  R358: a_3PG + NAD => NADH + PHP; v_358;
    v_358 = 1;
  R359: PHP + GLU => AKG + a_3PSER; v_359;
    v_359 = 1;
  R360: a_3PSER => PI + SER; v_360;
    v_360 = 1;
  R361: THF + SER -> GLY + METTHF; v_361;
    v_361 = 1;
  R362: DHLIPOYLPROTEIN + NAD => NADH + LIPOYLPROTEIN; v_362;
    v_362 = 1;
  R363: SER -> PYR + NH3; v_363;
    v_363 = 1;
  R364: THR => OBUT + NH3; v_364;
    v_364 = 1;
  R365: ATP + THR + TRNATHR => AMP + PPI + THRTRNATHR; v_365;
    v_365 = 1;
  R366: ATP + SER + TRNASER => AMP + PPI + SERTRNASER; v_366;
    v_366 = 1;
  R367: ATP + GLY + TRNAGLY => AMP + PPI + GLYTRNAGLY; v_367;
    v_367 = 1;
  R368: GLU + ASPSA => AKG + a_24DAB; v_368;
    v_368 = 1;
  R369: BAL + FAD => FADH2 + BETAINE; v_369;
    v_369 = 1;
  R370: BAL + NAD => BETAINE + NADH; v_370;
    v_370 = 1;
  R371: MTG + NADPH => HAC + NADP; v_371;
    v_371 = 1;
  R372: AACTN + O2 -> MTG + NH3 + H2O2; v_372;
    v_372 = 1;
  R373: DSER -> PYR + NH3; v_373;
    v_373 = 1;
  R374: LLCT => HCYS + PYR + NH3; v_374;
    v_374 = 1;
  R375: HCYS + MTHF -> THF + MET; v_375;
    v_375 = 1;
  R376: a_5MTGLU + HCYS => TGLU + MET; v_376;
    v_376 = 1;
  R377: ATP + MET + TRNAMET => AMP + PPI + METTRNA; v_377;
    v_377 = 1;
  R378: METTRNA + FTHF => THF + FMETTRNA; v_378;
    v_378 = 1;
  R379: MET + ATP => PPI + PI + SAM; v_379;
    v_379 = 1;
  R380: SAH -> SRLH + AD; v_380;
    v_380 = 1;
  R381: SAM + CT -> SAH + a_5MC; v_381;
    v_381 = 1;
  R382: ACCOA + HSER -> COA + OAHSER; v_382;
    v_382 = 1;
  R383: OSLHSER + H2S -> HCYS + SUCC; v_383;
    v_383 = 1;
  R384: OAHSER + H2S -> HCYS + AC; v_384;
    v_384 = 1;
  R385: OAHSER + HO3S2 + RTHIO -> HCYS + H2SO3 + OTHIO + AC; v_385;
    v_385 = 1;
  R386: H2S + PYR + NH3 => CYS; v_386;
    v_386 = 1;
  R387: CYST => PYR + NH3 + TCYS; v_387;
    v_387 = 1;
  R388: SER + ACCOA -> COA + ASER; v_388;
    v_388 = 1;
  R389: ASER + H2S => CYS + AC; v_389;
    v_389 = 1;
  R390: ASER + HO3S2 + RTHIO => CYS + H2SO3 + OTHIO + AC; v_390;
    v_390 = 1;
  R391: ASER + HO3S2 => SSLCYS + AC; v_391;
    v_391 = 1;
  R392: CYSTEATE + AKG -> a_3SPYR + GLU; v_392;
    v_392 = 1;
  R393: a_3SLALA + AKG => a_3SFPYR + GLU; v_393;
    v_393 = 1;
  R394: MPYR + GLU => CYS + AKG; v_394;
    v_394 = 1;
  R395: SER => a_2AA; v_395;
    v_395 = 1;
  R396: ATP + CYS + TRNACYS => AMP + PPI + CYSTRNACYS; v_396;
    v_396 = 1;
  R397: DCYS -> H2S + NH3 + PYR; v_397;
    v_397 = 1;
  R398: HIBUT + NAD => a_3OPP + NADH; v_398;
    v_398 = 1;
  R399: a_3MBCOA + FAD -> a_3MCCOA + FADH2; v_399;
    v_399 = 1;
  R400: a_3HIVCOA -> a_3MCCOA; v_400;
    v_400 = 1;
  R401: a_2MP2ECOA => a_3HIBCOA; v_401;
    v_401 = 1;
  R402: a_3H2MBCOA => a_2MB2ECOA; v_402;
    v_402 = 1;
  R403: ATP + a_3MCCOA + HCO3 => ADP + PI + a_3MGCOA; v_403;
    v_403 = 1;
  R404: HIBUT + NAD -> MMSA + NADH; v_404;
    v_404 = 1;
  R405: a_3H2MBCOA + NAD -> a_2MAACCOA + NADH; v_405;
    v_405 = 1;
  R406: MMSA + NAD => MM + NADH; v_406;
    v_406 = 1;
  R407: COA + a_2MAACCOA => PPACOA + ACCOA; v_407;
    v_407 = 1;
  R408: a_2MPPACOA + FAD -> a_2MP2ECOA + FADH2; v_408;
    v_408 = 1;
  R409: a_2MBCOA + FAD -> a_2MB2ECOA + FADH2; v_409;
    v_409 = 1;
  R410: ALA + MMSA -> PYR + AIBUT; v_410;
    v_410 = 1;
  R411: ILE + AKG -> a_3MOP + GLU; v_411;
    v_411 = 1;
  R412: LEU + AKG -> a_4MOP + GLU; v_412;
    v_412 = 1;
  R413: ACLAC + NADPH => NADP + DHMVA; v_413;
    v_413 = 1;
  R414: DHMVA => OIVAL; v_414;
    v_414 = 1;
  R415: OIVAL + GLU -> AKG + VAL; v_415;
    v_415 = 1;
  R416: OBUT + a_2_HE_TPP => ABUT + THMPP; v_416;
    v_416 = 1;
  R417: ABUT + NADPH => NADP + DHMP; v_417;
    v_417 = 1;
  R418: DHMP => a_3MOP; v_418;
    v_418 = 1;
  R419: a_3MOP + GLU -> AKG + ILE; v_419;
    v_419 = 1;
  R420: ACCOA + OIVAL => COA + IPPMAL; v_420;
    v_420 = 1;
  R421: IPPMAL -> CBHCAP; v_421;
    v_421 = 1;
  R422: CBHCAP + NAD => NADH + OICAP; v_422;
    v_422 = 1;
  R423: OICAP => a_4MOP + CO2; v_423;
    v_423 = 1;
  R424: a_4MOP + GLU -> AKG + LEU; v_424;
    v_424 = 1;
  R425: ATP + LEU + TRNALEU => AMP + PPI + LEUTRNA; v_425;
    v_425 = 1;
  R426: ATP + VAL + TRNAVAL => AMP + PPI + VALTRNAVAL; v_426;
    v_426 = 1;
  R427: ATP + ILE + TRNAILE => AMP + PPI + ILETRNAILE; v_427;
    v_427 = 1;
  R428: ASPSA + PYR => DHDP; v_428;
    v_428 = 1;
  R429: DHDP + NADPH => NADP + TDHDP; v_429;
    v_429 = 1;
  R430: DHDP + NADH => NAD + TDHDP; v_430;
    v_430 = 1;
  R431: TDHDP + SUCCOA => SAOPIM + COA; v_431;
    v_431 = 1;
  R432: SAOPIM + GLU => SDAPIM + AKG; v_432;
    v_432 = 1;
  R433: SDAPIM => DAPIM + SUCC; v_433;
    v_433 = 1;
  R434: DAPIM -> MDAPIM; v_434;
    v_434 = 1;
  R435: MDAPIM => LYS + CO2; v_435;
    v_435 = 1;
  R436: ATP + LYS + TRNALYS => AMP + PPI + LYSTRNA; v_436;
    v_436 = 1;
  R437: HSER + NAD -> ASPSA + NADH; v_437;
    v_437 = 1;
  R438: HSER + NADP -> ASPSA + NADPH; v_438;
    v_438 = 1;
  R439: ASPSA + PI + NADP -> BASP + NADPH; v_439;
    v_439 = 1;
  R440: a_2OAD + LIPO => SGDHL + CO2; v_440;
    v_440 = 1;
  R441: GLUTCOA + DLIPO -> COA + SGDHL; v_441;
    v_441 = 1;
  R442: LYS + O2 + NADPH -> NHLYS + NADP; v_442;
    v_442 = 1;
  R443: a_4TMABT + NAD -> a_4TMABTO + NADH; v_443;
    v_443 = 1;
  R444: GLUTCOA -> CCOA + CO2; v_444;
    v_444 = 1;
  R445: SUCCOA + ARG => COA + N2SUCCARG; v_445;
    v_445 = 1;
  R446: ATP + ARG + TRNAARG -> AMP + PPI + ARGTRNAARG; v_446;
    v_446 = 1;
  R447: P5C + NAD => NADH + GLU; v_447;
    v_447 = 1;
  R448: P5C + NADP => NADPH + GLU; v_448;
    v_448 = 1;
  R449: GLUGSAL + NAD => NADH + GLU; v_449;
    v_449 = 1;
  R450: PRO + FAD => P5C + FADH2; v_450;
    v_450 = 1;
  R451: ATP + PRO + TRNAPRO => AMP + PPI + PROTRNAPRO; v_451;
    v_451 = 1;
  R452: L1P3H5C + NADH => a_4HPRO + NAD; v_452;
    v_452 = 1;
  R453: L1P3H5C + NADPH => a_4HPRO + NADP; v_453;
    v_453 = 1;
  R454: L1P3H5C + NAD => E4HGLU + NADH; v_454;
    v_454 = 1;
  R455: L1P3H5C + NADP => E4HGLU + NADPH; v_455;
    v_455 = 1;
  R456: E4HGLU + NAD -> a_4HGLUSA + NADH; v_456;
    v_456 = 1;
  R457: E4HGLU + AKG => HYDROXYAKG + GLU; v_457;
    v_457 = 1;
  R458: HYDROXYAKG -> PYR + GLX; v_458;
    v_458 = 1;
  R459: N2SUCCGLU5SA + NAD => N2SUCCGLU + NADH; v_459;
    v_459 = 1;
  R460: SORN + AKG => N2SUCCGLU5SA + GLU; v_460;
    v_460 = 1;
  R461: N2SUCCGLU => GLU + SUCC; v_461;
    v_461 = 1;
  R462: N2SUCCARG => SORN + CO2 + 2 NH3; v_462;
    v_462 = 1;
  R463: CRTN -> SCSN + UREA; v_463;
    v_463 = 1;
  R464: PRO -> DPRO; v_464;
    v_464 = 1;
  R465: PRPP + ATP => PPI + PRBATP; v_465;
    v_465 = 1;
  R466: PRBATP => PPI + PRBAMP; v_466;
    v_466 = 1;
  R467: PRBAMP => PRFP; v_467;
    v_467 = 1;
  R468: PRFP => PRLP; v_468;
    v_468 = 1;
  R469: PRLP + GLN => GLU + AICAR + DIMGP; v_469;
    v_469 = 1;
  R470: DIMGP => IMACP; v_470;
    v_470 = 1;
  R471: IMACP + GLU => AKG + HISOLP; v_471;
    v_471 = 1;
  R472: HISOLP => PI + HISOL; v_472;
    v_472 = 1;
  R473: HISOL + 2 NAD => HIS + 2 NADH; v_473;
    v_473 = 1;
  R474: HIS + SAM => NMHIS + SAH; v_474;
    v_474 = 1;
  R475: ATP + HIS + TRNAHIS => AMP + PPI + HISTRNAHIS; v_475;
    v_475 = 1;
  R476: HIS => UC + NH3; v_476;
    v_476 = 1;
  R477: UC => a_4I5P; v_477;
    v_477 = 1;
  R478: a_4I5P => NFGLU; v_478;
    v_478 = 1;
  R479: NFGLU => GLU + FA; v_479;
    v_479 = 1;
  R480: I4AA + NAD => I4AC + NADH; v_480;
    v_480 = 1;
  R481: 2 H5P -> O2 + 2 a_4I5P; v_481;
    v_481 = 1;
  R482: HIS -> HIEA + CO2; v_482;
    v_482 = 1;
  R483: a_5CM2HM => a_5C2O3E; v_483;
    v_483 = 1;
  R484: AKG + TYR -> a_4HPP + GLU; v_484;
    v_484 = 1;
  R485: a_4HPP + O2 => HOMOGEN + CO2; v_485;
    v_485 = 1;
  R486: a_4MAAC => a_4FAAC; v_486;
    v_486 = 1;
  R487: a_34DHPEG + NAD -> a_34DHMA + NADH; v_487;
    v_487 = 1;
  R488: TRM + O2 + NADH -> DPM + NAD; v_488;
    v_488 = 1;
  R489: a_4HPACALO + NADPH + O2 -> a_4HMN + NADP; v_489;
    v_489 = 1;
  R490: a_3HPA + O2 + NADH -> a_34DHPA + NAD; v_490;
    v_490 = 1;
  R491: a_4HPA + O2 + NADH -> a_34DHPA + NAD; v_491;
    v_491 = 1;
  R492: TRM + O2 -> a_4HPACAL + NH3 + H2O2; v_492;
    v_492 = 1;
  R493: DPM + O2 -> DHPACAL + NH3 + H2O2; v_493;
    v_493 = 1;
  R494: MTRM + SAM -> HDN + SAH; v_494;
    v_494 = 1;
  R495: a_4HPACOA + GLY -> a_4HPAGLY + COA; v_495;
    v_495 = 1;
  R496: TYR + AKG -> a_4HPP + GLU; v_496;
    v_496 = 1;
  R497: AAC + FUM -> a_4FAAC; v_497;
    v_497 = 1;
  R498: HOMOGEN + O2 + NADPH -> GENAL + CO2 + NADP; v_498;
    v_498 = 1;
  R499: DHI + CO2 -> CDHDHI; v_499;
    v_499 = 1;
  R500: DPCHR -> DHI + CO2; v_500;
    v_500 = 1;
  R501: PHE + AKG -> PHPYR + GLU; v_501;
    v_501 = 1;
  R502: PHPYR + O2 => a_2HPA + CO2; v_502;
    v_502 = 1;
  R503: DPHE + FAD => PHPYR + FADH2 + NH3; v_503;
    v_503 = 1;
  R504: PHE -> PAA; v_504;
    v_504 = 1;
  R505: a_2HPA -> DHPA; v_505;
    v_505 = 1;
  R506: PACAL + NAD -> PLA + NADH; v_506;
    v_506 = 1;
  R507: PEA + O2 -> PACAL + NH3 + H2O2; v_507;
    v_507 = 1;
  R508: PACOA + GLY -> PACGLY + COA; v_508;
    v_508 = 1;
  R509: HIPPRT -> BZ + GLY; v_509;
    v_509 = 1;
  R510: PAA -> PLA + NH3; v_510;
    v_510 = 1;
  R511: ATP + PLA + COA -> AMP + PPI + PACOA; v_511;
    v_511 = 1;
  R512: ATP + TRP + TRNATRP => AMP + PPI + TRPTRNATRP; v_512;
    v_512 = 1;
  R513: a_5HIAA + NAD => a_5HIAC + NADH; v_513;
    v_513 = 1;
  R514: I3AA + NAD => I3AC + NADH; v_514;
    v_514 = 1;
  R515: 2 a_3HAN + 2 O2 => CVN + 2 H2O2; v_515;
    v_515 = 1;
  R516: a_2OAD + COA + NAD => GLUTCOA + CO2 + NADH; v_516;
    v_516 = 1;
  R517: AEIOH + MTHF -> MOT + THF; v_517;
    v_517 = 1;
  R518: I3AAM -> I3AC + NH3; v_518;
    v_518 = 1;
  R519: FKYN -> FAN + ALA; v_519;
    v_519 = 1;
  R520: KYN -> AN + ALA; v_520;
    v_520 = 1;
  R521: HKYN -> a_3HAN + ALA; v_521;
    v_521 = 1;
  R522: IPYR -> I3AA + CO2; v_522;
    v_522 = 1;
  R523: E4P + PEP => PI + a_3DDAH7P; v_523;
    v_523 = 1;
  R524: a_3DDAH7P => DQT + PI; v_524;
    v_524 = 1;
  R525: DQT -> DHSK; v_525;
    v_525 = 1;
  R526: DHSK + NADPH => SME + NADP; v_526;
    v_526 = 1;
  R527: SME + ATP => ADP + SME3P; v_527;
    v_527 = 1;
  R528: SME3P + PEP => a_3PSME + PI; v_528;
    v_528 = 1;
  R529: a_3PSME => PI + CHOR; v_529;
    v_529 = 1;
  R530: CHOR + GLN => GLU + PYR + AN; v_530;
    v_530 = 1;
  R531: CHOR + NH3 => AN + PYR; v_531;
    v_531 = 1;
  R532: AN + PRPP => PPI + NPRAN; v_532;
    v_532 = 1;
  R533: NPRAN => CPAD5P; v_533;
    v_533 = 1;
  R534: CPAD5P => CO2 + IGP; v_534;
    v_534 = 1;
  R535: IGP + SER => G3P + TRP; v_535;
    v_535 = 1;
  R536: SER + INDOLE => TRP; v_536;
    v_536 = 1;
  R537: INDOLE + G3P -> IGP; v_537;
    v_537 = 1;
  R538: CHOR -> PHEN; v_538;
    v_538 = 1;
  R539: PHEN => CO2 + PHPYR; v_539;
    v_539 = 1;
  R540: ATP + PHE + TRNAPHE => AMP + PPI + PHETRNAPHE; v_540;
    v_540 = 1;
  R541: PHEN + NAD => a_4HPP + CO2 + NADH; v_541;
    v_541 = 1;
  R542: a_4HPP + GLU => AKG + TYR; v_542;
    v_542 = 1;
  R543: ATP + TYR + TRNATYR => AMP + PPI + TRYTRNATYR; v_543;
    v_543 = 1;
  R544: AG => PHE + CO2; v_544;
    v_544 = 1;
  R545: QNT + PQQ -> PQQH2 + DQT; v_545;
    v_545 = 1;
  R546: SME + PQQ -> DHSK + PQQH2; v_546;
    v_546 = 1;
  R547: DHSK -> a_34DHB; v_547;
    v_547 = 1;
  R548: GLU + ATP => ADP + GLUP; v_548;
    v_548 = 1;
  R549: GLUP + NADPH => NADP + PI + GLUGSAL; v_549;
    v_549 = 1;
  R550: GLUGSAL -> P5C; v_550;
    v_550 = 1;
  R551: P5C + NADPH -> PRO + NADP; v_551;
    v_551 = 1;
  R552: PRO + NAD -> P5C + NADH; v_552;
    v_552 = 1;
  R553: GLU + ACCOA => COA + NAGLU; v_553;
    v_553 = 1;
  R554: NAGLU + ATP => ADP + NAGLUP; v_554;
    v_554 = 1;
  R555: NAGLUP + NADPH => NADP + PI + NAGLUS; v_555;
    v_555 = 1;
  R556: NAGLUS + GLU => AKG + NAORN; v_556;
    v_556 = 1;
  R557: NAORN + GLU -> ORN + NAGLU; v_557;
    v_557 = 1;
  R558: ORN + CAP -> CITR + PI; v_558;
    v_558 = 1;
  R559: CITR + ASP + ATP -> AMP + PPI + ARGSUCC; v_559;
    v_559 = 1;
  R560: ARGSUCC -> FUM + ARG; v_560;
    v_560 = 1;
  R561: N4AAB + NAD -> a_4AABUT + NADH; v_561;
    v_561 = 1;
  R562: a_4AB + NADP -> GABA + NADPH; v_562;
    v_562 = 1;
  R563: a_5MTA -> AD + a_5MDR; v_563;
    v_563 = 1;
  R564: HCNS -> GABA + HIS; v_564;
    v_564 = 1;
  R565: a_4GBTA -> a_4GBTR + NH3; v_565;
    v_565 = 1;
  R566: UREA -> CO2 + 2 NH3; v_566;
    v_566 = 1;
  R567: U1C -> 2 CO2 + 2 NH3; v_567;
    v_567 = 1;
  R568: bAPA + NAD => bALA + NADH; v_568;
    v_568 = 1;
  R569: a_13DAP + O2 -> a_3AP + NH3 + H2O2; v_569;
    v_569 = 1;
  R570: ALA + a_3OPP -> PYR + bALA; v_570;
    v_570 = 1;
  R571: bALA + AKG -> OPP + GLU; v_571;
    v_571 = 1;
  R572: ASP => bALA + CO2; v_572;
    v_572 = 1;
  R573: TR + AKG + O2 => H2SO3 + AAA + SUCC + CO2; v_573;
    v_573 = 1;
  R574: a_5GLUPEPT + TR => PEPTIDE + GLUTR; v_574;
    v_574 = 1;
  R575: a_2AEP + PYR -> PPAC + ALA; v_575;
    v_575 = 1;
  R576: MCB + PPAC => a_2HPP + VB12; v_576;
    v_576 = 1;
  R577: CMPAEP + NAS -> NASAEP + CMP; v_577;
    v_577 = 1;
  R578: PPAC -> ACAL + PI; v_578;
    v_578 = 1;
  R579: SLLCT => SHCYS + NH3 + PYR; v_579;
    v_579 = 1;
  R580: SHCYS => SMET; v_580;
    v_580 = 1;
  R581: ATP + SMET + TRNAMET => AMP + PPI + SMETTRNAMET; v_581;
    v_581 = 1;
  R582: ATP + SMET => PI + PPI + SeASMET; v_582;
    v_582 = 1;
  R583: ASER + SELD => SCYS + AC; v_583;
    v_583 = 1;
  R584: ATP + SELNT -> PPI + ASELNT; v_584;
    v_584 = 1;
  R585: a_5GLUPEPT + MSCYS => PEPTIDE + GGLUMSCYS; v_585;
    v_585 = 1;
  R586: SASHCYS -> ADN + SHCYS; v_586;
    v_586 = 1;
  R587: SCYS + FADH2 -> SELD + ALA + FAD; v_587;
    v_587 = 1;
  R588: CALA + GLU => GLUBCALA; v_588;
    v_588 = 1;
  R589: APN + GLU => GAPN; v_589;
    v_589 = 1;
  R590: DGLN => DGLU + NH3; v_590;
    v_590 = 1;
  R591: DGLU -> GLU; v_591;
    v_591 = 1;
  R592: ALA -> DALA; v_592;
    v_592 = 1;
  R593: 2 DALA + ATP => ALAALA + ADP + PI; v_593;
    v_593 = 1;
  R594: CYSGLY => CYS + GLY; v_594;
    v_594 = 1;
  R595: H2O2 + 2 RGT -> OGT; v_595;
    v_595 = 1;
  R596: RGT => CYSGLY + GLU; v_596;
    v_596 = 1;
  R597: ATP + GLU + CYS -> ADP + PI + GCYS; v_597;
    v_597 = 1;
  R598: ATP + GCYS + GLY -> ADP + PI + RGT; v_598;
    v_598 = 1;
  R599: C140ACP + UDPNAG => ACP + UDPG2AA; v_599;
    v_599 = 1;
  R600: UDPG2AA => UDPG2A + AC; v_600;
    v_600 = 1;
  R601: UDPG2A + C140ACP => ACP + UDPG23A; v_601;
    v_601 = 1;
  R602: UDPG23A => UMP + LIPX; v_602;
    v_602 = 1;
  R603: LIPX + UDPG23A => UDP + DISAC1P; v_603;
    v_603 = 1;
  R604: DISAC1P + ATP => ADP + LIPIV; v_604;
    v_604 = 1;
  R605: LIPIV + CMPKDO => KDOLIPIV + CMP; v_605;
    v_605 = 1;
  R606: KDOLIPIV + CMPKDO => K2LIPIV + CMP; v_606;
    v_606 = 1;
  R607: C140ACP + LK2LIPIV => K2LIPA + ACP; v_607;
    v_607 = 1;
  R608: RL5P -> A5P; v_608;
    v_608 = 1;
  R609: PEP + A5P => KDOP + PI; v_609;
    v_609 = 1;
  R610: KDOP => KDO + PI; v_610;
    v_610 = 1;
  R611: KDO + CTP => PPI + CMPKDO; v_611;
    v_611 = 1;
  R612: UDPNAM + ALA + ATP => ADP + PI + UDPNAMA; v_612;
    v_612 = 1;
  R613: UDPNAMA + DGLU + ATP => UDPNAMAG + ADP + PI; v_613;
    v_613 = 1;
  R614: UDPNAMAG + MDAPIM + ATP => UDPMNLADGMD + ADP + PI; v_614;
    v_614 = 1;
  R615: UDPMNLADGMD + ALAALA + ATP => UDPMNLADGMDDADA + ADP + PI; v_615;
    v_615 = 1;
  R616: UDPMNLADGMDDADA + UDCP => UPPMNLADGMDDADA + UMP; v_616;
    v_616 = 1;
  R617: UPPMNLADGMDDADA + UDPNAG => UPPMN_GN_LADGMDDADA + UDP; v_617;
    v_617 = 1;
  R618: UPPMN_GN_LADGMDDADA + ATP + NH3 => UPPMN_GN_LADGNMDDADA + ADP + PI; v_618;
    v_618 = 1;
  R619: 5 GLY + UPPMN_GN_LADGNMDDADA => UPPMN_GN_LADGNMD_G_5DADA; v_619;
    v_619 = 1;
  R620: UPPMN_GN_LADGNMD_G_5DADA => UDCPP + PPEPTIDO; v_620;
    v_620 = 1;
  R621: PPEPTIDO + DALA => 0.9208 PEPTIDO + 0.8 $DALAxt; v_621;
    v_621 = 1;
  R622: UDCPP => UDCP + PI; v_622;
    v_622 = 1;
  R623: AIR => AHM; v_623;
    v_623 = 1;
  R624: AHM + ATP => AHMP + ADP; v_624;
    v_624 = 1;
  R625: AHMP + ATP => AHMPP + ADP; v_625;
    v_625 = 1;
  R626: THZP + AHMPP => THMP + PPI; v_626;
    v_626 = 1;
  R627: THMP + ATP -> THMPP + ADP; v_627;
    v_627 = 1;
  R628: GLY -> IGLY; v_628;
    v_628 = 1;
  R629: ATP + THZ -> ADP + MPET; v_629;
    v_629 = 1;
  R630: THIAMIN -> AHM + THZ; v_630;
    v_630 = 1;
  R631: THMPP -> THMP + PI; v_631;
    v_631 = 1;
  R632: GTP => D6RP5P + FORMATE + PPI; v_632;
    v_632 = 1;
  R633: D6RP5P => A6RP5P + NH3; v_633;
    v_633 = 1;
  R634: A6RP5P + NADPH => A6RP5P2 + NADP; v_634;
    v_634 = 1;
  R635: A6RP5P2 => A6RP + PI; v_635;
    v_635 = 1;
  R636: RL5P => DB4P + FORMATE; v_636;
    v_636 = 1;
  R637: DB4P + A6RP => D8RL + PI; v_637;
    v_637 = 1;
  R638: 2 D8RL => RIBFLAV + A6RP; v_638;
    v_638 = 1;
  R639: RIBFLAV + ATP => FMN + ADP; v_639;
    v_639 = 1;
  R640: FMN + ATP => FAD + PPI; v_640;
    v_640 = 1;
  R641: NACN + DMB => NAC + N1_5PADR_DMB; v_641;
    v_641 = 1;
  R642: E4P + NAD -> ER4P + NADH; v_642;
    v_642 = 1;
  R643: ER4P + NAD -> OHB + NADH; v_643;
    v_643 = 1;
  R644: OHB + GLU -> PHT + AKG; v_644;
    v_644 = 1;
  R645: PHT => a_4HLT + PI; v_645;
    v_645 = 1;
  R646: PHT + NAD => a_3A2OP + NADH + CO2; v_646;
    v_646 = 1;
  R647: a_3A2OP + DX5P => P5P + PI; v_647;
    v_647 = 1;
  R648: P5P + O2 => PL5P + H2O2; v_648;
    v_648 = 1;
  R649: PL5P => PL + PI; v_649;
    v_649 = 1;
  R650: PDLA5P + O2 => PL5P + NH3 + H2O2; v_650;
    v_650 = 1;
  R651: PYRDX + O2 -> PL + H2O2; v_651;
    v_651 = 1;
  R652: PL + O2 + NH3 -> PDLA + H2O2; v_652;
    v_652 = 1;
  R653: ASP + FUM => IASP + SUCC; v_653;
    v_653 = 1;
  R654: ASP + O2 => IASP + H2O2; v_654;
    v_654 = 1;
  R655: IASP + DHAP => QA + PI; v_655;
    v_655 = 1;
  R656: QA + PRPP => NACN + CO2 + PPI; v_656;
    v_656 = 1;
  R657: NACN => NACD + PI; v_657;
    v_657 = 1;
  R658: NAMN => NAMD + PI; v_658;
    v_658 = 1;
  R659: NAC + PRPP => NACN + PPI; v_659;
    v_659 = 1;
  R660: ATP + NAMN -> PPI + NAD; v_660;
    v_660 = 1;
  R661: NACN + ATP => PPI + NAAD; v_661;
    v_661 = 1;
  R662: NAAD + ATP + GLN => NAD + AMP + PPI + GLU; v_662;
    v_662 = 1;
  R663: NAM => NAC + NH3; v_663;
    v_663 = 1;
  R664: NADP + NADH => NADPH + NAD; v_664;
    v_664 = 1;
  R665: NAD + ATP => NADP + ADP; v_665;
    v_665 = 1;
  R666: NADPH + NAD -> NADP + NADH; v_666;
    v_666 = 1;
  R667: ASP + NAD -> IASP + NADH; v_667;
    v_667 = 1;
  R668: ASP + NADP -> IASP + NADPH; v_668;
    v_668 = 1;
  R669: NAD -> AMP + NAMN; v_669;
    v_669 = 1;
  R670: NAAD -> AMP + NACN; v_670;
    v_670 = 1;
  R671: 2 PYR => ACLAC + CO2; v_671;
    v_671 = 1;
  R672: OIVAL + METTHF => DHPANT + THF; v_672;
    v_672 = 1;
  R673: DHPANT + NADPH => NADP + PANT; v_673;
    v_673 = 1;
  R674: PANT + bALA + ATP => AMP + PPI + PNTO; v_674;
    v_674 = 1;
  R675: PNTO + ATP => ADP + a_4PPNTO; v_675;
    v_675 = 1;
  R676: ATP + N_P_CYS => ADP + a_4PPNCYS; v_676;
    v_676 = 1;
  R677: ATP + PTT => ADP + a_4PPNTE; v_677;
    v_677 = 1;
  R678: a_4PPNTO + CTP + CYS => CMP + PPI + a_4PPNCYS; v_678;
    v_678 = 1;
  R679: a_4PPNCYS => CO2 + a_4PPNTE; v_679;
    v_679 = 1;
  R680: a_4PPNTE + ATP => PPI + DPCOA; v_680;
    v_680 = 1;
  R681: DPCOA + ATP => ADP + COA; v_681;
    v_681 = 1;
  R682: ALA + CHCOA -> CO2 + COA + AONA; v_682;
    v_682 = 1;
  R683: SAM + AONA -> SAMOB + DANNA; v_683;
    v_683 = 1;
  R684: CO2 + DANNA + ATP -> DTB + PI + ADP; v_684;
    v_684 = 1;
  R685: DTB + S => BT; v_685;
    v_685 = 1;
  R686: ATP + BT => PPI + B5AMP; v_686;
    v_686 = 1;
  R687: B5AMP + A_C_ => AMP + H_C_; v_687;
    v_687 = 1;
  R688: GTP => FORMATE + AHTD; v_688;
    v_688 = 1;
  R689: AHTD => DHP + PPI + PI; v_689;
    v_689 = 1;
  R690: DHP => AHHMP + GLAL; v_690;
    v_690 = 1;
  R691: AHHMP + ATP => AMP + AHHMD; v_691;
    v_691 = 1;
  R692: CHOR + GLN => ADCHOR + GLU; v_692;
    v_692 = 1;
  R693: ADCHOR => PYR + PABA; v_693;
    v_693 = 1;
  R694: PABA + AHHMD => PPI + DHPT; v_694;
    v_694 = 1;
  R695: PABA + AHHMP => DHPT; v_695;
    v_695 = 1;
  R696: DHPT + ATP + GLU => ADP + PI + DHF; v_696;
    v_696 = 1;
  R697: DHF + NADPH => NADP + THF; v_697;
    v_697 = 1;
  R698: DHF + NADH => NAD + THF; v_698;
    v_698 = 1;
  R699: DHF + NAD -> FL + NADH; v_699;
    v_699 = 1;
  R700: DHF + NADP -> FL + NADPH; v_700;
    v_700 = 1;
  R701: FL + NADH => THF + NAD; v_701;
    v_701 = 1;
  R702: FL + NADPH => THF + NADP; v_702;
    v_702 = 1;
  R703: THF + ATP + GLU -> ADP + PI + THFG; v_703;
    v_703 = 1;
  R704: AHTD => PYTHP + PPPI; v_704;
    v_704 = 1;
  R705: AHTD -> DHP + 3 PI; v_705;
    v_705 = 1;
  R706: GAR + METHF => FGAR + THF; v_706;
    v_706 = 1;
  R707: METHF => FTHF; v_707;
    v_707 = 1;
  R708: METTHF + NADP -> METHF + NADPH; v_708;
    v_708 = 1;
  R709: METHF -> FTHF; v_709;
    v_709 = 1;
  R710: METTHF + NADPH => MTHF + NADP; v_710;
    v_710 = 1;
  R711: METTHF + FADH2 -> MTHF + FAD; v_711;
    v_711 = 1;
  R712: DUMP + METTHF -> DHF + DTMP; v_712;
    v_712 = 1;
  R713: FTHF -> FORMATE + THF; v_713;
    v_713 = 1;
  R714: THF + NAD -> DHF + NADH; v_714;
    v_714 = 1;
  R715: THF + NADP -> DHF + NADPH; v_715;
    v_715 = 1;
  R716: GTRNA + NADPH => GSA + NADP; v_716;
    v_716 = 1;
  R717: GSA => ALAV; v_717;
    v_717 = 1;
  R718: 2 ALAV => PBG; v_718;
    v_718 = 1;
  R719: 4 PBG => HMB + 4 NH3; v_719;
    v_719 = 1;
  R720: HMB => UPRG; v_720;
    v_720 = 1;
  R721: 2 SAM + UPRG => 2 SAH + PC2; v_721;
    v_721 = 1;
  R722: PC2 + NAD => NADH + SHCL; v_722;
    v_722 = 1;
  R723: SHCL => SHEME; v_723;
    v_723 = 1;
  R724: UPRG => 4 CO2 + CPP; v_724;
    v_724 = 1;
  R725: CPP + 2 SAM => PPHG + 2 CO2 + 2 MET + 2 DA; v_725;
    v_725 = 1;
  R726: CPP + O2 => PPHG + 2 CO2; v_726;
    v_726 = 1;
  R727: PPIX => PTH; v_727;
    v_727 = 1;
  R728: C_I_DA + ATP => ACDA + PPI + PI; v_728;
    v_728 = 1;
  R729: ADCBA + ATP => ADCBAP + ADP; v_729;
    v_729 = 1;
  R730: ADCBA + GTP => ADCBAP + GDP; v_730;
    v_730 = 1;
  R731: ADCBAP + GTP => AGDPCBA + PPI; v_731;
    v_731 = 1;
  R732: AGDPCBA + ARBZ => CBCO + GMP; v_732;
    v_732 = 1;
  R733: ATP + CBA -> PPPI + ADCBA; v_733;
    v_733 = 1;
  R734: ATP + C_I_A -> PPPI + CBCO; v_734;
    v_734 = 1;
  R735: UPRGI -> CPPI + 4 CO2; v_735;
    v_735 = 1;
  R736: PTH -> HEMEO; v_736;
    v_736 = 1;
  R737: CHOR -> ICHOR; v_737;
    v_737 = 1;
  R738: CHOR -> a_4HB + PYR; v_738;
    v_738 = 1;
  R739: OPP + a_4HB => a_3OP4HB + PPI; v_739;
    v_739 = 1;
  R740: a_2OPP + O2 + NADPH => a_2OP6HP + NADP; v_740;
    v_740 = 1;
  R741: a_2OP6HP + SAM => a_2OP6MP + SAH; v_741;
    v_741 = 1;
  R742: a_2OP6MP + O2 + NADPH => a_2OP6M14BQ + NADP; v_742;
    v_742 = 1;
  R743: a_2OP6M14BQ + SAM => a_2OP3M6M14BQ + SAH; v_743;
    v_743 = 1;
  R744: a_2OP3M5H6M14BQ + SAM => UQ + SAH; v_744;
    v_744 = 1;
  R745: ICHOR + AKG => SHCHC + PYR + CO2; v_745;
    v_745 = 1;
  R746: SHCHC => OSB; v_746;
    v_746 = 1;
  R747: OSB + ATP + COA => AMP + PPI + OSBCOA; v_747;
    v_747 = 1;
  R748: OSBCOA => DHN + COA; v_748;
    v_748 = 1;
  R749: DHN + OPP => PPI + CO2 + DMK; v_749;
    v_749 = 1;
  R750: DMK + SAM => MKH2 + SAH; v_750;
    v_750 = 1;
  R751: a_2P14NQ + SAM => PQ + SAH; v_751;
    v_751 = 1;
  R752: a_2HP3M6M14B + O2 + NADPH -> a_2HP3M5H6M14B + NADP; v_752;
    v_752 = 1;
  R753: 0.488 ALA + 0.281 ARG + 0.229 ASN + 0.229 ASP + 0.087 CYS + 0.25 GLU + 0.25 GLN + 0.582 GLY + 0.09 HIS + 0.276 ILE + 0.428 LEU + 0.326 LYS + 0.146 MET + 0.176 PHE + 0.21 PRO + 0.205 SER + 0.241 THR + 0.054 TRP + 0.131 TYR + 0.402 VAL + 40 ATP => 40 ADP + 40 PI + PROTEIN; v_753;
    v_753 = 1;
  R754: 0.987 DATP + 0.631 DGTP + 0.631 DCTP + 0.987 DTTP + 4.4 ATP => 4.4 ADP + 4.4 PI + 3.237 PPI + DNA; v_754;
    v_754 = 1;
  R755: 2.045 ATP + 0.92 GTP + 0.686 CTP + 0.689 UTP => 1.25 ADP + 1.25 PI + 3.091 PPI + RNA; v_755;
    v_755 = 1;
  R756: 0.168 CL + 0.548 PE + 0.302 PG + 0.12 a_2AG3PE => PHOSPHOLIPID; v_756;
    v_756 = 1;
  R757: 0.058 C100ACP + 0.185 C120ACP + 0.013 C140ACP + 0.012 C150ACP + 1.082 C160ACP + 0.74 C161ACP + 0.067 C170ACP + 0.06 C171ACP + 0.032 C180ACP + 1.443 C181ACP + 0.157 C120OH => LIPID + 3.692 ACP; v_757;
    v_757 = 1;
  R758: 0.182 KDO + 0.821 bDGLC + 0.656 UDPGAL + 0.018 DTDPRMNS + 0.365 UDPNAG + 0.255 UDPAGLACA + 0.037 C120ACP + 0.014 C160ACP + 0.079 C120OH + 0.009 C180ACP + 0.008 C181ACP + 0.071 C140OH => LPS + 1.276 UDP + 0.018 DTDP + 0.068 ACP; v_758;
    v_758 = 1;
  R759: 2.794 DTDPRMNS + 2.117 bDGLC + 0.265 GDPMAN => EXOPOLYS + 2.794 DTDP + 0.265 UDP; v_759;
    v_759 = 1;
  R760: 0.163 COA + 0.159 FAD + 0.274 FMN + 0.405 MK + 0.188 NAD + 0.168 NADP + 0.739 PYRDX + 0.281 THF => CAV; v_760;
    v_760 = 1;
  R761: 0.6 PROTEIN + 0.03 DNA + 0.19 RNA + 0.04 PHOSPHOLIPID + 0.02 LIPID + 0.005 LPS + 0.027 PEPTIDO + 0.038 EXOPOLYS + 0.03 CAV + 46 ATP => $BIOMASS + 46 ADP + 46 PI; v_761;
    v_761 = 1;
  R762: ATP => ADP + PI; v_762;
    v_762 = 1;
  R763: $IMALxt + ATP -> IMAL + PI + ADP; v_763;
    v_763 = 1;
  R764: $FRUxt + PEP => F1P + PYR; v_764;
    v_764 = 1;
  R765: $GLCxt + ATP => GLC + ADP + PI; v_765;
    v_765 = 1;
  R766: $GLUCxt + Hxt => GLUC; v_766;
    v_766 = 1;
  R767: $MLTxt + ATP => MLT + ADP + PI; v_767;
    v_767 = 1;
  R768: $MNTxt + ATP => MNT + ADP + PI; v_768;
    v_768 = 1;
  R769: $NAGAxt + ATP => NAGA + ADP + PI; v_769;
    v_769 = 1;
  R770: $SUCxt + ATP => SUC + ADP + PI; v_770;
    v_770 = 1;
  R771: $TRExt + ATP => TRE + ADP + PI; v_771;
    v_771 = 1;
  R772: $a_2PGxt + ATP => a_2PG + ADP + PI; v_772;
    v_772 = 1;
  R773: $a_3PGxt + ATP => a_3PG + ADP + PI; v_773;
    v_773 = 1;
  R774: AC -> $ACxt + Hxt; v_774;
    v_774 = 1;
  R775: $AKGxt + Hxt => AKG; v_775;
    v_775 = 1;
  R776: $AKGxt + $Naxt => AKG + Na; v_776;
    v_776 = 1;
  R777: $CITxt -> CIT; v_777;
    v_777 = 1;
  R778: FORMATE => $FORMATExt; v_778;
    v_778 = 1;
  R779: $FUMxt + Hxt => FUM; v_779;
    v_779 = 1;
  R780: $FUMxt + $Naxt => FUM + Na; v_780;
    v_780 = 1;
  R781: $FUMxt + SUCC -> FUM + $SUCCxt; v_781;
    v_781 = 1;
  R782: $ICITxt + $Naxt => ICIT + Na; v_782;
    v_782 = 1;
  R783: $MALxt + Hxt => MAL; v_783;
    v_783 = 1;
  R784: $MALxt + $Naxt => MAL + Na; v_784;
    v_784 = 1;
  R785: $MALxt + SUCC -> MAL + $SUCCxt; v_785;
    v_785 = 1;
  R786: $SLACxt + Hxt => SLAC; v_786;
    v_786 = 1;
  R787: $SUCCxt + Hxt => SUCC; v_787;
    v_787 = 1;
  R788: $SUCCxt + $Naxt => SUCC + Na; v_788;
    v_788 = 1;
  R789: $GLYCOLATExt -> GLYCOLATE; v_789;
    v_789 = 1;
  R790: ATP -> Hxt + ADP + PI; v_790;
    v_790 = 1;
  R791: $CO2xt -> CO2; v_791;
    v_791 = 1;
  R792: $Naxt -> Na + Hxt; v_792;
    v_792 = 1;
  R793: $NH3xt -> NH3; v_793;
    v_793 = 1;
  R794: NO2 => $NO2xt; v_794;
    v_794 = 1;
  R795: $NO3xt + ATP => NO3 + ADP + PI; v_795;
    v_795 = 1;
  R796: $O2xt -> O2; v_796;
    v_796 = 1;
  R797: $PIxt + Hxt -> PI; v_797;
    v_797 = 1;
  R798: $PIxt + ATP => 2 PI + ADP; v_798;
    v_798 = 1;
  R799: $SLFxt + Hxt => SLF; v_799;
    v_799 = 1;
  R800: $SLFxt + ATP => SLF + ADP + PI; v_800;
    v_800 = 1;
  R801: ALA + Hxt -> $ALAxt; v_801;
    v_801 = 1;
  R802: $ALAxt + ATP => ALA + ADP + PI; v_802;
    v_802 = 1;
  R803: $ALAxt + Hxt => ALA; v_803;
    v_803 = 1;
  R804: $ALAxt + $Naxt => ALA + Na; v_804;
    v_804 = 1;
  R805: ARG + Hxt -> $ARGxt; v_805;
    v_805 = 1;
  R806: $ARGxt + ATP => ARG + ADP + PI; v_806;
    v_806 = 1;
  R807: $ARGxt + Hxt => ARG; v_807;
    v_807 = 1;
  R808: ASN + Hxt -> $ASNxt; v_808;
    v_808 = 1;
  R809: $ASNxt + ATP => ASN + ADP + PI; v_809;
    v_809 = 1;
  R810: $ASNxt + Hxt => ASN; v_810;
    v_810 = 1;
  R811: ASP + Hxt -> $ASPxt; v_811;
    v_811 = 1;
  R812: $ASPxt + ATP => ASP + ADP + PI; v_812;
    v_812 = 1;
  R813: $ASPxt + Hxt => ASP; v_813;
    v_813 = 1;
  R814: CYS + Hxt -> $CYSxt; v_814;
    v_814 = 1;
  R815: $CYSxt + ATP => CYS + ADP + PI; v_815;
    v_815 = 1;
  R816: $CYSxt + Hxt => CYS; v_816;
    v_816 = 1;
  R817: $DALAxt + Hxt => DALA; v_817;
    v_817 = 1;
  R818: $DGLUxt + Hxt => DGLU; v_818;
    v_818 = 1;
  R819: GLN + Hxt -> $GLNxt; v_819;
    v_819 = 1;
  R820: $GLNxt + ATP => GLN + ADP + PI; v_820;
    v_820 = 1;
  R821: $GLNxt + Hxt => GLN; v_821;
    v_821 = 1;
  R822: GLU + Hxt -> $GLUxt; v_822;
    v_822 = 1;
  R823: $GLUxt + ATP => GLU + ADP + PI; v_823;
    v_823 = 1;
  R824: $GLUxt + Hxt => GLU; v_824;
    v_824 = 1;
  R825: $GLUxt + $Naxt => GLU + Na; v_825;
    v_825 = 1;
  R826: GLY + Hxt -> $GLYxt; v_826;
    v_826 = 1;
  R827: $GLYxt + ATP => GLY + ADP + PI; v_827;
    v_827 = 1;
  R828: $GLYxt + Hxt => GLY; v_828;
    v_828 = 1;
  R829: $GLYxt + $Naxt => GLY + Na; v_829;
    v_829 = 1;
  R830: HIS + Hxt -> $HISxt; v_830;
    v_830 = 1;
  R831: $HISxt + ATP => HIS + ADP + PI; v_831;
    v_831 = 1;
  R832: $HISxt + Hxt => HIS; v_832;
    v_832 = 1;
  R833: ILE + Hxt -> $ILExt; v_833;
    v_833 = 1;
  R834: $ILExt + ATP => ILE + ADP + PI; v_834;
    v_834 = 1;
  R835: $ILExt + Hxt => ILE; v_835;
    v_835 = 1;
  R836: LEU + Hxt -> $LEUxt; v_836;
    v_836 = 1;
  R837: $LEUxt + ATP => LEU + ADP + PI; v_837;
    v_837 = 1;
  R838: $LEUxt + Hxt => LEU; v_838;
    v_838 = 1;
  R839: LYS + Hxt -> $LYSxt; v_839;
    v_839 = 1;
  R840: LYS + Hxt => $LYSxt; v_840;
    v_840 = 1;
  R841: $LYSxt + ATP => LYS + ADP + PI; v_841;
    v_841 = 1;
  R842: $LYSxt + Hxt => LYS; v_842;
    v_842 = 1;
  R843: MET + Hxt -> $METxt; v_843;
    v_843 = 1;
  R844: $METxt + ATP => MET + ADP + PI; v_844;
    v_844 = 1;
  R845: $METxt + Hxt => MET; v_845;
    v_845 = 1;
  R846: PHE + Hxt -> $PHExt; v_846;
    v_846 = 1;
  R847: $PHExt + ATP => PHE + ADP + PI; v_847;
    v_847 = 1;
  R848: $PHExt + Hxt => PHE; v_848;
    v_848 = 1;
  R849: PRO + Hxt -> $PROxt; v_849;
    v_849 = 1;
  R850: $PROxt + ATP => PRO + ADP + PI; v_850;
    v_850 = 1;
  R851: $PROxt + Hxt => PRO; v_851;
    v_851 = 1;
  R852: $PROxt + $Naxt => PRO + Na; v_852;
    v_852 = 1;
  R853: SER + Hxt -> $SERxt; v_853;
    v_853 = 1;
  R854: $SERxt + ATP => SER + ADP + PI; v_854;
    v_854 = 1;
  R855: $SERxt + Hxt => SER; v_855;
    v_855 = 1;
  R856: THR + Hxt -> $THRxt; v_856;
    v_856 = 1;
  R857: $THRxt + ATP => THR + ADP + PI; v_857;
    v_857 = 1;
  R858: $THRxt + Hxt => THR; v_858;
    v_858 = 1;
  R859: TRP + Hxt -> $TRPxt; v_859;
    v_859 = 1;
  R860: $TRPxt + ATP => TRP + ADP + PI; v_860;
    v_860 = 1;
  R861: $TRPxt + Hxt => TRP; v_861;
    v_861 = 1;
  R862: TYR + Hxt -> $TYRxt; v_862;
    v_862 = 1;
  R863: $TYRxt + ATP => TYR + ADP + PI; v_863;
    v_863 = 1;
  R864: $TYRxt + Hxt => TYR; v_864;
    v_864 = 1;
  R865: VAL + Hxt -> $VALxt; v_865;
    v_865 = 1;
  R866: $VALxt + ATP => VAL + ADP + PI; v_866;
    v_866 = 1;
  R867: $VALxt + Hxt => VAL; v_867;
    v_867 = 1;
  R868: $DSERxt + Hxt => DSER; v_868;
    v_868 = 1;
  R869: $ARGxt + ORN -> ARG + $ORNxt; v_869;
    v_869 = 1;
  R870: HSER + Hxt -> $HSERxt; v_870;
    v_870 = 1;
  R871: $ORNxt + ATP => ORN + ADP + PI; v_871;
    v_871 = 1;
  R872: $PTRCxt + ATP => PTRC + ADP + PI; v_872;
    v_872 = 1;
  R873: $SPRMDxt + ATP => SPRMD + ADP + PI; v_873;
    v_873 = 1;
  R874: $UREAxt + ATP => UREA + ADP + PI; v_874;
    v_874 = 1;
  R875: $CHOLINExt + Hxt => CHOLINE; v_875;
    v_875 = 1;
  R876: $ADNxt + Hxt => ADN; v_876;
    v_876 = 1;
  R877: $CYTDxt + Hxt => CYTD; v_877;
    v_877 = 1;
  R878: $DAxt + Hxt => DA; v_878;
    v_878 = 1;
  R879: $DCxt + Hxt => DC; v_879;
    v_879 = 1;
  R880: $DGxt + Hxt => DG; v_880;
    v_880 = 1;
  R881: $DTxt + Hxt => DT; v_881;
    v_881 = 1;
  R882: $DUxt + Hxt => DU; v_882;
    v_882 = 1;
  R883: $GSNxt + Hxt => GSN; v_883;
    v_883 = 1;
  R884: $URIxt + Hxt => URI; v_884;
    v_884 = 1;
  R885: $CTxt + Hxt => CT; v_885;
    v_885 = 1;
  R886: $XANxt + Hxt => XAN; v_886;
    v_886 = 1;
  R887: $URAxt + Hxt => URA; v_887;
    v_887 = 1;
  R888: $TRxt + ATP => TR + ADP + PI; v_888;
    v_888 = 1;
  R889: $ETHAxt + Hxt => ETHA; v_889;
    v_889 = 1;
  R890: $BETAINExt + Hxt => BETAINE; v_890;
    v_890 = 1;
  R891: $BZxt + Hxt => BZ; v_891;
    v_891 = 1;
end
