// SBML level 2 version 1
// Created by MetaFluxNet on 2010-12-1 0:12

model HyunUkKim2010_VvuMBEL943_MetabolicModeling()
  // Created by Hyun Uk Kim.
  // This metabolic network model was thoroughly validated by authors, and its paper is currently under peer review for journal publication.
  // This network model VvuMBEL943 is a stoichiometric model that contains the metabolic information of a microbial pathogen, Vibrio vulnificus CMCP6, at genome-scale.

  // Compartments:
  compartment cell;

  // Species:
  species C180ACP in cell = 1/cell;
  species DMB in cell = 1/cell;
  species MPYR in cell = 1/cell;
  species HPPP in cell = 1/cell;
  species $O2xt in cell = 1/cell;
  species CIIA in cell = 1/cell;
  species MMSA in cell = 1/cell;
  species CMP in cell = 1/cell;
  species TRNASER in cell = 1/cell;
  species RGT in cell = 1/cell;
  species $VALxt in cell = 1/cell;
  species PAP in cell = 1/cell;
  species GLUGSAL in cell = 1/cell;
  species NAGA6P in cell = 1/cell;
  species a_5MTA in cell = 1/cell;
  species ORN in cell = 1/cell;
  species C171ACP in cell = 1/cell;
  species LTG in cell = 1/cell;
  species SPRMD in cell = 1/cell;
  species FUM in cell = 1/cell;
  species $TRExt in cell = 1/cell;
  species NAGA1P in cell = 1/cell;
  species GCYS in cell = 1/cell;
  species D8RL in cell = 1/cell;
  species PC2 in cell = 1/cell;
  species a_3KBDG in cell = 1/cell;
  species SAH in cell = 1/cell;
  species SHCL in cell = 1/cell;
  species AGDPCBA in cell = 1/cell;
  species a_5MC in cell = 1/cell;
  species a_3PASELNT in cell = 1/cell;
  species a_4PPNCYS in cell = 1/cell;
  species TRNALEU in cell = 1/cell;
  species HYXN in cell = 1/cell;
  species DHN in cell = 1/cell;
  species CNS in cell = 1/cell;
  species PTRC in cell = 1/cell;
  species UMP in cell = 1/cell;
  species ARIB in cell = 1/cell;
  species ASELNT in cell = 1/cell;
  species APS in cell = 1/cell;
  species LK2LIPIV in cell = 1/cell;
  species PROPIONYLP in cell = 1/cell;
  species TRYTRNATYR in cell = 1/cell;
  species a_2OP6M14BQ in cell = 1/cell;
  species SME3P in cell = 1/cell;
  species AICAR in cell = 1/cell;
  species $SUCCxt in cell = 1/cell;
  species CAP in cell = 1/cell;
  species a_3SFPYR in cell = 1/cell;
  species C170ACP in cell = 1/cell;
  species DTAGA in cell = 1/cell;
  species DOROA in cell = 1/cell;
  species CAV in cell = 1/cell;
  species $NO2xt in cell = 1/cell;
  species TYR in cell = 1/cell;
  species CMPKDO in cell = 1/cell;
  species PHPYR in cell = 1/cell;
  species a_4HPP in cell = 1/cell;
  species TRNAMET in cell = 1/cell;
  species G1P in cell = 1/cell;
  species PGP in cell = 1/cell;
  species $SLFxt in cell = 1/cell;
  species CDP in cell = 1/cell;
  species SDLIPO in cell = 1/cell;
  species a_3OPP in cell = 1/cell;
  species ASNTRNAASN in cell = 1/cell;
  species CMPNANEU in cell = 1/cell;
  species DEXTRIN in cell = 1/cell;
  species TRP in cell = 1/cell;
  species DCTP in cell = 1/cell;
  species a_3KL in cell = 1/cell;
  species IDP in cell = 1/cell;
  species PI in cell = 1/cell;
  species PL in cell = 1/cell;
  species SAICAR in cell = 1/cell;
  species a_3PSME in cell = 1/cell;
  species PC in cell = 1/cell;
  species CGS in cell = 1/cell;
  species DAMP in cell = 1/cell;
  species PG in cell = 1/cell;
  species PE in cell = 1/cell;
  species ADLIPO in cell = 1/cell;
  species PDLA5P in cell = 1/cell;
  species HIBUT in cell = 1/cell;
  species a_3PSER in cell = 1/cell;
  species PS in cell = 1/cell;
  species PQ in cell = 1/cell;
  species I4AA in cell = 1/cell;
  species a_2PPG in cell = 1/cell;
  species GLUP in cell = 1/cell;
  species bDGLC in cell = 1/cell;
  species LIPIV in cell = 1/cell;
  species OBUT in cell = 1/cell;
  species DUMP in cell = 1/cell;
  species ICIT in cell = 1/cell;
  species OGT in cell = 1/cell;
  species cGMP in cell = 1/cell;
  species PPYR in cell = 1/cell;
  species $DUxt in cell = 1/cell;
  species DGALAC in cell = 1/cell;
  species C161ACP in cell = 1/cell;
  species $XANxt in cell = 1/cell;
  species UDP in cell = 1/cell;
  species DHSK in cell = 1/cell;
  species $DGxt in cell = 1/cell;
  species A6P in cell = 1/cell;
  species ACCOA in cell = 1/cell;
  species $GL3Pxt in cell = 1/cell;
  species AHHMP in cell = 1/cell;
  species DTB in cell = 1/cell;
  species DTTP in cell = 1/cell;
  species a_2OP3M5H6M14BQ in cell = 1/cell;
  species $GLNxt in cell = 1/cell;
  species H2CO3 in cell = 1/cell;
  species HCO3 in cell = 1/cell;
  species bALA in cell = 1/cell;
  species TRE6P in cell = 1/cell;
  species DHPT in cell = 1/cell;
  species TRNAILE in cell = 1/cell;
  species $SUCxt in cell = 1/cell;
  species TM in cell = 1/cell;
  species FMN in cell = 1/cell;
  species AACP in cell = 1/cell;
  species CPAD5P in cell = 1/cell;
  species INDOLE in cell = 1/cell;
  species SDAPIM in cell = 1/cell;
  species $NO3xt in cell = 1/cell;
  species SHEME in cell = 1/cell;
  species a_5CM2HM in cell = 1/cell;
  species THZP in cell = 1/cell;
  species H2O2 in cell = 1/cell;
  species TR in cell = 1/cell;
  species K2LIPA in cell = 1/cell;
  species $ARGxt in cell = 1/cell;
  species PEP in cell = 1/cell;
  species QA in cell = 1/cell;
  species $HSERxt in cell = 1/cell;
  species DDOH in cell = 1/cell;
  species HCNS in cell = 1/cell;
  species FGAR in cell = 1/cell;
  species DNA in cell = 1/cell;
  species CBHCAP in cell = 1/cell;
  species a_5MTGLU in cell = 1/cell;
  species T3 in cell = 1/cell;
  species PANT in cell = 1/cell;
  species $GLYxt in cell = 1/cell;
  species ALAALA in cell = 1/cell;
  species MALCOA in cell = 1/cell;
  species OIVAL in cell = 1/cell;
  species PHSER in cell = 1/cell;
  species THBPT in cell = 1/cell;
  species MLTHX in cell = 1/cell;
  species AHMP in cell = 1/cell;
  species a_2AEP in cell = 1/cell;
  species ASPTRNAASP in cell = 1/cell;
  species DGLUCA in cell = 1/cell;
  species Hxt in cell = 1/cell;
  species H2SO3 in cell = 1/cell;
  species FORMATE in cell = 1/cell;
  species METTRNA in cell = 1/cell;
  species ASUC in cell = 1/cell;
  species $THRxt in cell = 1/cell;
  species UREA in cell = 1/cell;
  species A5P in cell = 1/cell;
  species HQ in cell = 1/cell;
  species $IMALxt in cell = 1/cell;
  species DMKH2 in cell = 1/cell;
  species PYR in cell = 1/cell;
  species ILE in cell = 1/cell;
  species NAGLU in cell = 1/cell;
  species ARBZ in cell = 1/cell;
  species a_2HBA in cell = 1/cell;
  species a_34DHB in cell = 1/cell;
  species S7P in cell = 1/cell;
  species NADP in cell = 1/cell;
  species DQT in cell = 1/cell;
  species S2MBDHL in cell = 1/cell;
  species GDPMAN in cell = 1/cell;
  species DIMGP in cell = 1/cell;
  species UC in cell = 1/cell;
  species DHBPT in cell = 1/cell;
  species NADH in cell = 1/cell;
  species NADPH in cell = 1/cell;
  species S6P in cell = 1/cell;
  species $FRUxt in cell = 1/cell;
  species UQ in cell = 1/cell;
  species PRO in cell = 1/cell;
  species INS in cell = 1/cell;
  species pppGpp in cell = 1/cell;
  species LRIBULOSE5P in cell = 1/cell;
  species NACD in cell = 1/cell;
  species TRNAASN in cell = 1/cell;
  species a_23cCMP in cell = 1/cell;
  species ASPSA in cell = 1/cell;
  species NACN in cell = 1/cell;
  species SERTRNASER in cell = 1/cell;
  species C120ACP in cell = 1/cell;
  species DUDP in cell = 1/cell;
  species TRNALYS in cell = 1/cell;
  species IMP in cell = 1/cell;
  species C200ACP in cell = 1/cell;
  species OA in cell = 1/cell;
  species LEUTRNA in cell = 1/cell;
  species DFRUC in cell = 1/cell;
  species VB12 in cell = 1/cell;
  species SMET in cell = 1/cell;
  species G6GG in cell = 1/cell;
  species bGLAC in cell = 1/cell;
  species TRNAVAL in cell = 1/cell;
  species S2MPDHL in cell = 1/cell;
  species OMP in cell = 1/cell;
  species MLTTR in cell = 1/cell;
  species a_3MCCOA in cell = 1/cell;
  species ACHA in cell = 1/cell;
  species UDPG23A in cell = 1/cell;
  species TRNAGLY in cell = 1/cell;
  species NAAD in cell = 1/cell;
  species GLUTRNAGLU in cell = 1/cell;
  species H_C_ in cell = 1/cell;
  species N15PADRDMB in cell = 1/cell;
  species PPEPTIDO in cell = 1/cell;
  species TRNAGLU in cell = 1/cell;
  species GGPP in cell = 1/cell;
  species HO3S2 in cell = 1/cell;
  species TRNAGLN in cell = 1/cell;
  species $CYSxt in cell = 1/cell;
  species GLAC in cell = 1/cell;
  species TRNAARG in cell = 1/cell;
  species PPPP in cell = 1/cell;
  species GLAL in cell = 1/cell;
  species HISOL in cell = 1/cell;
  species A_C_ in cell = 1/cell;
  species $DCxt in cell = 1/cell;
  species Na in cell = 1/cell;
  species ALATRNA in cell = 1/cell;
  species OHB in cell = 1/cell;
  species UPPMNGNLADGNMDG5DADA in cell = 1/cell;
  species DGLYCERATE in cell = 1/cell;
  species a_3H2MBCOA in cell = 1/cell;
  species PTT in cell = 1/cell;
  species H5P3O10 in cell = 1/cell;
  species O2 in cell = 1/cell;
  species MDE4P in cell = 1/cell;
  species NMHIS in cell = 1/cell;
  species DGR in cell = 1/cell;
  species ACALA in cell = 1/cell;
  species PURI5P in cell = 1/cell;
  species $SPRMDxt in cell = 1/cell;
  species UDPNADMAU in cell = 1/cell;
  species UDPNAMAG in cell = 1/cell;
  species GALACTINOL in cell = 1/cell;
  species $TRPxt in cell = 1/cell;
  species DHP in cell = 1/cell;
  species CT in cell = 1/cell;
  species NPCYS in cell = 1/cell;
  species PPP in cell = 1/cell;
  species DHF in cell = 1/cell;
  species CL in cell = 1/cell;
  species $ACxt in cell = 1/cell;
  species SB1P in cell = 1/cell;
  species CB in cell = 1/cell;
  species PPI in cell = 1/cell;
  species PPN in cell = 1/cell;
  species TRNACYS in cell = 1/cell;
  species FAD in cell = 1/cell;
  species $PHExt in cell = 1/cell;
  species PPA in cell = 1/cell;
  species MLTPT in cell = 1/cell;
  species OSBCOA in cell = 1/cell;
  species N4AAB in cell = 1/cell;
  species $a_2PGxt in cell = 1/cell;
  species NAMN in cell = 1/cell;
  species AppppA in cell = 1/cell;
  species SLLCT in cell = 1/cell;
  species NAMD in cell = 1/cell;
  species DIN in cell = 1/cell;
  species PYTHP in cell = 1/cell;
  species a_5C2O3E in cell = 1/cell;
  species CDPDG in cell = 1/cell;
  species a_3AMP in cell = 1/cell;
  species a_2MPPACOA in cell = 1/cell;
  species MM in cell = 1/cell;
  species PPIX in cell = 1/cell;
  species MK in cell = 1/cell;
  species MI in cell = 1/cell;
  species DGLUCL in cell = 1/cell;
  species UTP in cell = 1/cell;
  species NANEU in cell = 1/cell;
  species UDPG in cell = 1/cell;
  species DALA in cell = 1/cell;
  species LACTOSE in cell = 1/cell;
  species BT in cell = 1/cell;
  species D1AP2OOP in cell = 1/cell;
  species a_2HPP in cell = 1/cell;
  species UPPMNGNLADGNMDDADA in cell = 1/cell;
  species a_2A3PP in cell = 1/cell;
  species KDG in cell = 1/cell;
  species a_2HPA in cell = 1/cell;
  species $URIxt in cell = 1/cell;
  species KDO in cell = 1/cell;
  species ETH in cell = 1/cell;
  species GL in cell = 1/cell;
  species GN in cell = 1/cell;
  species SAMA in cell = 1/cell;
  species ATP in cell = 1/cell;
  species PTH in cell = 1/cell;
  species SAP in cell = 1/cell;
  species C110ACP in cell = 1/cell;
  species PROTRNAPRO in cell = 1/cell;
  species DT in cell = 1/cell;
  species CYSTEATE in cell = 1/cell;
  species PROTEIN in cell = 1/cell;
  species ADCBAP in cell = 1/cell;
  species DHMP in cell = 1/cell;
  species DG in cell = 1/cell;
  species DC in cell = 1/cell;
  species $GLUCxt in cell = 1/cell;
  species DA in cell = 1/cell;
  species a_2OAD in cell = 1/cell;
  species $ORNxt in cell = 1/cell;
  species PPHG in cell = 1/cell;
  species GL3P in cell = 1/cell;
  species ACAL in cell = 1/cell;
  species $CITxt in cell = 1/cell;
  species AN in cell = 1/cell;
  species a_3HAN in cell = 1/cell;
  species a_34DHPEG in cell = 1/cell;
  species AC in cell = 1/cell;
  species DPCOA in cell = 1/cell;
  species AG in cell = 1/cell;
  species AD in cell = 1/cell;
  species a_3HPCOA in cell = 1/cell;
  species SUC6P in cell = 1/cell;
  species SCYS in cell = 1/cell;
  species X5P in cell = 1/cell;
  species PEPTIDO in cell = 1/cell;
  species FL in cell = 1/cell;
  species UDPNADMA in cell = 1/cell;
  species TCYS in cell = 1/cell;
  species F1P in cell = 1/cell;
  species PROPANOATE in cell = 1/cell;
  species FA in cell = 1/cell;
  species MLTTTR in cell = 1/cell;
  species CYSGLY in cell = 1/cell;
  species a_2PCDPMDE in cell = 1/cell;
  species a_1BOH in cell = 1/cell;
  species FMETTRNA in cell = 1/cell;
  species ACOA in cell = 1/cell;
  species EPM in cell = 1/cell;
  species MKH2 in cell = 1/cell;
  species AHSER in cell = 1/cell;
  species C151ACP in cell = 1/cell;
  species a_2MP2ECOA in cell = 1/cell;
  species a_3SPYR in cell = 1/cell;
  species DR5P in cell = 1/cell;
  species URI in cell = 1/cell;
  species URA in cell = 1/cell;
  species ACDA in cell = 1/cell;
  species PHP in cell = 1/cell;
  species GAL1P in cell = 1/cell;
  species PHT in cell = 1/cell;
  species B5AMP in cell = 1/cell;
  species PYRDX in cell = 1/cell;
  species $SERxt in cell = 1/cell;
  species LIPO in cell = 1/cell;
  species GLYCOLATE in cell = 1/cell;
  species ppGpp in cell = 1/cell;
  species UDPGAL in cell = 1/cell;
  species DB4P in cell = 1/cell;
  species HOMOGEN in cell = 1/cell;
  species THMNP in cell = 1/cell;
  species BAL in cell = 1/cell;
  species PRBATP in cell = 1/cell;
  species $BIOMASS in cell = 1/cell;
  species GLU in cell = 1/cell;
  species DADP in cell = 1/cell;
  species SHCHC in cell = 1/cell;
  species PPAC in cell = 1/cell;
  species MLTHPT in cell = 1/cell;
  species a_3HIVCOA in cell = 1/cell;
  species PBG in cell = 1/cell;
  species CHOR in cell = 1/cell;
  species a_4FAAC in cell = 1/cell;
  species PABA in cell = 1/cell;
  species UDPNAGEP in cell = 1/cell;
  species ADPG in cell = 1/cell;
  species UDPG2AA in cell = 1/cell;
  species LPS in cell = 1/cell;
  species ACACP in cell = 1/cell;
  species a_3PG in cell = 1/cell;
  species ABUT in cell = 1/cell;
  species L1P3H5C in cell = 1/cell;
  species SELNT in cell = 1/cell;
  species DAPIM in cell = 1/cell;
  species a_3A2OP in cell = 1/cell;
  species SUCC in cell = 1/cell;
  species NADMA6P in cell = 1/cell;
  species bDG6P in cell = 1/cell;
  species MDAPIM in cell = 1/cell;
  species DR1P in cell = 1/cell;
  species $CO2xt in cell = 1/cell;
  species a_4MAAC in cell = 1/cell;
  species a_3HBCOA in cell = 1/cell;
  species T16B in cell = 1/cell;
  species UDPGLUC in cell = 1/cell;
  species DANNA in cell = 1/cell;
  species T6P in cell = 1/cell;
  species NGNEU in cell = 1/cell;
  species AACCOA in cell = 1/cell;
  species a_3OP4HB in cell = 1/cell;
  species a_3HIBCOA in cell = 1/cell;
  species a_23cAMP in cell = 1/cell;
  species N2SUCCARG in cell = 1/cell;
  species $MELIxt in cell = 1/cell;
  species $DTxt in cell = 1/cell;
  species IMAL in cell = 1/cell;
  species a_2A3OB in cell = 1/cell;
  species a_2MCIT in cell = 1/cell;
  species a_3DG6P in cell = 1/cell;
  species PRFICA in cell = 1/cell;
  species DITP in cell = 1/cell;
  species DTDPGLU in cell = 1/cell;
  species HSER in cell = 1/cell;
  species ACLAC in cell = 1/cell;
  species ER4P in cell = 1/cell;
  species a_3GMP in cell = 1/cell;
  species a_2AG3PE in cell = 1/cell;
  species SLF in cell = 1/cell;
  species ASN in cell = 1/cell;
  species a_3MBCOA in cell = 1/cell;
  species a_2AG3PC in cell = 1/cell;
  species METHF in cell = 1/cell;
  species CAIR in cell = 1/cell;
  species GLUTCOA in cell = 1/cell;
  species DHMVA in cell = 1/cell;
  species a_3BUT in cell = 1/cell;
  species ASP in cell = 1/cell;
  species a_2AG3PS in cell = 1/cell;
  species SPRM in cell = 1/cell;
  species DPHE in cell = 1/cell;
  species D6PGC in cell = 1/cell;
  species UPRG in cell = 1/cell;
  species C191ACP in cell = 1/cell;
  species N2SUCCGLU5SA in cell = 1/cell;
  species BETAINE in cell = 1/cell;
  species TRNATRP in cell = 1/cell;
  species DHPANT in cell = 1/cell;
  species FTHF in cell = 1/cell;
  species ICHOR in cell = 1/cell;
  species PRPP in cell = 1/cell;
  species PRBAMP in cell = 1/cell;
  species OTHIO in cell = 1/cell;
  species PA in cell = 1/cell;
  species CTP in cell = 1/cell;
  species a_3MLAC in cell = 1/cell;
  species CCOA in cell = 1/cell;
  species HEPPP in cell = 1/cell;
  species DISAC1P in cell = 1/cell;
  species E4HGLU in cell = 1/cell;
  species XMP in cell = 1/cell;
  species $UREAxt in cell = 1/cell;
  species $TYRxt in cell = 1/cell;
  species $ASPxt in cell = 1/cell;
  species ADCHOR in cell = 1/cell;
  species SME in cell = 1/cell;
  species a_2AA in cell = 1/cell;
  species AGL3P in cell = 1/cell;
  species HMB4PP in cell = 1/cell;
  species XTSINE in cell = 1/cell;
  species ARGSUCC in cell = 1/cell;
  species a_2AGL3P in cell = 1/cell;
  species DUTP in cell = 1/cell;
  species $GLxt in cell = 1/cell;
  species DHDP in cell = 1/cell;
  species LIPOYLPROTEIN in cell = 1/cell;
  species DHLIPOYLPROTEIN in cell = 1/cell;
  species AHMPP in cell = 1/cell;
  species a_2OP6HP in cell = 1/cell;
  species GA6P in cell = 1/cell;
  species DGDMH17BP in cell = 1/cell;
  species $GLYCOLATExt in cell = 1/cell;
  species $ASNxt in cell = 1/cell;
  species TRNAASP in cell = 1/cell;
  species a_5H24DP in cell = 1/cell;
  species a_2HETPP in cell = 1/cell;
  species DGDMH1P in cell = 1/cell;
  species NAD in cell = 1/cell;
  species DCMP in cell = 1/cell;
  species NAC in cell = 1/cell;
  species ARG in cell = 1/cell;
  species NAM in cell = 1/cell;
  species IMACP in cell = 1/cell;
  species DHAP in cell = 1/cell;
  species G3P in cell = 1/cell;
  species NAORN in cell = 1/cell;
  species $LEUxt in cell = 1/cell;
  species $GLCxt in cell = 1/cell;
  species PNTO in cell = 1/cell;
  species TRNAHIS in cell = 1/cell;
  species LYS in cell = 1/cell;
  species a_4HB in cell = 1/cell;
  species C180 in cell = 1/cell;
  species C181 in cell = 1/cell;
  species $PIxt in cell = 1/cell;
  species C100ACP in cell = 1/cell;
  species a_4HGLUSA in cell = 1/cell;
  species SAOPIM in cell = 1/cell;
  species PRAM in cell = 1/cell;
  species D6PGL in cell = 1/cell;
  species A6RP in cell = 1/cell;
  species SAM in cell = 1/cell;
  species $CYTDxt in cell = 1/cell;
  species $ICITxt in cell = 1/cell;
  species CVN in cell = 1/cell;
  species a_2OP6MP in cell = 1/cell;
  species GA1P in cell = 1/cell;
  species DTDPDGLUC in cell = 1/cell;
  species NO3 in cell = 1/cell;
  species NO2 in cell = 1/cell;
  species a_4HPRO in cell = 1/cell;
  species RTHIO in cell = 1/cell;
  species cAMP in cell = 1/cell;
  species DX5P in cell = 1/cell;
  species ADCBA in cell = 1/cell;
  species GTP in cell = 1/cell;
  species AKG in cell = 1/cell;
  species KDPG in cell = 1/cell;
  species MTG in cell = 1/cell;
  species CHCOA in cell = 1/cell;
  species BASP in cell = 1/cell;
  species $MNTxt in cell = 1/cell;
  species TRNAPHE in cell = 1/cell;
  species F6P in cell = 1/cell;
  species $MLTxt in cell = 1/cell;
  species LEU in cell = 1/cell;
  species ADPHEP in cell = 1/cell;
  species GTRNA in cell = 1/cell;
  species $PROxt in cell = 1/cell;
  species AONA in cell = 1/cell;
  species a_3HB123TC in cell = 1/cell;
  species $THIAMINxt in cell = 1/cell;
  species a_2D3DDX in cell = 1/cell;
  species CAASP in cell = 1/cell;
  species PPACOA in cell = 1/cell;
  species PAPS in cell = 1/cell;
  species HTR in cell = 1/cell;
  species NH3 in cell = 1/cell;
  species $AKGxt in cell = 1/cell;
  species UQH2 in cell = 1/cell;
  species GLYTRNAGLY in cell = 1/cell;
  species $GLUxt in cell = 1/cell;
  species ILETRNAILE in cell = 1/cell;
  species C150ACP in cell = 1/cell;
  species $SLACxt in cell = 1/cell;
  species ACMUR in cell = 1/cell;
  species AHM in cell = 1/cell;
  species SER in cell = 1/cell;
  species a_2OPP in cell = 1/cell;
  species $CTxt in cell = 1/cell;
  species $Naxt in cell = 1/cell;
  species TRNAPRO in cell = 1/cell;
  species $MALxt in cell = 1/cell;
  species DTMP in cell = 1/cell;
  species CDPMDE in cell = 1/cell;
  species DGLUC in cell = 1/cell;
  species UPPMNLADGMDDADA in cell = 1/cell;
  species a_34DHMA in cell = 1/cell;
  species C160ACP in cell = 1/cell;
  species GPP in cell = 1/cell;
  species GSN in cell = 1/cell;
  species SHCYS in cell = 1/cell;
  species PRLP in cell = 1/cell;
  species ATHR in cell = 1/cell;
  species $ILExt in cell = 1/cell;
  species GSA in cell = 1/cell;
  species IGP in cell = 1/cell;
  species DMPP in cell = 1/cell;
  species CYTD in cell = 1/cell;
  species F2P in cell = 1/cell;
  species a_2P1A in cell = 1/cell;
  species AIR in cell = 1/cell;
  species TRNATHR in cell = 1/cell;
  species METTHF in cell = 1/cell;
  species LAC in cell = 1/cell;
  species MAN1P in cell = 1/cell;
  species DCDP in cell = 1/cell;
  species IASP in cell = 1/cell;
  species XAN in cell = 1/cell;
  species TRNATYR in cell = 1/cell;
  species a_23cGMP in cell = 1/cell;
  species a_4PPNTE in cell = 1/cell;
  species a_3SLALA in cell = 1/cell;
  species a_4PPNTO in cell = 1/cell;
  species DIDP in cell = 1/cell;
  species S3MBDHL in cell = 1/cell;
  species DGDMH7P in cell = 1/cell;
  species LLCT in cell = 1/cell;
  species CITR in cell = 1/cell;
  species ALA in cell = 1/cell;
  species a_24DAB in cell = 1/cell;
  species PHOSPHOLIPID in cell = 1/cell;
  species PDLA in cell = 1/cell;
  species D6RP5P in cell = 1/cell;
  species C090ACP in cell = 1/cell;
  species GLY in cell = 1/cell;
  species GLX in cell = 1/cell;
  species ACP in cell = 1/cell;
  species GLC in cell = 1/cell;
  species DRIB in cell = 1/cell;
  species NADMA in cell = 1/cell;
  species GLN in cell = 1/cell;
  species C040COA in cell = 1/cell;
  species DGTP in cell = 1/cell;
  species UDPG2A in cell = 1/cell;
  species $DAxt in cell = 1/cell;
  species UDPMNLADGMDDADA in cell = 1/cell;
  species BUTANAL in cell = 1/cell;
  species ADPDGDMHEP in cell = 1/cell;
  species CYS in cell = 1/cell;
  species R3HBCOA in cell = 1/cell;
  species OPHSER in cell = 1/cell;
  species $GSNxt in cell = 1/cell;
  species UDCPP in cell = 1/cell;
  species $NH3xt in cell = 1/cell;
  species RIBFLAV in cell = 1/cell;
  species FGAM in cell = 1/cell;
  species DMK in cell = 1/cell;
  species I3AA in cell = 1/cell;
  species I3AC in cell = 1/cell;
  species CA in cell = 1/cell;
  species a_3CMP in cell = 1/cell;
  species LXYLULOSE5P in cell = 1/cell;
  species C150 in cell = 1/cell;
  species AMP in cell = 1/cell;
  species a_3MGCOA in cell = 1/cell;
  species NANEU9P in cell = 1/cell;
  species $PTRCxt in cell = 1/cell;
  species GLUC in cell = 1/cell;
  species GMP in cell = 1/cell;
  species UDPNAMA in cell = 1/cell;
  species C140 in cell = 1/cell;
  species a_13PDG in cell = 1/cell;
  species RL5P in cell = 1/cell;
  species MTHMNP in cell = 1/cell;
  species THFG in cell = 1/cell;
  species C130ACP in cell = 1/cell;
  species PPAACP in cell = 1/cell;
  species C190ACP in cell = 1/cell;
  species PRFP in cell = 1/cell;
  species G6P in cell = 1/cell;
  species P5P in cell = 1/cell;
  species DATP in cell = 1/cell;
  species FDP in cell = 1/cell;
  species a_4AB in cell = 1/cell;
  species NAGLUS in cell = 1/cell;
  species P5C in cell = 1/cell;
  species NAGLUP in cell = 1/cell;
  species L6P in cell = 1/cell;
  species R1P in cell = 1/cell;
  species AGL in cell = 1/cell;
  species a_3H3MGCOA in cell = 1/cell;
  species CHOLINE in cell = 1/cell;
  species MNT1P in cell = 1/cell;
  species DLIPO in cell = 1/cell;
  species a_23cUMP in cell = 1/cell;
  species LIPX in cell = 1/cell;
  species THMPP in cell = 1/cell;
  species MELT in cell = 1/cell;
  species C160 in cell = 1/cell;
  species a_2MBCOA in cell = 1/cell;
  species FEROC in cell = 1/cell;
  species I4AC in cell = 1/cell;
  species MELI in cell = 1/cell;
  species a_5MDR in cell = 1/cell;
  species $FORMATExt in cell = 1/cell;
  species SUCCSA in cell = 1/cell;
  species HCYS in cell = 1/cell;
  species $VB12xt in cell = 1/cell;
  species PHETRNAPHE in cell = 1/cell;
  species NPRAN in cell = 1/cell;
  species CPP in cell = 1/cell;
  species FRU in cell = 1/cell;
  species DU in cell = 1/cell;
  species AAC in cell = 1/cell;
  species AAA in cell = 1/cell;
  species A6RP5P2 in cell = 1/cell;
  species AAD in cell = 1/cell;
  species A6RP5P in cell = 1/cell;
  species FERIC in cell = 1/cell;
  species IPP in cell = 1/cell;
  species DGMP in cell = 1/cell;
  species AGMATINE in cell = 1/cell;
  species TGL in cell = 1/cell;
  species ADP in cell = 1/cell;
  species MAN6P in cell = 1/cell;
  species ADN in cell = 1/cell;
  species DTDP in cell = 1/cell;
  species a_4I5P in cell = 1/cell;
  species HAC in cell = 1/cell;
  species DGLU in cell = 1/cell;
  species GDP in cell = 1/cell;
  species THF in cell = 1/cell;
  species a_3UMP in cell = 1/cell;
  species PHEN in cell = 1/cell;
  species VAL in cell = 1/cell;
  species R5P in cell = 1/cell;
  species a_2MB2ECOA in cell = 1/cell;
  species a_4MOP in cell = 1/cell;
  species FPP in cell = 1/cell;
  species THR in cell = 1/cell;
  species STA in cell = 1/cell;
  species DGLN in cell = 1/cell;
  species a_3MOP in cell = 1/cell;
  species CYST in cell = 1/cell;
  species OSLHSER in cell = 1/cell;
  species IPPMAL in cell = 1/cell;
  species SELD in cell = 1/cell;
  species $LYSxt in cell = 1/cell;
  species S in cell = 1/cell;
  species GGL in cell = 1/cell;
  species C120 in cell = 1/cell;
  species N2SUCCGLU in cell = 1/cell;
  species SUCCOA in cell = 1/cell;
  species SELT in cell = 1/cell;
  species a_5A4IC in cell = 1/cell;
  species DTDPGLAC in cell = 1/cell;
  species $URAxt in cell = 1/cell;
  species RIB in cell = 1/cell;
  species G3PE in cell = 1/cell;
  species AHHMD in cell = 1/cell;
  species G3PC in cell = 1/cell;
  species MCB in cell = 1/cell;
  species SHSER in cell = 1/cell;
  species ARGTRNAARG in cell = 1/cell;
  species SAMOB in cell = 1/cell;
  species GLYCOGEN in cell = 1/cell;
  species THRTRNATHR in cell = 1/cell;
  species $FUMxt in cell = 1/cell;
  species a_2P14NQ in cell = 1/cell;
  species ITP in cell = 1/cell;
  species RNA in cell = 1/cell;
  species ALAV in cell = 1/cell;
  species PL5P in cell = 1/cell;
  species ACETYLP in cell = 1/cell;
  species FADH2 in cell = 1/cell;
  species KDOLIPIV in cell = 1/cell;
  species MET in cell = 1/cell;
  species SUC in cell = 1/cell;
  species OROA in cell = 1/cell;
  species $DGLUxt in cell = 1/cell;
  species C181ACP in cell = 1/cell;
  species C140ACP in cell = 1/cell;
  species K2LIPIV in cell = 1/cell;
  species CYSTRNACYS in cell = 1/cell;
  species DMAN in cell = 1/cell;
  species a_1AP2O in cell = 1/cell;
  species TRPTRNATRP in cell = 1/cell;
  species ACIIIA in cell = 1/cell;
  species $ALAxt in cell = 1/cell;
  species MALACP in cell = 1/cell;
  species THIAMIN in cell = 1/cell;
  species SRLH in cell = 1/cell;
  species C161 in cell = 1/cell;
  species KDOP in cell = 1/cell;
  species CBCO in cell = 1/cell;
  species MVLN in cell = 1/cell;
  species $HISxt in cell = 1/cell;
  species a_3B1A in cell = 1/cell;
  species SeASMET in cell = 1/cell;
  species AHTD in cell = 1/cell;
  species CHD in cell = 1/cell;
  species a_4HLT in cell = 1/cell;
  species SMETTRNAMET in cell = 1/cell;
  species THMP in cell = 1/cell;
  species SLAC in cell = 1/cell;
  species TGLU in cell = 1/cell;
  species GAR in cell = 1/cell;
  species PPCOA in cell = 1/cell;
  species a_3DDAH7P in cell = 1/cell;
  species CIDA in cell = 1/cell;
  species HIS in cell = 1/cell;
  species CMPNGNEU in cell = 1/cell;
  species MDECPP in cell = 1/cell;
  species TDHDP in cell = 1/cell;
  species a_5FTHF in cell = 1/cell;
  species NFGLU in cell = 1/cell;
  species HISTRNAHIS in cell = 1/cell;
  species a_4AABUT in cell = 1/cell;
  species OPP in cell = 1/cell;
  species OICAP in cell = 1/cell;
  species a_2PG in cell = 1/cell;
  species $METxt in cell = 1/cell;
  species DGDP in cell = 1/cell;
  species MAN in cell = 1/cell;
  species LYSTRNA in cell = 1/cell;
  species MAL in cell = 1/cell;
  species OSB in cell = 1/cell;
  species $CHOLINExt in cell = 1/cell;
  species SGDHL in cell = 1/cell;
  species CIT in cell = 1/cell;
  species VALTRNAVAL in cell = 1/cell;
  species UDPNAG in cell = 1/cell;
  species UDPNAM in cell = 1/cell;
  species MLT in cell = 1/cell;
  species UPPMNGNLADGMDDADA in cell = 1/cell;
  species SOT in cell = 1/cell;
  species UDPDGALAC in cell = 1/cell;
  species STACHYOSE in cell = 1/cell;
  species $a_3PGxt in cell = 1/cell;
  species HYDROXYAKG in cell = 1/cell;
  species OAHSER in cell = 1/cell;
  species GABA in cell = 1/cell;
  species E4P in cell = 1/cell;
  species H2S in cell = 1/cell;
  species HISOLP in cell = 1/cell;
  species bAPA in cell = 1/cell;
  species PHE in cell = 1/cell;
  species a_2OP3M6M14BQ in cell = 1/cell;
  species a_2MAACCOA in cell = 1/cell;
  species RAF in cell = 1/cell;
  species ASER in cell = 1/cell;
  species $ADNxt in cell = 1/cell;
  species UDCP in cell = 1/cell;
  species TRNAALA in cell = 1/cell;
  species MTHF in cell = 1/cell;
  species COA in cell = 1/cell;
  species ETHA in cell = 1/cell;
  species UDPMNLADGMD in cell = 1/cell;
  species a_5HIAC in cell = 1/cell;
  species a_5HIAA in cell = 1/cell;
  species CO2 in cell = 1/cell;
  species SSLCYS in cell = 1/cell;
  species $NAGAxt in cell = 1/cell;
  species $DALAxt in cell = 1/cell;
  species HMB in cell = 1/cell;

  // Reactions:
  R001: GLC -> bDGLC; v_1();
    v_1 = 1;
  R002: G6P -> bDG6P; v_2();
    v_2 = 1;
  R003: A6P => HQ + bDG6P; v_3();
    v_3 = 1;
  R004: G6P -> F6P; v_4();
    v_4 = 1;
  R005: bDG6P -> F6P; v_5();
    v_5 = 1;
  R006: G6P -> G1P; v_6();
    v_6 = 1;
  R007: F6P + ATP => FDP + ADP; v_7();
    v_7 = 1;
  R008: FDP => F6P + PI; v_8();
    v_8 = 1;
  R009: FDP -> G3P + DHAP; v_9();
    v_9 = 1;
  R010: DHAP -> G3P; v_10();
    v_10 = 1;
  R011: G3P + PI + NAD -> NADH + a_13PDG; v_11();
    v_11 = 1;
  R012: a_13PDG + ADP -> a_3PG + ATP; v_12();
    v_12 = 1;
  R013: a_13PDG + ADP => a_3PG + ATP; v_13();
    v_13 = 1;
  R014: a_3PG -> a_2PG; v_14();
    v_14 = 1;
  R015: a_2PG -> PEP; v_15();
    v_15 = 1;
  R016: PEP + ADP => PYR + ATP; v_16();
    v_16 = 1;
  R017: SLAC + NAD -> PYR + NADH; v_17();
    v_17 = 1;
  R018: PYR + LIPO => ADLIPO + CO2; v_18();
    v_18 = 1;
  R019: COA + ADLIPO => DLIPO + ACCOA; v_19();
    v_19 = 1;
  R020: DLIPO + NAD => LIPO + NADH; v_20();
    v_20 = 1;
  R021: ATP + AC + COA -> AMP + PPI + ACCOA; v_21();
    v_21 = 1;
  R022: ACAL + NAD => NADH + AC; v_22();
    v_22 = 1;
  R023: ACAL + NADH -> ETH + NAD; v_23();
    v_23 = 1;
  R024: ACCOA + OA => COA + CIT; v_24();
    v_24 = 1;
  R025: CIT -> ICIT; v_25();
    v_25 = 1;
  R026: ICIT + NADP => NADPH + AKG + CO2; v_26();
    v_26 = 1;
  R027: AKG + LIPO => SDLIPO + CO2; v_27();
    v_27 = 1;
  R028: SDLIPO + COA => DLIPO + SUCCOA; v_28();
    v_28 = 1;
  R029: ADP + PI + SUCCOA -> ATP + SUCC + COA; v_29();
    v_29 = 1;
  R030: SUCC + FAD => FUM + FADH2; v_30();
    v_30 = 1;
  R031: FUM + MKH2 => SUCC + MK; v_31();
    v_31 = 1;
  R032: FUM + DMKH2 => SUCC + DMK; v_32();
    v_32 = 1;
  R033: FUM -> MAL; v_33();
    v_33 = 1;
  R034: MAL + NAD -> NADH + OA; v_34();
    v_34 = 1;
  R035: G6P + NADP => D6PGL + NADPH; v_35();
    v_35 = 1;
  R036: G6P + NAD => D6PGL + NADH; v_36();
    v_36 = 1;
  R037: D6PGL => D6PGC; v_37();
    v_37 = 1;
  R038: D6PGC + NADP => NADPH + CO2 + RL5P; v_38();
    v_38 = 1;
  R039: RL5P -> X5P; v_39();
    v_39 = 1;
  R040: RL5P -> R5P; v_40();
    v_40 = 1;
  R041: RIB + ATP => R5P + ADP; v_41();
    v_41 = 1;
  R042: R1P -> R5P; v_42();
    v_42 = 1;
  R043: R5P + X5P -> G3P + S7P; v_43();
    v_43 = 1;
  R044: X5P + E4P -> F6P + G3P; v_44();
    v_44 = 1;
  R045: G3P + S7P -> E4P + F6P; v_45();
    v_45 = 1;
  R046: DR5P => G3P + ACAL; v_46();
    v_46 = 1;
  R047: DRIB + ATP => DR5P + ADP; v_47();
    v_47 = 1;
  R048: DR1P -> DR5P; v_48();
    v_48 = 1;
  R049: KDPG => PYR + G3P; v_49();
    v_49 = 1;
  R050: KDG + ATP => KDPG + ADP; v_50();
    v_50 = 1;
  R051: GLUC + ATP => D6PGC + ADP; v_51();
    v_51 = 1;
  R052: D6PGC => KDPG; v_52();
    v_52 = 1;
  R053: DGALAC => DTAGA; v_53();
    v_53 = 1;
  R054: KDG + NAD -> DDOH + NADH; v_54();
    v_54 = 1;
  R055: KDG -> DMAN; v_55();
    v_55 = 1;
  R056: DMAN + NAD -> DFRUC + NADH; v_56();
    v_56 = 1;
  R057: DGLUC -> DFRUC; v_57();
    v_57 = 1;
  R058: UDPG + 2 NAD -> UDPGLUC + 2 NADH; v_58();
    v_58 = 1;
  R059: F1P + ATP => FDP + ADP; v_59();
    v_59 = 1;
  R060: F1P => DHAP + T3; v_60();
    v_60 = 1;
  R061: MAN6P -> F6P; v_61();
    v_61 = 1;
  R062: MAN6P -> MAN1P; v_62();
    v_62 = 1;
  R063: GTP + MAN1P -> PPI + GDPMAN; v_63();
    v_63 = 1;
  R064: MNT1P + NAD => F6P + NADH; v_64();
    v_64 = 1;
  R065: F2P -> FRU + PI; v_65();
    v_65 = 1;
  R066: S6P + NADP -> SB1P + NADPH; v_66();
    v_66 = 1;
  R067: GLAC + ATP => GAL1P + ADP; v_67();
    v_67 = 1;
  R068: UDPG + GAL1P -> G1P + UDPGAL; v_68();
    v_68 = 1;
  R069: UDPG -> UDPGAL; v_69();
    v_69 = 1;
  R070: UTP + GAL1P -> PPI + UDPGAL; v_70();
    v_70 = 1;
  R071: G1P + UTP -> UDPG + PPI; v_71();
    v_71 = 1;
  R072: RAF => GLAC + SUC; v_72();
    v_72 = 1;
  R073: STACHYOSE => RAF + GLAC; v_73();
    v_73 = 1;
  R074: MELI => GLC + GLAC; v_74();
    v_74 = 1;
  R075: EPM -> MAN + GLAC; v_75();
    v_75 = 1;
  R076: GGL -> GL + GLAC; v_76();
    v_76 = 1;
  R077: MELT -> SOT + GLAC; v_77();
    v_77 = 1;
  R078: GALACTINOL => MI + GLAC; v_78();
    v_78 = 1;
  R079: G6GG => GLAC + MELI; v_79();
    v_79 = 1;
  R080: LACTOSE => GLAC + GLC; v_80();
    v_80 = 1;
  R081: LACTOSE + PI => L6P; v_81();
    v_81 = 1;
  R082: a_3KL -> a_3KBDG + bDGLC; v_82();
    v_82 = 1;
  R083: T6P + ATP -> T16B + ADP; v_83();
    v_83 = 1;
  R084: a_3KBDG + NADP -> bGLAC + NADPH; v_84();
    v_84 = 1;
  R085: DGLUCL + NAD -> DGLUCA + NADH; v_85();
    v_85 = 1;
  R086: LXYLULOSE5P => LRIBULOSE5P; v_86();
    v_86 = 1;
  R087: a_3DG6P => LXYLULOSE5P + CO2; v_87();
    v_87 = 1;
  R088: a_2D3DDX + NAD -> a_5H24DP + NADH; v_88();
    v_88 = 1;
  R089: ATP + G1P => PPI + ADPG; v_89();
    v_89 = 1;
  R090: ADPG => ADP + GLYCOGEN; v_90();
    v_90 = 1;
  R091: GLYCOGEN + PI => G1P; v_91();
    v_91 = 1;
  R092: MLTPT + PI -> G1P + MLTTTR; v_92();
    v_92 = 1;
  R093: MLTHX + PI -> G1P + MLTPT; v_93();
    v_93 = 1;
  R094: MLTHPT + PI -> G1P + MLTHX; v_94();
    v_94 = 1;
  R095: MLT + MLTTR => GLC + MLTTTR; v_95();
    v_95 = 1;
  R096: MLT + MLTTTR => GLC + MLTPT; v_96();
    v_96 = 1;
  R097: MLT + MLTPT => GLC + MLTHX; v_97();
    v_97 = 1;
  R098: MLT + MLTHX => GLC + MLTHPT; v_98();
    v_98 = 1;
  R099: IMAL => 2 GLC; v_99();
    v_99 = 1;
  R100: SUC => GLC + FRU; v_100();
    v_100 = 1;
  R101: CB => 2 bDGLC; v_101();
    v_101 = 1;
  R102: TRE6P => GLC + G6P; v_102();
    v_102 = 1;
  R103: STA => DEXTRIN + STA; v_103();
    v_103 = 1;
  R104: F6P + GLN => GLU + GA6P; v_104();
    v_104 = 1;
  R105: GA6P => NH3 + F6P; v_105();
    v_105 = 1;
  R106: NAGA6P -> GA6P + AC; v_106();
    v_106 = 1;
  R107: GA6P -> GA1P; v_107();
    v_107 = 1;
  R108: ACCOA + GA1P => NAGA1P + COA; v_108();
    v_108 = 1;
  R109: UTP + NAGA1P -> UDPNAG + PPI; v_109();
    v_109 = 1;
  R110: UDPNAG -> NADMA + UDP; v_110();
    v_110 = 1;
  R111: UDPNAG -> UDPNADMA; v_111();
    v_111 = 1;
  R112: UDPNADMA + 2 NAD => UDPNADMAU + 2 NADH; v_112();
    v_112 = 1;
  R113: NANEU -> NADMA + PYR; v_113();
    v_113 = 1;
  R114: NANEU + PI -> NADMA + PEP; v_114();
    v_114 = 1;
  R115: NADMA + PI -> NADMA6P; v_115();
    v_115 = 1;
  R116: ATP + NADMA => ADP + NADMA6P; v_116();
    v_116 = 1;
  R117: NAGA6P -> NADMA6P; v_117();
    v_117 = 1;
  R118: NANEU9P + PI -> NADMA6P + PEP; v_118();
    v_118 = 1;
  R119: NADMA + UDP -> UDPNADMA; v_119();
    v_119 = 1;
  R120: UDPNAG + PEP => UDPNAGEP + PI; v_120();
    v_120 = 1;
  R121: UDPNAGEP + NADPH => UDPNAM + NADP; v_121();
    v_121 = 1;
  R122: CTP + NANEU -> PPI + CMPNANEU; v_122();
    v_122 = 1;
  R123: CTP + NGNEU -> PPI + CMPNGNEU; v_123();
    v_123 = 1;
  R124: UDPGAL + 2 NAD => UDPDGALAC + 2 NADH; v_124();
    v_124 = 1;
  R125: DTDPGLU + 2 NADP => DTDPDGLUC + 2 NADPH; v_125();
    v_125 = 1;
  R126: DTDPGLU -> DTDPGLAC; v_126();
    v_126 = 1;
  R127: ATP + PYR => AMP + PEP + PI; v_127();
    v_127 = 1;
  R128: PYR + NADH -> LAC + NAD; v_128();
    v_128 = 1;
  R129: ACCOA + PI -> ACETYLP + COA; v_129();
    v_129 = 1;
  R130: AAD + COA -> AMP + ACCOA; v_130();
    v_130 = 1;
  R131: ATP + AC -> PPI + AAD; v_131();
    v_131 = 1;
  R132: ACETYLP + ADP -> AC + ATP; v_132();
    v_132 = 1;
  R133: ACETYLP => AC + PI; v_133();
    v_133 = 1;
  R134: PEP + CO2 => OA + PI; v_134();
    v_134 = 1;
  R135: OA + ATP -> PEP + ADP + CO2; v_135();
    v_135 = 1;
  R136: MAL + NAD -> PYR + CO2 + NADH; v_136();
    v_136 = 1;
  R137: MAL + NADP -> PYR + CO2 + NADPH; v_137();
    v_137 = 1;
  R138: OA => PYR + CO2; v_138();
    v_138 = 1;
  R139: ACCOA + FORMATE -> COA + PYR; v_139();
    v_139 = 1;
  R140: ACCOA + GLX => MAL + COA; v_140();
    v_140 = 1;
  R141: 2 ACCOA => COA + AACCOA; v_141();
    v_141 = 1;
  R142: DHAP => MTG + PI; v_142();
    v_142 = 1;
  R143: RGT + MTG -> LTG; v_143();
    v_143 = 1;
  R144: LTG => RGT + LAC; v_144();
    v_144 = 1;
  R145: ACAL + COA + NAD -> ACCOA + NADH; v_145();
    v_145 = 1;
  R146: ICIT => SUCC + GLX; v_146();
    v_146 = 1;
  R147: FORMATE + NAD => CO2 + NADH; v_147();
    v_147 = 1;
  R148: THF + FORMATE + ATP => ADP + PI + FTHF; v_148();
    v_148 = 1;
  R149: GLAL + NAD => NADH + GLYCOLATE; v_149();
    v_149 = 1;
  R150: a_2PPG => GLYCOLATE + PI; v_150();
    v_150 = 1;
  R151: bALA + AKG -> a_3OPP + GLU; v_151();
    v_151 = 1;
  R152: a_3HPCOA -> PPCOA; v_152();
    v_152 = 1;
  R153: ATP + PROPANOATE -> PPI + PPA; v_153();
    v_153 = 1;
  R154: PPA + COA -> AMP + PPACOA; v_154();
    v_154 = 1;
  R155: PROPANOATE + ATP -> PROPIONYLP + ADP; v_155();
    v_155 = 1;
  R156: PPACOA + PI -> PROPIONYLP + COA; v_156();
    v_156 = 1;
  R157: OBUT + COA -> PPACOA + FORMATE; v_157();
    v_157 = 1;
  R158: a_2HBA + NAD => OBUT + NADH; v_158();
    v_158 = 1;
  R159: a_2P1A + NAD => PPN + NADH; v_159();
    v_159 = 1;
  R160: a_2MCIT + COA -> PPACOA + OA; v_160();
    v_160 = 1;
  R161: a_3HB123TC -> PYR + SUCC; v_161();
    v_161 = 1;
  R162: MMSA + COA + NAD => PPACOA + CO2 + NADH; v_162();
    v_162 = 1;
  R163: THMPP + PYR => a_2HETPP + CO2; v_163();
    v_163 = 1;
  R164: a_2HETPP + PYR => ACLAC + THMPP; v_164();
    v_164 = 1;
  R165: a_3HBCOA + NAD -> AACCOA + NADH; v_165();
    v_165 = 1;
  R166: R3HBCOA + NADP -> AACCOA + NADPH; v_166();
    v_166 = 1;
  R167: a_3HBCOA -> R3HBCOA; v_167();
    v_167 = 1;
  R168: a_3HBCOA -> CCOA; v_168();
    v_168 = 1;
  R169: BUTANAL + COA + NAD => C040COA + NADH; v_169();
    v_169 = 1;
  R170: a_1BOH + NAD -> BUTANAL + NADH; v_170();
    v_170 = 1;
  R171: SUCCSA + NAD => SUCC + NADH; v_171();
    v_171 = 1;
  R172: SUCCSA + NADP => SUCC + NADPH; v_172();
    v_172 = 1;
  R173: GABA + AKG -> SUCCSA + GLU; v_173();
    v_173 = 1;
  R174: a_3H3MGCOA => ACCOA + AAC; v_174();
    v_174 = 1;
  R175: a_3B1A + NAD => a_3BUT + NADH; v_175();
    v_175 = 1;
  R176: a_3OPP + COA + NAD => ACCOA + CO2 + NADH; v_176();
    v_176 = 1;
  R177: NADH + UQ => NAD + UQH2; v_177();
    v_177 = 1;
  R178: NADH + MK => NAD + MKH2; v_178();
    v_178 = 1;
  R179: NADH + DMK => NAD + DMKH2; v_179();
    v_179 = 1;
  R180: FADH2 + UQ => FAD + UQH2; v_180();
    v_180 = 1;
  R181: UQH2 + 0.5 O2 => UQ + 2 Hxt; v_181();
    v_181 = 1;
  R182: PPI => 2 PI; v_182();
    v_182 = 1;
  R183: ADP + PI + 4 Hxt -> ATP; v_183();
    v_183 = 1;
  R184: METTHF + NH3 + CO2 + NADH => GLY + THF + NAD; v_184();
    v_184 = 1;
  R185: CO2 => H2CO3; v_185();
    v_185 = 1;
  R186: NO3 + FEROC => FERIC + NO2; v_186();
    v_186 = 1;
  R187: NO2 + 3 NADH => 3 NAD + NH3; v_187();
    v_187 = 1;
  R188: NO2 + 3 NADPH => 3 NADP + NH3; v_188();
    v_188 = 1;
  R189: NO2 + 6 FEROC => NH3 + 6 FERIC; v_189();
    v_189 = 1;
  R190: ASP -> FUM + NH3; v_190();
    v_190 = 1;
  R191: SLF + ATP => PPI + APS; v_191();
    v_191 = 1;
  R192: APS + ATP => ADP + PAPS; v_192();
    v_192 = 1;
  R193: PAPS + RTHIO => OTHIO + H2SO3 + PAP; v_193();
    v_193 = 1;
  R194: H2SO3 + 3 NADPH => H2S + 3 NADP; v_194();
    v_194 = 1;
  R195: PAP => PI + AMP; v_195();
    v_195 = 1;
  R196: SELT + 3 NADP => SELD + 3 NADPH; v_196();
    v_196 = 1;
  R197: ACCOA + ATP + CO2 => MALCOA + ADP + PI; v_197();
    v_197 = 1;
  R198: MALCOA + ACP => MALACP + COA; v_198();
    v_198 = 1;
  R199: ACCOA + ACP => ACACP + COA; v_199();
    v_199 = 1;
  R200: PPACOA + ACP => PPAACP + COA; v_200();
    v_200 = 1;
  R201: PPAACP + 3 MALACP + 6 NADPH => 6 NADP + C090ACP + 3 CO2 + 3 ACP; v_201();
    v_201 = 1;
  R202: ACACP + 4 MALACP + 8 NADPH => 8 NADP + C100ACP + 4 CO2 + 4 ACP; v_202();
    v_202 = 1;
  R203: PPAACP + 4 MALACP + 8 NADPH => 8 NADP + C110ACP + 4 CO2 + 4 ACP; v_203();
    v_203 = 1;
  R204: ACACP + 5 MALACP + 10 NADPH => 10 NADP + C120ACP + 5 CO2 + 5 ACP; v_204();
    v_204 = 1;
  R205: PPAACP + 5 MALACP + 10 NADPH => 10 NADP + C130ACP + 5 CO2 + 5 ACP; v_205();
    v_205 = 1;
  R206: ACACP + 6 MALACP + 12 NADPH => 12 NADP + C140ACP + 6 CO2 + 6 ACP; v_206();
    v_206 = 1;
  R207: PPAACP + 6 MALACP + 12 NADPH => 12 NADP + C150ACP + 6 CO2 + 6 ACP; v_207();
    v_207 = 1;
  R208: PPAACP + 6 MALACP + 11 NADPH => 11 NADP + C151ACP + 6 CO2 + 6 ACP; v_208();
    v_208 = 1;
  R209: ACACP + 7 MALACP + 14 NADPH => 14 NADP + C160ACP + 7 CO2 + 7 ACP; v_209();
    v_209 = 1;
  R210: ACACP + 7 MALACP + 13 NADPH => 13 NADP + C161ACP + 7 CO2 + 7 ACP; v_210();
    v_210 = 1;
  R211: PPAACP + 7 MALACP + 14 NADPH => 14 NADP + C170ACP + 7 CO2 + 7 ACP; v_211();
    v_211 = 1;
  R212: PPAACP + 7 MALACP + 13 NADPH => 13 NADP + C171ACP + 7 CO2 + 7 ACP; v_212();
    v_212 = 1;
  R213: ACACP + 8 MALACP + 16 NADPH => 16 NADP + C180ACP + 8 CO2 + 8 ACP; v_213();
    v_213 = 1;
  R214: ACACP + 8 MALACP + 15 NADPH => 15 NADP + C181ACP + 8 CO2 + 8 ACP; v_214();
    v_214 = 1;
  R215: PPAACP + 8 MALACP + 16 NADPH => 16 NADP + C190ACP + 8 CO2 + 8 ACP; v_215();
    v_215 = 1;
  R216: PPAACP + 8 MALACP + 15 NADPH => 15 NADP + C191ACP + 8 CO2 + 8 ACP; v_216();
    v_216 = 1;
  R217: ACACP + 9 MALACP + 18 NADPH => 18 NADP + C200ACP + 9 CO2 + 9 ACP; v_217();
    v_217 = 1;
  R218: C120 + 6 COA + 5 FAD + 5 NAD + ATP => 6 ACCOA + 5 FADH2 + 5 NADH + AMP + PPI; v_218();
    v_218 = 1;
  R219: C140 + 7 COA + 6 FAD + 6 NAD + ATP => 7 ACCOA + 6 FADH2 + 6 NADH + AMP + PPI; v_219();
    v_219 = 1;
  R220: C150 + 7 COA + 6 FAD + 6 NAD + ATP => 6 ACCOA + PPACOA + 6 FADH2 + 6 NADH + AMP + PPI; v_220();
    v_220 = 1;
  R221: C160 + 8 COA + 7 FAD + 7 NAD + ATP => 8 ACCOA + 7 FADH2 + 7 NADH + AMP + PPI; v_221();
    v_221 = 1;
  R222: C161 + 8 COA + 7 FAD + 7 NAD + ATP => 8 ACCOA + 7 FADH2 + 7 NADH + AMP + PPI; v_222();
    v_222 = 1;
  R223: C180 + 9 COA + 8 FAD + 8 NAD + ATP => 9 ACCOA + 8 FADH2 + 8 NADH + AMP + PPI; v_223();
    v_223 = 1;
  R224: C181 + 9 COA + 8 FAD + 8 NAD + ATP => 9 ACCOA + 8 FADH2 + 8 NADH + AMP + PPI; v_224();
    v_224 = 1;
  R225: PYR + G3P => DX5P + CO2; v_225();
    v_225 = 1;
  R226: DX5P + NADPH => MDE4P + NADP; v_226();
    v_226 = 1;
  R227: MDE4P + CTP => CDPMDE + PPI; v_227();
    v_227 = 1;
  R228: CDPMDE + ATP => a_2PCDPMDE + ADP; v_228();
    v_228 = 1;
  R229: a_2PCDPMDE => MDECPP + CMP; v_229();
    v_229 = 1;
  R230: MDECPP + NADH => NAD + HMB4PP; v_230();
    v_230 = 1;
  R231: HMB4PP + NADH => NAD + IPP; v_231();
    v_231 = 1;
  R232: IPP -> DMPP; v_232();
    v_232 = 1;
  R233: DMPP + IPP => GPP + PPI; v_233();
    v_233 = 1;
  R234: GPP + IPP => FPP + PPI; v_234();
    v_234 = 1;
  R235: a_3H3MGCOA + 2 NADPH => MVLN + COA + 2 NADP; v_235();
    v_235 = 1;
  R236: FPP + IPP => GGPP + PPI; v_236();
    v_236 = 1;
  R237: GGPP + IPP => PPPP + PPI; v_237();
    v_237 = 1;
  R238: PPPP + IPP => HPPP + PPI; v_238();
    v_238 = 1;
  R239: HPPP + IPP => HEPPP + PPI; v_239();
    v_239 = 1;
  R240: HEPPP + IPP => OPP + PPI; v_240();
    v_240 = 1;
  R241: a_3PG + ADP -> DGLYCERATE + ATP; v_241();
    v_241 = 1;
  R242: NADH + DGLYCERATE -> T3 + NAD; v_242();
    v_242 = 1;
  R243: T3 + NADH -> GL + NAD; v_243();
    v_243 = 1;
  R244: T3 + NADPH -> GL + NADP; v_244();
    v_244 = 1;
  R245: GL + ATP => GL3P + ADP; v_245();
    v_245 = 1;
  R246: DGR => AGL + 0.052 C120 + 0.182 C140 + 0.05 C150 + 0.39 C160 + 0.24 C161 + 0.01 C180 + 0.076 C181; v_246();
    v_246 = 1;
  R247: TGL => DGR + 0.052 C120 + 0.182 C140 + 0.05 C150 + 0.39 C160 + 0.24 C161 + 0.01 C180 + 0.076 C181; v_247();
    v_247 = 1;
  R248: DHAP + NADH => GL3P + NAD; v_248();
    v_248 = 1;
  R249: DHAP + NADPH => GL3P + NADP; v_249();
    v_249 = 1;
  R250: DHAP + UQH2 -> GL3P + UQ; v_250();
    v_250 = 1;
  R251: DHAP + MKH2 -> GL3P + MK; v_251();
    v_251 = 1;
  R252: DHAP + DMKH2 -> GL3P + DMK; v_252();
    v_252 = 1;
  R253: GL3P + ACOA => a_2AGL3P + COA; v_253();
    v_253 = 1;
  R254: GL3P + 0.052 C120ACP + 0.182 C140ACP + 0.05 C150ACP + 0.39 C160ACP + 0.24 C161ACP + 0.01 C180ACP + 0.076 C181ACP => AGL3P + ACP; v_254();
    v_254 = 1;
  R255: AGL3P + 0.052 C120ACP + 0.182 C140ACP + 0.05 C150ACP + 0.39 C160ACP + 0.24 C161ACP + 0.01 C180ACP + 0.076 C181ACP => PA + ACP; v_255();
    v_255 = 1;
  R256: DGR + ATP => ADP + PA; v_256();
    v_256 = 1;
  R257: PC => a_2AG3PC + 0.052 C120 + 0.182 C140 + 0.05 C150 + 0.39 C160 + 0.24 C161 + 0.01 C180 + 0.076 C181; v_257();
    v_257 = 1;
  R258: G3PC => CHOLINE + GL3P; v_258();
    v_258 = 1;
  R259: PA + CTP -> CDPDG + PPI; v_259();
    v_259 = 1;
  R260: CDPDG + SER -> CMP + PS; v_260();
    v_260 = 1;
  R261: PS => a_2AG3PS + 0.052 C120 + 0.182 C140 + 0.05 C150 + 0.39 C160 + 0.24 C161 + 0.01 C180 + 0.076 C181; v_261();
    v_261 = 1;
  R262: PS => PE + CO2; v_262();
    v_262 = 1;
  R263: PE => a_2AG3PE + 0.052 C120 + 0.182 C140 + 0.05 C150 + 0.39 C160 + 0.24 C161 + 0.01 C180 + 0.076 C181; v_263();
    v_263 = 1;
  R264: G3PE => ETHA + GL3P; v_264();
    v_264 = 1;
  R265: CDPDG + GL3P -> CMP + PGP; v_265();
    v_265 = 1;
  R266: PGP => PI + PG; v_266();
    v_266 = 1;
  R267: CDPDG + PG => CMP + CL; v_267();
    v_267 = 1;
  R268: R5P + ATP -> PRPP + AMP; v_268();
    v_268 = 1;
  R269: PRPP + GLN => PRAM + PPI + GLU; v_269();
    v_269 = 1;
  R270: PRAM + ATP + GLY -> GAR + ADP + PI; v_270();
    v_270 = 1;
  R271: GAR + FTHF => FGAR + THF; v_271();
    v_271 = 1;
  R272: FGAR + ATP + GLN => FGAM + GLU + ADP + PI; v_272();
    v_272 = 1;
  R273: FGAM + ATP => AIR + ADP + PI; v_273();
    v_273 = 1;
  R274: AIR + CO2 + ATP => CAIR + ADP + PI; v_274();
    v_274 = 1;
  R275: CAIR + ATP + ASP -> SAICAR + ADP + PI; v_275();
    v_275 = 1;
  R276: SAICAR -> AICAR + FUM; v_276();
    v_276 = 1;
  R277: AICAR + FTHF -> PRFICA + THF; v_277();
    v_277 = 1;
  R278: PRFICA -> IMP; v_278();
    v_278 = 1;
  R279: IMP + GTP + ASP => ASUC + GDP + PI; v_279();
    v_279 = 1;
  R280: ASUC -> FUM + AMP; v_280();
    v_280 = 1;
  R281: IMP + NAD => XMP + NADH; v_281();
    v_281 = 1;
  R282: XMP + ATP + GLN => GMP + GLU + AMP + PPI; v_282();
    v_282 = 1;
  R283: GMP + NADPH => IMP + NH3 + NADP; v_283();
    v_283 = 1;
  R284: a_23cAMP => a_3AMP; v_284();
    v_284 = 1;
  R285: a_23cGMP => a_3GMP; v_285();
    v_285 = 1;
  R286: ATP + INS -> ADP + IMP; v_286();
    v_286 = 1;
  R287: ATP + GSN -> ADP + GMP; v_287();
    v_287 = 1;
  R288: ADN => INS + NH3; v_288();
    v_288 = 1;
  R289: DA -> DIN + NH3; v_289();
    v_289 = 1;
  R290: IMP => INS + PI; v_290();
    v_290 = 1;
  R291: AMP => ADN + PI; v_291();
    v_291 = 1;
  R292: XMP => XTSINE + PI; v_292();
    v_292 = 1;
  R293: GMP => GSN + PI; v_293();
    v_293 = 1;
  R294: DAMP -> DA + PI; v_294();
    v_294 = 1;
  R295: DGMP -> DG + PI; v_295();
    v_295 = 1;
  R296: DIN + PI => HYXN + DR1P; v_296();
    v_296 = 1;
  R297: DATP + PYR -> DADP + PEP; v_297();
    v_297 = 1;
  R298: GTP + PYR -> GDP + PEP; v_298();
    v_298 = 1;
  R299: DGDP + PEP => DGTP + PYR; v_299();
    v_299 = 1;
  R300: ATP => cAMP + PPI; v_300();
    v_300 = 1;
  R301: GTP => cGMP + PPI; v_301();
    v_301 = 1;
  R302: DGMP + ATP -> DGDP + ADP; v_302();
    v_302 = 1;
  R303: IDP + ATP -> ITP + ADP; v_303();
    v_303 = 1;
  R304: ATP + DIDP -> ADP + DITP; v_304();
    v_304 = 1;
  R305: AICAR + PPI -> a_5A4IC + PRPP; v_305();
    v_305 = 1;
  R306: AD + PRPP => PPI + AMP; v_306();
    v_306 = 1;
  R307: GN + PRPP => PPI + GMP; v_307();
    v_307 = 1;
  R308: HYXN + PRPP => PPI + IMP; v_308();
    v_308 = 1;
  R309: XAN + PRPP => PPI + XMP; v_309();
    v_309 = 1;
  R310: AMP + PPI -> AD + PRPP; v_310();
    v_310 = 1;
  R311: DIN + PI -> HYXN + DR1P; v_311();
    v_311 = 1;
  R312: DA + PI -> AD + DR1P; v_312();
    v_312 = 1;
  R313: DG + PI -> GN + DR1P; v_313();
    v_313 = 1;
  R314: HYXN + R1P -> INS + PI; v_314();
    v_314 = 1;
  R315: AD + R1P -> PI + ADN; v_315();
    v_315 = 1;
  R316: GN + R1P -> PI + GSN; v_316();
    v_316 = 1;
  R317: XAN + R1P -> PI + XTSINE; v_317();
    v_317 = 1;
  R318: DGTP => DG + H5P3O10; v_318();
    v_318 = 1;
  R319: ATP + GTP => pppGpp + AMP; v_319();
    v_319 = 1;
  R320: ppGpp -> GDP + PPI; v_320();
    v_320 = 1;
  R321: ATP + AMP -> 2 ADP; v_321();
    v_321 = 1;
  R322: ADP + RTHIO => DADP + OTHIO; v_322();
    v_322 = 1;
  R323: DADP + ATP -> DATP + ADP; v_323();
    v_323 = 1;
  R324: GMP + ATP -> GDP + ADP; v_324();
    v_324 = 1;
  R325: GDP + ATP -> GTP + ADP; v_325();
    v_325 = 1;
  R326: GDP + RTHIO => DGDP + OTHIO; v_326();
    v_326 = 1;
  R327: DGDP + ATP -> DGTP + ADP; v_327();
    v_327 = 1;
  R328: ARIB => AMP + R5P; v_328();
    v_328 = 1;
  R329: ATP + RTHIO => DATP + OTHIO; v_329();
    v_329 = 1;
  R330: GTP + RTHIO => DGTP + OTHIO; v_330();
    v_330 = 1;
  R331: ATP + DAMP -> ADP + DADP; v_331();
    v_331 = 1;
  R332: GMP + PPI -> GN + PRPP; v_332();
    v_332 = 1;
  R333: XMP + PPI -> XAN + PRPP; v_333();
    v_333 = 1;
  R334: pppGpp -> ppGpp + PI; v_334();
    v_334 = 1;
  R335: AppppA => 2 ADP; v_335();
    v_335 = 1;
  R336: CAP + ASP => CAASP + PI; v_336();
    v_336 = 1;
  R337: CAASP -> DOROA; v_337();
    v_337 = 1;
  R338: DOROA + UQ -> UQH2 + OROA; v_338();
    v_338 = 1;
  R339: DOROA + MK -> MKH2 + OROA; v_339();
    v_339 = 1;
  R340: OROA + PRPP -> PPI + OMP; v_340();
    v_340 = 1;
  R341: OMP => CO2 + UMP; v_341();
    v_341 = 1;
  R342: ATP + UMP -> ADP + UDP; v_342();
    v_342 = 1;
  R343: UDP + ATP -> UTP + ADP; v_343();
    v_343 = 1;
  R344: UTP + GLN + ATP => GLU + CTP + ADP + PI; v_344();
    v_344 = 1;
  R345: ATP + UTP + NH3 => ADP + PI + CTP; v_345();
    v_345 = 1;
  R346: CDP + ATP -> CTP + ADP; v_346();
    v_346 = 1;
  R347: CDP + RTHIO => DCDP + OTHIO; v_347();
    v_347 = 1;
  R348: DCDP + ATP -> DCTP + ADP; v_348();
    v_348 = 1;
  R349: DT + ATP => ADP + DTMP; v_349();
    v_349 = 1;
  R350: DTMP + ATP -> DTDP + ADP; v_350();
    v_350 = 1;
  R351: DTDP + ATP -> DTTP + ADP; v_351();
    v_351 = 1;
  R352: CMP + ATP -> ADP + CDP; v_352();
    v_352 = 1;
  R353: OTHIO + NADPH => RTHIO + NADP; v_353();
    v_353 = 1;
  R354: DCMP + ATP -> ADP + DCDP; v_354();
    v_354 = 1;
  R355: DU + ATP => DUMP + ADP; v_355();
    v_355 = 1;
  R356: URA + PRPP -> UMP + PPI; v_356();
    v_356 = 1;
  R357: URA + R5P -> PURI5P; v_357();
    v_357 = 1;
  R358: DUMP + METTHF => DHF + DTMP; v_358();
    v_358 = 1;
  R359: DU + PI => URA + DR1P; v_359();
    v_359 = 1;
  R360: DT + PI => TM + DR1P; v_360();
    v_360 = 1;
  R361: DUDP + ATP -> DUTP + ADP; v_361();
    v_361 = 1;
  R362: UDP + RTHIO => OTHIO + DUDP; v_362();
    v_362 = 1;
  R363: UTP + RTHIO => DUTP + OTHIO; v_363();
    v_363 = 1;
  R364: CTP + RTHIO => DCTP + OTHIO; v_364();
    v_364 = 1;
  R365: ATP + DUMP -> ADP + DUDP; v_365();
    v_365 = 1;
  R366: ATP + CYTD => ADP + CMP; v_366();
    v_366 = 1;
  R367: ATP + URI => ADP + UMP; v_367();
    v_367 = 1;
  R368: DATP + CYTD => DADP + CMP; v_368();
    v_368 = 1;
  R369: DATP + URI => DADP + UMP; v_369();
    v_369 = 1;
  R370: DCTP + CYTD => DCDP + CMP; v_370();
    v_370 = 1;
  R371: DCTP + URI => DCDP + UMP; v_371();
    v_371 = 1;
  R372: DGTP + CYTD => DGDP + CMP; v_372();
    v_372 = 1;
  R373: DGTP + URI => DGDP + UMP; v_373();
    v_373 = 1;
  R374: DTTP + CYTD => DTDP + CMP; v_374();
    v_374 = 1;
  R375: DTTP + URI => DTDP + UMP; v_375();
    v_375 = 1;
  R376: DUTP + CYTD => DUDP + CMP; v_376();
    v_376 = 1;
  R377: DUTP + URI => DUDP + UMP; v_377();
    v_377 = 1;
  R378: GTP + CYTD => GDP + CMP; v_378();
    v_378 = 1;
  R379: GTP + URI => GDP + UMP; v_379();
    v_379 = 1;
  R380: ITP + CYTD => IDP + CMP; v_380();
    v_380 = 1;
  R381: ITP + URI => IDP + UMP; v_381();
    v_381 = 1;
  R382: UTP + CYTD => UDP + CMP; v_382();
    v_382 = 1;
  R383: UTP + URI => UDP + UMP; v_383();
    v_383 = 1;
  R384: UMP => URI + PI; v_384();
    v_384 = 1;
  R385: CMP => CYTD + PI; v_385();
    v_385 = 1;
  R386: DCMP => DC + PI; v_386();
    v_386 = 1;
  R387: DTMP => DT + PI; v_387();
    v_387 = 1;
  R388: a_23cCMP => a_3CMP; v_388();
    v_388 = 1;
  R389: a_23cUMP => a_3UMP; v_389();
    v_389 = 1;
  R390: a_5MC -> TM + NH3; v_390();
    v_390 = 1;
  R391: CT => URA + NH3; v_391();
    v_391 = 1;
  R392: DC => DU + NH3; v_392();
    v_392 = 1;
  R393: CYTD => URI + NH3; v_393();
    v_393 = 1;
  R394: DCMP => DUMP + NH3; v_394();
    v_394 = 1;
  R395: URI + PI -> URA + R1P; v_395();
    v_395 = 1;
  R396: GLU + NH3 + ATP => GLN + ADP + PI; v_396();
    v_396 = 1;
  R397: GLN + AKG + NADPH => 2 GLU + NADP; v_397();
    v_397 = 1;
  R398: GLU => GABA + CO2; v_398();
    v_398 = 1;
  R399: GLN + 2 ATP + CO2 => GLU + CAP + 2 ADP + PI; v_399();
    v_399 = 1;
  R400: ATP + GLU + CYS => ADP + PI + GCYS; v_400();
    v_400 = 1;
  R401: TRNAGLU + GLU + ATP => GLUTRNAGLU + PPI + AMP; v_401();
    v_401 = 1;
  R402: ATP + GLN + TRNAGLN => AMP + PPI + GTRNA; v_402();
    v_402 = 1;
  R403: ATP + GCYS + GLY => ADP + PI + RGT; v_403();
    v_403 = 1;
  R404: NAD + 2 RGT -> OGT + NADH; v_404();
    v_404 = 1;
  R405: NADP + 2 RGT -> OGT + NADPH; v_405();
    v_405 = 1;
  R406: OA + GLU -> ASP + AKG; v_406();
    v_406 = 1;
  R407: ATP + ASP + TRNAASP => AMP + PPI + ASPTRNAASP; v_407();
    v_407 = 1;
  R408: ATP + ALA + TRNAALA -> AMP + PPI + ALATRNA; v_408();
    v_408 = 1;
  R409: ATP + ASN + TRNAASN => AMP + PPI + ASNTRNAASN; v_409();
    v_409 = 1;
  R410: ASP + ATP + GLN => GLU + ASN + AMP + PPI; v_410();
    v_410 = 1;
  R411: ASN => ASP + NH3; v_411();
    v_411 = 1;
  R412: PYR + GLU -> AKG + ALA; v_412();
    v_412 = 1;
  R413: ASP => bALA + CO2; v_413();
    v_413 = 1;
  R414: CNS => bALA + HIS; v_414();
    v_414 = 1;
  R415: ASP + ATP => ADP + BASP; v_415();
    v_415 = 1;
  R416: BASP + NADPH => NADP + PI + ASPSA; v_416();
    v_416 = 1;
  R417: ASPSA + NADH -> NAD + HSER; v_417();
    v_417 = 1;
  R418: ASPSA + NADPH -> NADP + HSER; v_418();
    v_418 = 1;
  R419: HSER + ATP => ADP + PHSER; v_419();
    v_419 = 1;
  R420: PHSER => THR + PI; v_420();
    v_420 = 1;
  R421: a_3PG + NAD => NADH + PHP; v_421();
    v_421 = 1;
  R422: PHP + GLU => AKG + a_3PSER; v_422();
    v_422 = 1;
  R423: a_3PSER => PI + SER; v_423();
    v_423 = 1;
  R424: THF + SER -> GLY + METTHF; v_424();
    v_424 = 1;
  R425: THR -> GLY + ACAL; v_425();
    v_425 = 1;
  R426: ATHR -> GLY + ACAL; v_426();
    v_426 = 1;
  R427: ACCOA + GLY -> COA + a_2A3OB; v_427();
    v_427 = 1;
  R428: THR + NAD => a_2A3OB + NADH; v_428();
    v_428 = 1;
  R429: THF + SAP => METTHF + NH3 + DHLIPOYLPROTEIN; v_429();
    v_429 = 1;
  R430: GLY + LIPOYLPROTEIN => SAP + CO2; v_430();
    v_430 = 1;
  R431: DHLIPOYLPROTEIN + NAD => NADH + LIPOYLPROTEIN; v_431();
    v_431 = 1;
  R432: SER => PYR + NH3; v_432();
    v_432 = 1;
  R433: SER -> PYR + NH3; v_433();
    v_433 = 1;
  R434: THR => OBUT + NH3; v_434();
    v_434 = 1;
  R435: THMNP + SER -> MTHMNP + GLY; v_435();
    v_435 = 1;
  R436: ATP + THR + TRNATHR => AMP + PPI + THRTRNATHR; v_436();
    v_436 = 1;
  R437: ATP + SER + TRNASER => AMP + PPI + SERTRNASER; v_437();
    v_437 = 1;
  R438: ATP + GLY + TRNAGLY => AMP + PPI + GLYTRNAGLY; v_438();
    v_438 = 1;
  R439: GLU + ASPSA => AKG + a_24DAB; v_439();
    v_439 = 1;
  R440: BAL + FAD => FADH2 + BETAINE; v_440();
    v_440 = 1;
  R441: BAL + NAD => BETAINE + NADH; v_441();
    v_441 = 1;
  R442: MTG + NADPH => HAC + NADP; v_442();
    v_442 = 1;
  R443: HSER + SUCCOA -> OSLHSER + COA; v_443();
    v_443 = 1;
  R444: CYS + OSLHSER => LLCT + SUCC; v_444();
    v_444 = 1;
  R445: OSLHSER + H2S => HCYS + SUCC; v_445();
    v_445 = 1;
  R446: OSLHSER => SUCC + OBUT + NH3; v_446();
    v_446 = 1;
  R447: OAHSER + CYS -> LLCT + AC; v_447();
    v_447 = 1;
  R448: OAHSER + H2S => HCYS + AC; v_448();
    v_448 = 1;
  R449: OAHSER + HO3S2 + RTHIO => HCYS + H2SO3 + OTHIO + AC; v_449();
    v_449 = 1;
  R450: LLCT => HCYS + PYR + NH3; v_450();
    v_450 = 1;
  R451: HCYS + MTHF -> THF + MET; v_451();
    v_451 = 1;
  R452: a_5MTGLU + HCYS => TGLU + MET; v_452();
    v_452 = 1;
  R453: SRLH -> RIB + HCYS; v_453();
    v_453 = 1;
  R454: ATP + MET + TRNAMET => AMP + PPI + METTRNA; v_454();
    v_454 = 1;
  R455: METTRNA + FTHF => THF + FMETTRNA; v_455();
    v_455 = 1;
  R456: MET + ATP => PPI + PI + SAM; v_456();
    v_456 = 1;
  R457: SAH -> SRLH + AD; v_457();
    v_457 = 1;
  R458: H2S + PYR + NH3 => CYS; v_458();
    v_458 = 1;
  R459: CYST => PYR + NH3 + TCYS; v_459();
    v_459 = 1;
  R460: SER + ACCOA -> COA + ASER; v_460();
    v_460 = 1;
  R461: ASER + H2S => CYS + AC; v_461();
    v_461 = 1;
  R462: MPYR + NADH => a_3MLAC + NAD; v_462();
    v_462 = 1;
  R463: ASER + HO3S2 + RTHIO => CYS + H2SO3 + OTHIO + AC; v_463();
    v_463 = 1;
  R464: ASER + HO3S2 => SSLCYS + AC; v_464();
    v_464 = 1;
  R465: CYSTEATE + AKG -> a_3SPYR + GLU; v_465();
    v_465 = 1;
  R466: a_3SLALA + AKG => a_3SFPYR + GLU; v_466();
    v_466 = 1;
  R467: MPYR + GLU => CYS + AKG; v_467();
    v_467 = 1;
  R468: SER => a_2AA; v_468();
    v_468 = 1;
  R469: ATP + CYS + TRNACYS => AMP + PPI + CYSTRNACYS; v_469();
    v_469 = 1;
  R470: HIBUT + NAD => a_3OPP + NADH; v_470();
    v_470 = 1;
  R471: S3MBDHL + COA => a_3MBCOA + DLIPO; v_471();
    v_471 = 1;
  R472: OIVAL + LIPO => S2MPDHL + CO2; v_472();
    v_472 = 1;
  R473: S2MPDHL + COA => a_2MPPACOA + DLIPO; v_473();
    v_473 = 1;
  R474: S2MBDHL + COA => a_2MBCOA + DLIPO; v_474();
    v_474 = 1;
  R475: a_3MBCOA + FAD => a_3MCCOA + FADH2; v_475();
    v_475 = 1;
  R476: a_3HIVCOA -> a_3MCCOA; v_476();
    v_476 = 1;
  R477: a_2MP2ECOA => a_3HIBCOA; v_477();
    v_477 = 1;
  R478: a_3H2MBCOA => a_2MB2ECOA; v_478();
    v_478 = 1;
  R479: ATP + a_3MCCOA + HCO3 => ADP + PI + a_3MGCOA; v_479();
    v_479 = 1;
  R480: HIBUT + NAD -> MMSA + NADH; v_480();
    v_480 = 1;
  R481: a_3H2MBCOA + NAD -> a_2MAACCOA + NADH; v_481();
    v_481 = 1;
  R482: MMSA + NAD => MM + NADH; v_482();
    v_482 = 1;
  R483: COA + a_2MAACCOA => PPACOA + ACCOA; v_483();
    v_483 = 1;
  R484: ACLAC + NADPH => NADP + DHMVA; v_484();
    v_484 = 1;
  R485: DHMVA => OIVAL; v_485();
    v_485 = 1;
  R486: OIVAL + GLU -> AKG + VAL; v_486();
    v_486 = 1;
  R487: OIVAL + ALA => VAL + PYR; v_487();
    v_487 = 1;
  R488: OBUT + a_2HETPP => ABUT + THMPP; v_488();
    v_488 = 1;
  R489: ABUT + NADPH => NADP + DHMP; v_489();
    v_489 = 1;
  R490: DHMP => a_3MOP; v_490();
    v_490 = 1;
  R491: a_3MOP + GLU -> AKG + ILE; v_491();
    v_491 = 1;
  R492: ACCOA + OIVAL => COA + IPPMAL; v_492();
    v_492 = 1;
  R493: IPPMAL -> CBHCAP; v_493();
    v_493 = 1;
  R494: CBHCAP + NAD => NADH + OICAP; v_494();
    v_494 = 1;
  R495: OICAP => a_4MOP + CO2; v_495();
    v_495 = 1;
  R496: a_4MOP + GLU -> AKG + LEU; v_496();
    v_496 = 1;
  R497: ATP + LEU + TRNALEU => AMP + PPI + LEUTRNA; v_497();
    v_497 = 1;
  R498: ATP + VAL + TRNAVAL => AMP + PPI + VALTRNAVAL; v_498();
    v_498 = 1;
  R499: ATP + ILE + TRNAILE => AMP + PPI + ILETRNAILE; v_499();
    v_499 = 1;
  R500: ASPSA + PYR => DHDP; v_500();
    v_500 = 1;
  R501: DHDP + NADPH => NADP + TDHDP; v_501();
    v_501 = 1;
  R502: DHDP + NADH => NAD + TDHDP; v_502();
    v_502 = 1;
  R503: TDHDP + SUCCOA => SAOPIM + COA; v_503();
    v_503 = 1;
  R504: SAOPIM + GLU => SDAPIM + AKG; v_504();
    v_504 = 1;
  R505: SDAPIM => DAPIM + SUCC; v_505();
    v_505 = 1;
  R506: DAPIM -> MDAPIM; v_506();
    v_506 = 1;
  R507: MDAPIM => LYS + CO2; v_507();
    v_507 = 1;
  R508: ATP + LYS + TRNALYS => AMP + PPI + LYSTRNA; v_508();
    v_508 = 1;
  R509: a_2OAD + LIPO => SGDHL + CO2; v_509();
    v_509 = 1;
  R510: GLUTCOA + DLIPO -> COA + SGDHL; v_510();
    v_510 = 1;
  R511: ARG => CITR + NH3; v_511();
    v_511 = 1;
  R512: SUCCOA + ARG -> COA + N2SUCCARG; v_512();
    v_512 = 1;
  R513: ATP + ARG + TRNAARG -> AMP + PPI + ARGTRNAARG; v_513();
    v_513 = 1;
  R514: ORN => PTRC + CO2; v_514();
    v_514 = 1;
  R515: AGMATINE => PTRC + UREA; v_515();
    v_515 = 1;
  R516: ARG => AGMATINE + CO2; v_516();
    v_516 = 1;
  R517: N2SUCCGLU5SA + NAD -> N2SUCCGLU + NADH; v_517();
    v_517 = 1;
  R518: N2SUCCGLU => GLU + SUCC; v_518();
    v_518 = 1;
  R519: P5C + NAD => NADH + GLU; v_519();
    v_519 = 1;
  R520: P5C + NADP => NADPH + GLU; v_520();
    v_520 = 1;
  R521: GLUGSAL + NAD => NADH + GLU; v_521();
    v_521 = 1;
  R522: PRO + FAD => P5C + FADH2; v_522();
    v_522 = 1;
  R523: ATP + PRO + TRNAPRO => AMP + PPI + PROTRNAPRO; v_523();
    v_523 = 1;
  R524: a_4HPRO + FAD => L1P3H5C + FADH2; v_524();
    v_524 = 1;
  R525: L1P3H5C + NADH => a_4HPRO + NAD; v_525();
    v_525 = 1;
  R526: L1P3H5C + NADPH => a_4HPRO + NADP; v_526();
    v_526 = 1;
  R527: L1P3H5C + NAD => E4HGLU + NADH; v_527();
    v_527 = 1;
  R528: L1P3H5C + NADP => E4HGLU + NADPH; v_528();
    v_528 = 1;
  R529: E4HGLU + NAD -> a_4HGLUSA + NADH; v_529();
    v_529 = 1;
  R530: E4HGLU + AKG => HYDROXYAKG + GLU; v_530();
    v_530 = 1;
  R531: HYDROXYAKG -> PYR + GLX; v_531();
    v_531 = 1;
  R532: N4AAB + NAD => a_4AABUT + NADH; v_532();
    v_532 = 1;
  R533: a_4AB + NADP => GABA + NADPH; v_533();
    v_533 = 1;
  R534: SAMA + PTRC => a_5MTA + SPRMD; v_534();
    v_534 = 1;
  R535: HCNS => GABA + HIS; v_535();
    v_535 = 1;
  R536: a_5MTA => AD + a_5MDR; v_536();
    v_536 = 1;
  R537: HYDROXYAKG => PYR + GLX; v_537();
    v_537 = 1;
  R538: PRPP + ATP => PPI + PRBATP; v_538();
    v_538 = 1;
  R539: PRBATP => PPI + PRBAMP; v_539();
    v_539 = 1;
  R540: PRBAMP => PRFP; v_540();
    v_540 = 1;
  R541: PRFP => PRLP; v_541();
    v_541 = 1;
  R542: PRLP + GLN => GLU + AICAR + DIMGP; v_542();
    v_542 = 1;
  R543: DIMGP => IMACP; v_543();
    v_543 = 1;
  R544: IMACP + GLU => AKG + HISOLP; v_544();
    v_544 = 1;
  R545: HISOLP => PI + HISOL; v_545();
    v_545 = 1;
  R546: HISOL + 2 NAD => HIS + 2 NADH; v_546();
    v_546 = 1;
  R547: HIS + SAM => NMHIS + SAH; v_547();
    v_547 = 1;
  R548: ATP + HIS + TRNAHIS => AMP + PPI + HISTRNAHIS; v_548();
    v_548 = 1;
  R549: HIS => UC + NH3; v_549();
    v_549 = 1;
  R550: UC => a_4I5P; v_550();
    v_550 = 1;
  R551: a_4I5P => NFGLU; v_551();
    v_551 = 1;
  R552: NFGLU => GLU + FA; v_552();
    v_552 = 1;
  R553: I4AA + NAD => I4AC + NADH; v_553();
    v_553 = 1;
  R554: a_5CM2HM => a_5C2O3E; v_554();
    v_554 = 1;
  R555: AKG + TYR -> a_4HPP + GLU; v_555();
    v_555 = 1;
  R556: a_4HPP + O2 => HOMOGEN + CO2; v_556();
    v_556 = 1;
  R557: a_4MAAC => a_4FAAC; v_557();
    v_557 = 1;
  R558: a_34DHPEG + NAD -> a_34DHMA + NADH; v_558();
    v_558 = 1;
  R559: PHE + AKG -> PHPYR + GLU; v_559();
    v_559 = 1;
  R560: PHPYR + O2 => a_2HPA + CO2; v_560();
    v_560 = 1;
  R561: DPHE => PHPYR + NH3; v_561();
    v_561 = 1;
  R562: TRP => INDOLE + PYR + NH3; v_562();
    v_562 = 1;
  R563: ATP + TRP + TRNATRP => AMP + PPI + TRPTRNATRP; v_563();
    v_563 = 1;
  R564: a_5HIAA + NAD => a_5HIAC + NADH; v_564();
    v_564 = 1;
  R565: I3AA + NAD => I3AC + NADH; v_565();
    v_565 = 1;
  R566: 2 a_3HAN + 2 O2 => CVN + 2 H2O2; v_566();
    v_566 = 1;
  R567: a_2OAD + COA + NAD => GLUTCOA + CO2 + NADH; v_567();
    v_567 = 1;
  R568: E4P + PEP => PI + a_3DDAH7P; v_568();
    v_568 = 1;
  R569: a_3DDAH7P => DQT + PI; v_569();
    v_569 = 1;
  R570: DQT => DHSK; v_570();
    v_570 = 1;
  R571: DHSK -> a_34DHB; v_571();
    v_571 = 1;
  R572: DHSK + NADPH => SME + NADP; v_572();
    v_572 = 1;
  R573: SME + ATP => ADP + SME3P; v_573();
    v_573 = 1;
  R574: SME3P + PEP => a_3PSME + PI; v_574();
    v_574 = 1;
  R575: a_3PSME => PI + CHOR; v_575();
    v_575 = 1;
  R576: CHOR + GLN => GLU + PYR + AN; v_576();
    v_576 = 1;
  R577: CHOR + NH3 => AN + PYR; v_577();
    v_577 = 1;
  R578: AN + PRPP => PPI + NPRAN; v_578();
    v_578 = 1;
  R579: NPRAN => CPAD5P; v_579();
    v_579 = 1;
  R580: CPAD5P => CO2 + IGP; v_580();
    v_580 = 1;
  R581: IGP + SER => G3P + TRP; v_581();
    v_581 = 1;
  R582: SER + INDOLE => TRP; v_582();
    v_582 = 1;
  R583: INDOLE + G3P -> IGP; v_583();
    v_583 = 1;
  R584: CHOR -> PHEN; v_584();
    v_584 = 1;
  R585: PHEN => CO2 + PHPYR; v_585();
    v_585 = 1;
  R586: ATP + PHE + TRNAPHE => AMP + PPI + PHETRNAPHE; v_586();
    v_586 = 1;
  R587: PHEN + NAD => a_4HPP + CO2 + NADH; v_587();
    v_587 = 1;
  R588: a_4HPP + GLU => AKG + TYR; v_588();
    v_588 = 1;
  R589: ATP + TYR + TRNATYR => AMP + PPI + TRYTRNATYR; v_589();
    v_589 = 1;
  R590: AG => PHE + CO2; v_590();
    v_590 = 1;
  R591: THBPT + PHE + O2 => DHBPT + TYR; v_591();
    v_591 = 1;
  R592: GLU + ATP => ADP + GLUP; v_592();
    v_592 = 1;
  R593: GLUP + NADPH => NADP + PI + GLUGSAL; v_593();
    v_593 = 1;
  R594: GLUGSAL -> P5C; v_594();
    v_594 = 1;
  R595: P5C + NADPH -> PRO + NADP; v_595();
    v_595 = 1;
  R596: PRO + NAD -> P5C + NADH; v_596();
    v_596 = 1;
  R597: GLU + ACCOA => COA + NAGLU; v_597();
    v_597 = 1;
  R598: NAGLU + ATP => ADP + NAGLUP; v_598();
    v_598 = 1;
  R599: NAGLUP + NADPH => NADP + PI + NAGLUS; v_599();
    v_599 = 1;
  R600: NAGLUS + GLU => AKG + NAORN; v_600();
    v_600 = 1;
  R601: NAORN => AC + ORN; v_601();
    v_601 = 1;
  R602: ORN + CAP -> CITR + PI; v_602();
    v_602 = 1;
  R603: CITR + ASP + ATP -> AMP + PPI + ARGSUCC; v_603();
    v_603 = 1;
  R604: ARGSUCC -> FUM + ARG; v_604();
    v_604 = 1;
  R605: bAPA + NAD => bALA + NADH; v_605();
    v_605 = 1;
  R606: a_5MTA + SPRM => SAMA + SPRMD; v_606();
    v_606 = 1;
  R607: a_3SLALA => HTR + CO2; v_607();
    v_607 = 1;
  R608: CYSTEATE => TR + CO2; v_608();
    v_608 = 1;
  R609: TR + AKG + O2 => H2SO3 + AAA + SUCC + CO2; v_609();
    v_609 = 1;
  R610: ALA + NAD => PYR + NH3 + NADH; v_610();
    v_610 = 1;
  R611: PPYR + GLU -> a_2A3PP + AKG; v_611();
    v_611 = 1;
  R612: a_2AEP + PYR -> PPAC + ALA; v_612();
    v_612 = 1;
  R613: MCB + PPAC => a_2HPP + VB12; v_613();
    v_613 = 1;
  R614: OPHSER + SCYS => SLLCT + PI; v_614();
    v_614 = 1;
  R615: AHSER + SCYS => SLLCT + AC; v_615();
    v_615 = 1;
  R616: SHSER + SCYS => SLLCT + SUCC; v_616();
    v_616 = 1;
  R617: SLLCT => SHCYS + NH3 + PYR; v_617();
    v_617 = 1;
  R618: ATP + SMET + TRNAMET => AMP + PPI + SMETTRNAMET; v_618();
    v_618 = 1;
  R619: ATP + SMET => PI + PPI + SeASMET; v_619();
    v_619 = 1;
  R620: ASER + SELD => SCYS + AC; v_620();
    v_620 = 1;
  R621: ATP + SELNT -> PPI + ASELNT; v_621();
    v_621 = 1;
  R622: ATP + ASELNT => ADP + a_3PASELNT; v_622();
    v_622 = 1;
  R623: CGS => CHD + GLC; v_623();
    v_623 = 1;
  R624: GLN => GLU + NH3; v_624();
    v_624 = 1;
  R625: DGLN => DGLU + NH3; v_625();
    v_625 = 1;
  R626: DGLU -> GLU; v_626();
    v_626 = 1;
  R627: ALA -> DALA; v_627();
    v_627 = 1;
  R628: 2 DALA + ATP => ALAALA + ADP + PI; v_628();
    v_628 = 1;
  R629: CYSGLY => CYS + GLY; v_629();
    v_629 = 1;
  R630: RGT => CYSGLY + GLU; v_630();
    v_630 = 1;
  R631: C140ACP + UDPNAG => ACP + UDPG2AA; v_631();
    v_631 = 1;
  R632: UDPG2AA => UDPG2A + AC; v_632();
    v_632 = 1;
  R633: UDPG2A + C140ACP => ACP + UDPG23A; v_633();
    v_633 = 1;
  R634: UDPG23A => UMP + LIPX; v_634();
    v_634 = 1;
  R635: LIPX + UDPG23A => UDP + DISAC1P; v_635();
    v_635 = 1;
  R636: DISAC1P + ATP => ADP + LIPIV; v_636();
    v_636 = 1;
  R637: LIPIV + CMPKDO => KDOLIPIV + CMP; v_637();
    v_637 = 1;
  R638: KDOLIPIV + CMPKDO => K2LIPIV + CMP; v_638();
    v_638 = 1;
  R639: C120ACP + K2LIPIV => LK2LIPIV + ACP; v_639();
    v_639 = 1;
  R640: C140ACP + LK2LIPIV => K2LIPA + ACP; v_640();
    v_640 = 1;
  R641: PEP + A5P => KDOP + PI; v_641();
    v_641 = 1;
  R642: KDOP => KDO + PI; v_642();
    v_642 = 1;
  R643: KDO + CTP => PPI + CMPKDO; v_643();
    v_643 = 1;
  R644: S7P => DGDMH7P; v_644();
    v_644 = 1;
  R645: ATP + DGDMH7P => ADP + DGDMH17BP; v_645();
    v_645 = 1;
  R646: DGDMH17BP => DGDMH1P + PI; v_646();
    v_646 = 1;
  R647: ATP + DGDMH1P => PPI + ADPDGDMHEP; v_647();
    v_647 = 1;
  R648: ADPDGDMHEP => ADPHEP; v_648();
    v_648 = 1;
  R649: 1.149 UDPG + 0.09 F6P + 0.387 ADPHEP + 0.142 UDPNAG => LPS + 1.291 UDP + 0.09 PI + 0.387 ADP; v_649();
    v_649 = 1;
  R650: UDPNAM + ALA + ATP => ADP + PI + UDPNAMA; v_650();
    v_650 = 1;
  R651: UDPNAMA + DGLU + ATP => UDPNAMAG + ADP + PI; v_651();
    v_651 = 1;
  R652: UDPNAMAG + MDAPIM + ATP => UDPMNLADGMD + ADP + PI; v_652();
    v_652 = 1;
  R653: UDPMNLADGMD + ALAALA + ATP => UDPMNLADGMDDADA + ADP + PI; v_653();
    v_653 = 1;
  R654: UDPMNLADGMDDADA + UDCP => UPPMNLADGMDDADA + UMP; v_654();
    v_654 = 1;
  R655: UPPMNLADGMDDADA + UDPNAG => UPPMNGNLADGMDDADA + UDP; v_655();
    v_655 = 1;
  R656: UPPMNGNLADGMDDADA + ATP + NH3 => UPPMNGNLADGNMDDADA + ADP + PI; v_656();
    v_656 = 1;
  R657: 5 GLY + UPPMNGNLADGNMDDADA => UPPMNGNLADGNMDG5DADA; v_657();
    v_657 = 1;
  R658: UPPMNGNLADGNMDG5DADA => UDCPP + PPEPTIDO; v_658();
    v_658 = 1;
  R659: PPEPTIDO + DALA => PEPTIDO + $DALAxt; v_659();
    v_659 = 1;
  R660: UDCPP => UDCP + PI; v_660();
    v_660 = 1;
  R661: ACALA => ACMUR + ALA; v_661();
    v_661 = 1;
  R662: AIR => AHM; v_662();
    v_662 = 1;
  R663: AHM + ATP => AHMP + ADP; v_663();
    v_663 = 1;
  R664: AHMP + ATP => AHMPP + ADP; v_664();
    v_664 = 1;
  R665: THZP + AHMPP => THMP + PPI; v_665();
    v_665 = 1;
  R666: THMP -> THIAMIN + PI; v_666();
    v_666 = 1;
  R667: THMP + ATP -> THMPP + ADP; v_667();
    v_667 = 1;
  R668: GTP => D6RP5P + FORMATE + PPI; v_668();
    v_668 = 1;
  R669: D6RP5P => A6RP5P + NH3; v_669();
    v_669 = 1;
  R670: A6RP5P + NADPH => A6RP5P2 + NADP; v_670();
    v_670 = 1;
  R671: A6RP5P2 => A6RP + PI; v_671();
    v_671 = 1;
  R672: RL5P => DB4P + FORMATE; v_672();
    v_672 = 1;
  R673: DB4P + A6RP => D8RL + PI; v_673();
    v_673 = 1;
  R674: 2 D8RL => RIBFLAV + A6RP; v_674();
    v_674 = 1;
  R675: RIBFLAV + ATP => FMN + ADP; v_675();
    v_675 = 1;
  R676: FMN + ATP => FAD + PPI; v_676();
    v_676 = 1;
  R677: FMN => RIBFLAV + PI; v_677();
    v_677 = 1;
  R678: NACN + DMB => NAC + N15PADRDMB; v_678();
    v_678 = 1;
  R679: E4P + NAD -> ER4P + NADH; v_679();
    v_679 = 1;
  R680: ER4P + NAD -> OHB + NADH; v_680();
    v_680 = 1;
  R681: OHB + GLU -> PHT + AKG; v_681();
    v_681 = 1;
  R682: PHT => a_4HLT + PI; v_682();
    v_682 = 1;
  R683: PHT + NAD => a_3A2OP + NADH + CO2; v_683();
    v_683 = 1;
  R684: a_3A2OP + DX5P => P5P + PI; v_684();
    v_684 = 1;
  R685: PYRDX + ATP => P5P + ADP; v_685();
    v_685 = 1;
  R686: P5P => PYRDX + PI; v_686();
    v_686 = 1;
  R687: P5P + O2 => PL5P + H2O2; v_687();
    v_687 = 1;
  R688: PL5P => PL + PI; v_688();
    v_688 = 1;
  R689: PL + ATP => PL5P + ADP; v_689();
    v_689 = 1;
  R690: PDLA5P + O2 => PL5P + NH3 + H2O2; v_690();
    v_690 = 1;
  R691: PDLA + ATP => PDLA5P + ADP; v_691();
    v_691 = 1;
  R692: PDLA5P => PDLA + PI; v_692();
    v_692 = 1;
  R693: PYRDX + O2 -> PL + H2O2; v_693();
    v_693 = 1;
  R694: PL + O2 + NH3 -> PDLA + H2O2; v_694();
    v_694 = 1;
  R695: ASP + FUM => IASP + SUCC; v_695();
    v_695 = 1;
  R696: ASP + O2 => IASP + H2O2; v_696();
    v_696 = 1;
  R697: IASP + DHAP => QA + PI; v_697();
    v_697 = 1;
  R698: QA + PRPP => NACN + CO2 + PPI; v_698();
    v_698 = 1;
  R699: NACN => NACD + PI; v_699();
    v_699 = 1;
  R700: NAMN => NAMD + PI; v_700();
    v_700 = 1;
  R701: NACD + ATP => NACN + ADP; v_701();
    v_701 = 1;
  R702: NAC + PRPP => NACN + PPI; v_702();
    v_702 = 1;
  R703: NACN + ATP => PPI + NAAD; v_703();
    v_703 = 1;
  R704: NAAD + ATP + GLN => NAD + AMP + PPI + GLU; v_704();
    v_704 = 1;
  R705: NAC + R1P => PI + NACD; v_705();
    v_705 = 1;
  R706: NAM + R1P => PI + NAMD; v_706();
    v_706 = 1;
  R707: NAM => NAC + NH3; v_707();
    v_707 = 1;
  R708: NADP + NADH => NADPH + NAD; v_708();
    v_708 = 1;
  R709: NAD + ATP => NADP + ADP; v_709();
    v_709 = 1;
  R710: NADP => NAD + PI; v_710();
    v_710 = 1;
  R711: NADPH + NAD -> NADP + NADH; v_711();
    v_711 = 1;
  R712: 2 PYR => ACLAC + CO2; v_712();
    v_712 = 1;
  R713: OIVAL + METTHF => DHPANT + THF; v_713();
    v_713 = 1;
  R714: DHPANT + NADPH => NADP + PANT; v_714();
    v_714 = 1;
  R715: PANT + bALA + ATP => AMP + PPI + PNTO; v_715();
    v_715 = 1;
  R716: PNTO + ATP => ADP + a_4PPNTO; v_716();
    v_716 = 1;
  R717: ATP + NPCYS => ADP + a_4PPNCYS; v_717();
    v_717 = 1;
  R718: ATP + PTT => ADP + a_4PPNTE; v_718();
    v_718 = 1;
  R719: a_4PPNTO + CTP + CYS => CMP + PPI + a_4PPNCYS; v_719();
    v_719 = 1;
  R720: a_4PPNCYS => CO2 + a_4PPNTE; v_720();
    v_720 = 1;
  R721: a_4PPNTE + ATP => PPI + DPCOA; v_721();
    v_721 = 1;
  R722: DPCOA + ATP => ADP + COA; v_722();
    v_722 = 1;
  R723: COA + AACP => PAP + ACP; v_723();
    v_723 = 1;
  R724: ACP => a_4PPNTE + AACP; v_724();
    v_724 = 1;
  R725: PTT => PNTO + CA; v_725();
    v_725 = 1;
  R726: ALA + CHCOA -> CO2 + COA + AONA; v_726();
    v_726 = 1;
  R727: SAM + AONA -> SAMOB + DANNA; v_727();
    v_727 = 1;
  R728: CO2 + DANNA + ATP -> DTB + PI + ADP; v_728();
    v_728 = 1;
  R729: DTB + S => BT; v_729();
    v_729 = 1;
  R730: ATP + BT => PPI + B5AMP; v_730();
    v_730 = 1;
  R731: B5AMP + A_C_ => AMP + H_C_; v_731();
    v_731 = 1;
  R732: GTP => FORMATE + AHTD; v_732();
    v_732 = 1;
  R733: AHTD => DHP + PPI + PI; v_733();
    v_733 = 1;
  R734: DHP => AHHMP + GLAL; v_734();
    v_734 = 1;
  R735: AHHMP + ATP => AMP + AHHMD; v_735();
    v_735 = 1;
  R736: CHOR + GLN => ADCHOR + GLU; v_736();
    v_736 = 1;
  R737: ADCHOR => PYR + PABA; v_737();
    v_737 = 1;
  R738: PABA + AHHMD => PPI + DHPT; v_738();
    v_738 = 1;
  R739: PABA + AHHMP => DHPT; v_739();
    v_739 = 1;
  R740: DHPT + ATP + GLU => ADP + PI + DHF; v_740();
    v_740 = 1;
  R741: DHF + NADPH => NADP + THF; v_741();
    v_741 = 1;
  R742: DHF + NADH => NAD + THF; v_742();
    v_742 = 1;
  R743: DHF + NAD -> FL + NADH; v_743();
    v_743 = 1;
  R744: DHF + NADP -> FL + NADPH; v_744();
    v_744 = 1;
  R745: FL + NADH => THF + NAD; v_745();
    v_745 = 1;
  R746: FL + NADPH => THF + NADP; v_746();
    v_746 = 1;
  R747: THF + ATP + GLU -> ADP + PI + THFG; v_747();
    v_747 = 1;
  R748: AHTD => PYTHP + H5P3O10; v_748();
    v_748 = 1;
  R749: DHBPT + NADH -> THBPT + NAD; v_749();
    v_749 = 1;
  R750: DHBPT + NADPH -> THBPT + NADP; v_750();
    v_750 = 1;
  R751: GAR + METHF => FGAR + THF; v_751();
    v_751 = 1;
  R752: METHF => FTHF; v_752();
    v_752 = 1;
  R753: METHF => a_5FTHF; v_753();
    v_753 = 1;
  R754: METTHF + NADP -> METHF + NADPH; v_754();
    v_754 = 1;
  R755: METHF -> FTHF; v_755();
    v_755 = 1;
  R756: METTHF + NADPH => MTHF + NADP; v_756();
    v_756 = 1;
  R757: METTHF + FADH2 -> MTHF + FAD; v_757();
    v_757 = 1;
  R758: DUMP + METTHF -> DHF + DTMP; v_758();
    v_758 = 1;
  R759: FTHF -> FORMATE + THF; v_759();
    v_759 = 1;
  R760: GTRNA + NADPH => GSA + NADP; v_760();
    v_760 = 1;
  R761: GSA => ALAV; v_761();
    v_761 = 1;
  R762: 2 ALAV => PBG; v_762();
    v_762 = 1;
  R763: 4 PBG => HMB + 4 NH3; v_763();
    v_763 = 1;
  R764: HMB => UPRG; v_764();
    v_764 = 1;
  R765: 2 SAM + UPRG => 2 SAH + PC2; v_765();
    v_765 = 1;
  R766: PC2 + NAD => NADH + SHCL; v_766();
    v_766 = 1;
  R767: SHCL => SHEME; v_767();
    v_767 = 1;
  R768: UPRG => 4 CO2 + CPP; v_768();
    v_768 = 1;
  R769: CPP + 2 SAM => PPHG + 2 CO2 + 2 MET + 2 DA; v_769();
    v_769 = 1;
  R770: CPP + O2 => PPHG + 2 CO2; v_770();
    v_770 = 1;
  R771: 1.5 O2 + PPHG => PPIX; v_771();
    v_771 = 1;
  R772: PPIX => PTH; v_772();
    v_772 = 1;
  R773: CIDA + ATP => ACDA + PPI + PI; v_773();
    v_773 = 1;
  R774: ACDA + 4 GLN + 4 ATP => ACHA + 4 GLU + 4 PI + 4 ADP; v_774();
    v_774 = 1;
  R775: ACHA + a_1AP2O => ADCBA; v_775();
    v_775 = 1;
  R776: ACHA + D1AP2OOP + ATP => ADCBAP + ADP + PI; v_776();
    v_776 = 1;
  R777: ADCBA + ATP => ADCBAP + ADP; v_777();
    v_777 = 1;
  R778: ADCBA + GTP => ADCBAP + GDP; v_778();
    v_778 = 1;
  R779: ADCBAP + GTP => AGDPCBA + PPI; v_779();
    v_779 = 1;
  R780: N15PADRDMB => ARBZ + PI; v_780();
    v_780 = 1;
  R781: AGDPCBA + ARBZ => CBCO + GMP; v_781();
    v_781 = 1;
  R782: NADH + 2 ACIIIA => NAD + 2 CIIA; v_782();
    v_782 = 1;
  R783: CHOR -> ICHOR; v_783();
    v_783 = 1;
  R784: CHOR -> a_4HB + PYR; v_784();
    v_784 = 1;
  R785: OPP + a_4HB => a_3OP4HB + PPI; v_785();
    v_785 = 1;
  R786: a_3OP4HB => a_2OPP + CO2; v_786();
    v_786 = 1;
  R787: a_2OPP + O2 + NADPH => a_2OP6HP + NADP; v_787();
    v_787 = 1;
  R788: a_2OP6HP + SAM => a_2OP6MP + SAH; v_788();
    v_788 = 1;
  R789: a_2OP6MP + O2 + NADPH => a_2OP6M14BQ + NADP; v_789();
    v_789 = 1;
  R790: a_2OP6M14BQ + SAM => a_2OP3M6M14BQ + SAH; v_790();
    v_790 = 1;
  R791: a_2OP3M6M14BQ + O2 + NADPH => a_2OP3M5H6M14BQ + NADP; v_791();
    v_791 = 1;
  R792: a_2OP3M5H6M14BQ + SAM => UQ + SAH; v_792();
    v_792 = 1;
  R793: ICHOR + AKG => SHCHC + PYR + CO2; v_793();
    v_793 = 1;
  R794: SHCHC => OSB; v_794();
    v_794 = 1;
  R795: OSB + ATP + COA => AMP + PPI + OSBCOA; v_795();
    v_795 = 1;
  R796: OSBCOA => DHN + COA; v_796();
    v_796 = 1;
  R797: DHN + OPP => PPI + CO2 + DMK; v_797();
    v_797 = 1;
  R798: DMK + SAM => MKH2 + SAH; v_798();
    v_798 = 1;
  R799: DHN + PPP => a_2P14NQ + CO2 + PPI; v_799();
    v_799 = 1;
  R800: a_2P14NQ + SAM => PQ + SAH; v_800();
    v_800 = 1;
  R801: 1.521 ALA + 0.384 ARG + 0.438 ASN + 0.438 ASP + 0.108 CYS + 0.645 GLN + 0.645 GLU + 1.002 GLY + 0.196 HIS + 0.479 ILE + 0.673 LEU + 0.373 LYS + 0.126 MET + 0.283 PHE + 0.392 PRO + 0.407 SER + 0.5 THR + 0.109 TRP + 0.115 TYR + 0.712 VAL + 40 ATP => 40 ADP + 40 PI + PROTEIN; v_801();
    v_801 = 1;
  R802: 0.863 DATP + 0.756 DGTP + 0.756 DCTP + 0.863 DTTP + 4.4 ATP => 4.4 ADP + 4.4 PI + 3.237 PPI + DNA; v_802();
    v_802 = 1;
  R803: 2.023 ATP + 0.946 GTP + 0.696 CTP + 0.675 UTP => 1.25 ADP + 1.25 PI + 3.09 PPI + RNA; v_803();
    v_803 = 1;
  R804: 0.155 a_2AG3PE + 0.908 PE + 0.268 PG => PHOSPHOLIPID; v_804();
    v_804 = 1;
  R805: 0.163 COA + 0.159 FAD + 0.274 FMN + 0.405 MK + 0.188 NAD + 0.168 NADP + 0.739 PYRDX + 0.281 THF => CAV; v_805();
    v_805 = 1;
  R806: 0.55 PROTEIN + 0.031 DNA + 0.205 RNA + 0.091 PHOSPHOLIPID + 0.03 CAV + 0.034 LPS + 0.025 PEPTIDO + 0.025 GLYCOGEN + 46 ATP => $BIOMASS + 46 ADP + 46 PI; v_806();
    v_806 = 1;
  R807: ATP => ADP + PI; v_807();
    v_807 = 1;
  R808: $IMALxt + ATP -> IMAL + PI + ADP; v_808();
    v_808 = 1;
  R809: $FRUxt + PEP => F1P + PYR; v_809();
    v_809 = 1;
  R810: $GLCxt + PEP => G6P + PYR; v_810();
    v_810 = 1;
  R811: $GLUCxt + Hxt => GLUC; v_811();
    v_811 = 1;
  R812: $MLTxt + ATP => MLT + ADP + PI; v_812();
    v_812 = 1;
  R813: $MELIxt + Hxt => MELI; v_813();
    v_813 = 1;
  R814: $MELIxt + $Naxt => MELI + Na; v_814();
    v_814 = 1;
  R815: $MNTxt + PEP => MNT1P + PYR; v_815();
    v_815 = 1;
  R816: $NAGAxt + PEP => NAGA6P + PYR; v_816();
    v_816 = 1;
  R817: $SUCxt + PEP => SUC6P + PYR; v_817();
    v_817 = 1;
  R818: $TRExt + PEP => TRE6P + PYR; v_818();
    v_818 = 1;
  R819: $a_2PGxt + ATP => a_2PG + ADP + PI; v_819();
    v_819 = 1;
  R820: $a_3PGxt + ATP => a_3PG + ADP + PI; v_820();
    v_820 = 1;
  R821: AC -> $ACxt + Hxt; v_821();
    v_821 = 1;
  R822: $AKGxt + Hxt => AKG; v_822();
    v_822 = 1;
  R823: $CITxt -> CIT; v_823();
    v_823 = 1;
  R824: $CITxt + $Naxt => CIT + Na; v_824();
    v_824 = 1;
  R825: FORMATE => $FORMATExt; v_825();
    v_825 = 1;
  R826: $FUMxt + Hxt => FUM; v_826();
    v_826 = 1;
  R827: $FUMxt + $Naxt => FUM + Na; v_827();
    v_827 = 1;
  R828: $FUMxt + SUCC -> FUM + $SUCCxt; v_828();
    v_828 = 1;
  R829: $ICITxt + $Naxt => ICIT + Na; v_829();
    v_829 = 1;
  R830: $MALxt + Hxt => MAL; v_830();
    v_830 = 1;
  R831: $MALxt + $Naxt => MAL + Na; v_831();
    v_831 = 1;
  R832: $MALxt + SUCC -> MAL + $SUCCxt; v_832();
    v_832 = 1;
  R833: $SLACxt + Hxt => SLAC; v_833();
    v_833 = 1;
  R834: $SUCCxt + Hxt => SUCC; v_834();
    v_834 = 1;
  R835: $SUCCxt + $Naxt => SUCC + Na; v_835();
    v_835 = 1;
  R836: $GL3Pxt + PI -> GL3P + $PIxt; v_836();
    v_836 = 1;
  R837: $GL3Pxt + ATP => GL3P + ADP + PI; v_837();
    v_837 = 1;
  R838: $GLYCOLATExt -> GLYCOLATE; v_838();
    v_838 = 1;
  R839: ATP -> Hxt + ADP + PI; v_839();
    v_839 = 1;
  R840: $CO2xt -> CO2; v_840();
    v_840 = 1;
  R841: $Naxt -> Na + Hxt; v_841();
    v_841 = 1;
  R842: Na + 2 Hxt -> $Naxt; v_842();
    v_842 = 1;
  R843: Na + 3 Hxt -> $Naxt; v_843();
    v_843 = 1;
  R844: 2 Na + 3 Hxt -> 2 $Naxt; v_844();
    v_844 = 1;
  R845: $NH3xt -> NH3; v_845();
    v_845 = 1;
  R846: NO2 => $NO2xt; v_846();
    v_846 = 1;
  R847: $NO3xt + ATP => NO3 + ADP + PI; v_847();
    v_847 = 1;
  R848: $O2xt -> O2; v_848();
    v_848 = 1;
  R849: $PIxt + Hxt -> PI; v_849();
    v_849 = 1;
  R850: $PIxt + 3 $Naxt -> PI + 3 Na; v_850();
    v_850 = 1;
  R851: $PIxt + ATP => 2 PI + ADP; v_851();
    v_851 = 1;
  R852: $SLFxt + $Naxt => SLF + Na; v_852();
    v_852 = 1;
  R853: $SLFxt + Hxt => SLF; v_853();
    v_853 = 1;
  R854: $SLFxt + ATP => SLF + ADP + PI; v_854();
    v_854 = 1;
  R855: $THIAMINxt + ATP => THIAMIN + ADP + PI; v_855();
    v_855 = 1;
  R856: ALA + Hxt -> $ALAxt; v_856();
    v_856 = 1;
  R857: $ALAxt + ATP => ALA + ADP + PI; v_857();
    v_857 = 1;
  R858: $ALAxt + Hxt => ALA; v_858();
    v_858 = 1;
  R859: $ALAxt + $Naxt => ALA + Na; v_859();
    v_859 = 1;
  R860: ARG + Hxt -> $ARGxt; v_860();
    v_860 = 1;
  R861: $ARGxt + ATP => ARG + ADP + PI; v_861();
    v_861 = 1;
  R862: $ARGxt + Hxt => ARG; v_862();
    v_862 = 1;
  R863: ASN + Hxt -> $ASNxt; v_863();
    v_863 = 1;
  R864: $ASNxt + ATP => ASN + ADP + PI; v_864();
    v_864 = 1;
  R865: $ASNxt + Hxt => ASN; v_865();
    v_865 = 1;
  R866: ASP + Hxt -> $ASPxt; v_866();
    v_866 = 1;
  R867: $ASPxt + ATP => ASP + ADP + PI; v_867();
    v_867 = 1;
  R868: $ASPxt + Hxt => ASP; v_868();
    v_868 = 1;
  R869: CYS + Hxt -> $CYSxt; v_869();
    v_869 = 1;
  R870: $CYSxt + ATP => CYS + ADP + PI; v_870();
    v_870 = 1;
  R871: $CYSxt + Hxt => CYS; v_871();
    v_871 = 1;
  R872: $DALAxt + Hxt => DALA; v_872();
    v_872 = 1;
  R873: $DGLUxt + Hxt => DGLU; v_873();
    v_873 = 1;
  R874: GLN + Hxt -> $GLNxt; v_874();
    v_874 = 1;
  R875: $GLNxt + ATP => GLN + ADP + PI; v_875();
    v_875 = 1;
  R876: $GLNxt + Hxt => GLN; v_876();
    v_876 = 1;
  R877: GLU + Hxt -> $GLUxt; v_877();
    v_877 = 1;
  R878: $GLUxt + ATP => GLU + ADP + PI; v_878();
    v_878 = 1;
  R879: $GLUxt + Hxt => GLU; v_879();
    v_879 = 1;
  R880: $GLUxt + $Naxt => GLU + Na; v_880();
    v_880 = 1;
  R881: GLY + Hxt -> $GLYxt; v_881();
    v_881 = 1;
  R882: $GLYxt + ATP => GLY + ADP + PI; v_882();
    v_882 = 1;
  R883: $GLYxt + Hxt => GLY; v_883();
    v_883 = 1;
  R884: $GLYxt + $Naxt => GLY + Na; v_884();
    v_884 = 1;
  R885: HIS + Hxt -> $HISxt; v_885();
    v_885 = 1;
  R886: $HISxt + ATP => HIS + ADP + PI; v_886();
    v_886 = 1;
  R887: $HISxt + Hxt => HIS; v_887();
    v_887 = 1;
  R888: ILE + Hxt -> $ILExt; v_888();
    v_888 = 1;
  R889: $ILExt + ATP => ILE + ADP + PI; v_889();
    v_889 = 1;
  R890: $ILExt + Hxt => ILE; v_890();
    v_890 = 1;
  R891: LEU + Hxt -> $LEUxt; v_891();
    v_891 = 1;
  R892: $LEUxt + ATP => LEU + ADP + PI; v_892();
    v_892 = 1;
  R893: $LEUxt + Hxt => LEU; v_893();
    v_893 = 1;
  R894: LYS + Hxt -> $LYSxt; v_894();
    v_894 = 1;
  R895: LYS + Hxt => $LYSxt; v_895();
    v_895 = 1;
  R896: $LYSxt + ATP => LYS + ADP + PI; v_896();
    v_896 = 1;
  R897: $LYSxt + Hxt => LYS; v_897();
    v_897 = 1;
  R898: MET + Hxt -> $METxt; v_898();
    v_898 = 1;
  R899: $METxt + ATP => MET + ADP + PI; v_899();
    v_899 = 1;
  R900: $METxt + Hxt => MET; v_900();
    v_900 = 1;
  R901: PHE + Hxt -> $PHExt; v_901();
    v_901 = 1;
  R902: $PHExt + ATP => PHE + ADP + PI; v_902();
    v_902 = 1;
  R903: $PHExt + Hxt => PHE; v_903();
    v_903 = 1;
  R904: PRO + Hxt -> $PROxt; v_904();
    v_904 = 1;
  R905: $PROxt + ATP => PRO + ADP + PI; v_905();
    v_905 = 1;
  R906: $PROxt + Hxt => PRO; v_906();
    v_906 = 1;
  R907: $PROxt + $Naxt => PRO + Na; v_907();
    v_907 = 1;
  R908: SER + Hxt -> $SERxt; v_908();
    v_908 = 1;
  R909: $SERxt + ATP => SER + ADP + PI; v_909();
    v_909 = 1;
  R910: $SERxt + Hxt => SER; v_910();
    v_910 = 1;
  R911: THR + Hxt -> $THRxt; v_911();
    v_911 = 1;
  R912: $THRxt + ATP => THR + ADP + PI; v_912();
    v_912 = 1;
  R913: $THRxt + Hxt => THR; v_913();
    v_913 = 1;
  R914: TRP + Hxt -> $TRPxt; v_914();
    v_914 = 1;
  R915: $TRPxt + ATP => TRP + ADP + PI; v_915();
    v_915 = 1;
  R916: $TRPxt + Hxt => TRP; v_916();
    v_916 = 1;
  R917: TYR + Hxt -> $TYRxt; v_917();
    v_917 = 1;
  R918: $TYRxt + ATP => TYR + ADP + PI; v_918();
    v_918 = 1;
  R919: $TYRxt + Hxt => TYR; v_919();
    v_919 = 1;
  R920: VAL + Hxt -> $VALxt; v_920();
    v_920 = 1;
  R921: $VALxt + ATP => VAL + ADP + PI; v_921();
    v_921 = 1;
  R922: $VALxt + Hxt => VAL; v_922();
    v_922 = 1;
  R923: HSER + Hxt -> $HSERxt; v_923();
    v_923 = 1;
  R924: $ORNxt + ATP => ORN + ADP + PI; v_924();
    v_924 = 1;
  R925: $PTRCxt + ORN -> PTRC + $ORNxt; v_925();
    v_925 = 1;
  R926: $PTRCxt + ATP => PTRC + ADP + PI; v_926();
    v_926 = 1;
  R927: $SPRMDxt + ATP => SPRMD + ADP + PI; v_927();
    v_927 = 1;
  R928: $UREAxt + ATP => UREA + ADP + PI; v_928();
    v_928 = 1;
  R929: $CHOLINExt + Hxt => CHOLINE; v_929();
    v_929 = 1;
  R930: $GLxt -> GL; v_930();
    v_930 = 1;
  R931: $ADNxt + Hxt => ADN; v_931();
    v_931 = 1;
  R932: $CYTDxt + Hxt => CYTD; v_932();
    v_932 = 1;
  R933: $DAxt + Hxt => DA; v_933();
    v_933 = 1;
  R934: $DCxt + Hxt => DC; v_934();
    v_934 = 1;
  R935: $DGxt + Hxt => DG; v_935();
    v_935 = 1;
  R936: $DTxt + Hxt => DT; v_936();
    v_936 = 1;
  R937: $DUxt + Hxt => DU; v_937();
    v_937 = 1;
  R938: $GSNxt + Hxt => GSN; v_938();
    v_938 = 1;
  R939: $URIxt + Hxt => URI; v_939();
    v_939 = 1;
  R940: $CTxt + Hxt => CT; v_940();
    v_940 = 1;
  R941: $XANxt + Hxt => XAN; v_941();
    v_941 = 1;
  R942: $URAxt + Hxt => URA; v_942();
    v_942 = 1;
  R943: $VB12xt + ATP => VB12 + ADP + PI; v_943();
    v_943 = 1;
end
